<?xml version="1.0" encoding="UTF-8"?>
<neuroml xmlns="http://morphml.org/neuroml/schema" xmlns:meta="http://morphml.org/metadata/schema" xmlns:mml="http://morphml.org/morphml/schema" xmlns:bio="http://morphml.org/biophysics/schema" xmlns:cml="http://morphml.org/channelml/schema" xmlns:net="http://morphml.org/networkml/schema" xmlns:xsi="http://www.w3.org/2001/XMLSchema-instance" xsi:schemaLocation="http://morphml.org/neuroml/schema  http://neuroml.svn.sourceforge.net/viewvc/neuroml/trunk/web/NeuroMLFiles/Schemata/v1.8.1/Level3/NeuroML_Level3_v1.8.1.xsd" lengthUnits="micron">

    <cells>
        <cell name="CA1soma">

            <meta:notes>Only soma of more detailed cell</meta:notes>
            <meta:notes>MOOSE NeuroML importer still does not support changing channel parameters post load and inhomogenous tags. Thus this model has been modified.
            All inhomogeneous tags have been removed. All changed channel parameters have been hardcoded into modified channels.</meta:notes>

            <mml:segments>

                <mml:segment id="0" name="Seg0_soma_0" cable="0">
                    <mml:proximal x="0.0" y="0.0" z="0.0" diameter="7.491"/>
                    <mml:distal x="0.0" y="7.4909997" z="0.0" diameter="7.491"/>
                </mml:segment>

            </mml:segments>

            <mml:cables>

                <mml:cable id="0" name="soma_0">
                    <meta:group>all</meta:group>
                    <meta:group>soma_group</meta:group>
                    <meta:group>ModelViewParmSubset_2</meta:group>
                    <meta:group>ModelViewParmSubset_6</meta:group>
                    <meta:group>ModelViewParmSubset_9</meta:group>
                    <meta:group>OneSecGrp_SectionRef_1</meta:group>
                </mml:cable>

                <mml:cablegroup name="soma_group">
                    <mml:cable id="0"/>
               </mml:cablegroup>

            </mml:cables>

            <!--Adding the biophysical parameters-->

            <biophysics units="Physiological Units">

                <bio:mechanism name="hd_minus73" type="Channel Mechanism">
                    <bio:parameter name="gmax" value="0.05">
                        <bio:group>all</bio:group>
                    </bio:parameter>
                </bio:mechanism>

                <bio:mechanism name="kdr" type="Channel Mechanism">
                    <bio:parameter name="gmax" value="10.0">
                        <bio:group>all</bio:group>
                    </bio:parameter>
                </bio:mechanism>

                <bio:mechanism name="kap" type="Channel Mechanism">
                    <bio:parameter name="gmax" value="30.0">
                        <bio:group>all</bio:group>
                    </bio:parameter>
                </bio:mechanism>

                <bio:mechanism name="na3" type="Channel Mechanism">
                    <bio:parameter name="gmax" value="25.0">
                        <bio:group>soma_group</bio:group>
                    </bio:parameter>
                </bio:mechanism>

                <bio:mechanism name="pasCA1" type="Channel Mechanism" passive_conductance="true">
                    <bio:parameter name="e" value="-58.0">
                        <bio:group>all</bio:group>
                    </bio:parameter>
                    <bio:parameter name="gmax" value="0.0357143">
                        <bio:group>all</bio:group>
                    </bio:parameter>
                    <bio:parameter name="inject" value="3.0e-6">
                        <bio:group>soma_group</bio:group>
                    </bio:parameter>
                </bio:mechanism>

                <bio:mechanism name="nax" type="Channel Mechanism">
                    <bio:parameter name="gmax" value="125.0">
                        <bio:group>all</bio:group>
                    </bio:parameter>
                </bio:mechanism>

                <bio:mechanism name="kad" type="Channel Mechanism">
                    <bio:parameter name="gmax" value="30.0">
                        <bio:group>all</bio:group>
                    </bio:parameter>
                </bio:mechanism>

                <bio:spec_capacitance>
                    <bio:parameter value="1.0">
                        <bio:group>all</bio:group>
                    </bio:parameter>
                </bio:spec_capacitance>

                <bio:spec_axial_resistance>
                    <bio:parameter value="0.15">
                        <bio:group>all</bio:group>
                    </bio:parameter>
                </bio:spec_axial_resistance>

                <bio:init_memb_potential>
                    <bio:parameter value="-65.0">
                        <bio:group>all</bio:group>
                    </bio:parameter>
                </bio:init_memb_potential>

                <bio:ion_props name="k">
                    <bio:parameter name="e" value="-90.0">
                        <bio:group>all</bio:group>
                    </bio:parameter>
                </bio:ion_props>

                <bio:ion_props name="na">
                    <bio:parameter name="e" value="50.0">
                        <bio:group>all</bio:group>
                    </bio:parameter>
                </bio:ion_props>
            </biophysics>

            <connectivity/>

        </cell>
    </cells>
</neuroml>
