<?xml version="1.0" encoding="UTF-8"?>
<networkml xmlns="http://morphml.org/networkml/schema" xmlns:meta="http://morphml.org/metadata/schema" xmlns:xsi="http://www.w3.org/2001/XMLSchema-instance" xsi:schemaLocation="http://morphml.org/networkml/schema  http://www.neuroml.org/NeuroMLValidator/NeuroMLFiles/Schemata/v1.8.1/Level3/NetworkML_v1.8.1.xsd" lengthUnits="micrometer">

    <meta:notes>

Network structure (NeuroML 1.x) for project: CA1PyramidalCell saved with neuroConstruct v1.7.1 on: 11:29:49, 18-Jul-14

Cell Group: CA1_CG contains 1 cells

    </meta:notes>

<meta:properties>
    <meta:property tag="neuroConstruct_random_seed" value="282926701"/>

    <meta:property tag="neuroConstruct_sim_config" value="CA1Cell"/>

    <meta:property tag="neuroConstruct_sim_duration" value="10.0"/>

    <meta:property tag="neuroConstruct_sim_time_step" value="0.002"/>

    <meta:property tag="neuroConstruct_temperature" value="35.0"/>
</meta:properties>

        <populations>
    <population name="CA1_CG" cell_type="CA1">
        <meta:properties>
        </meta:properties>
        <instances size="1">
            <instance id="0">
                <location x="0.0" y="0.0" z="0.0"/>
            </instance>
        </instances>
    </population>
</populations>

            <!--There are no synaptic connections present in the network-->

        <inputs units="SI Units">
    <input name="Input_1">
        <pulse_input delay="0.002" duration="0.005" amplitude="1.8E-9"/>
        <target population="CA1_CG">
            <sites size="1">
            <site cell_id="0" segment_id="0" fraction_along="0.5"/>
        </sites>
        </target>
    </input>
</inputs>

</networkml>
