<?xml version="1.0" encoding="UTF-8"?>
<neuroml xmlns="http://morphml.org/neuroml/schema" xmlns:meta="http://morphml.org/metadata/schema" xmlns:mml="http://morphml.org/morphml/schema" xmlns:bio="http://morphml.org/biophysics/schema" xmlns:cml="http://morphml.org/channelml/schema" xmlns:net="http://morphml.org/networkml/schema" xmlns:xsi="http://www.w3.org/2001/XMLSchema-instance" xsi:schemaLocation="http://morphml.org/neuroml/schema  http://neuroml.svn.sourceforge.net/viewvc/neuroml/trunk/web/NeuroMLFiles/Schemata/v1.8.1/Level3/NeuroML_Level3_v1.8.1.xsd" lengthUnits="micron">

    <cells>
        <cell name="CA1inhomog">

            <meta:notes>Cell exported from NEURON ModelView in NeuroML Level 2 format and imported into neuroConstruct. The densities of hd, kap, kad have been replaced with variable mechanisms recreating the densities as used in the original model from ModelDB.</meta:notes>

            <mml:segments>

                <mml:segment id="0" name="Seg0_soma_0" cable="0">
                    <mml:proximal x="0.0" y="0.0" z="0.01" diameter="7.491"/>
                    <mml:distal x="0.0" y="0.0" z="7.501" diameter="7.491"/>
                </mml:segment>

                <mml:segment id="1838" name="Seg0_user5_0" parent="0" cable="1">
                    <mml:proximal x="0.0" y="0.0" z="7.501" diameter="7.491"/>
                    <mml:distal x="3.71" y="20.98" z="7.121" diameter="4.96"/>
                </mml:segment>

                <mml:segment id="1839" name="Seg1_user5_0" parent="1838" cable="1">
                    <mml:distal x="5.55" y="21.23" z="7.561" diameter="4.51"/>
                </mml:segment>

                <mml:segment id="1840" name="Seg2_user5_0" parent="1839" cable="1">
                    <mml:distal x="5.82" y="25.06" z="7.561" diameter="4.51"/>
                </mml:segment>

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
            </mml:segments>

            <mml:cables>

                <mml:cable id="0" name="soma_0"/>

                <mml:cable id="1" name="user5_0">
                    <meta:properties>

                    <meta:property tag="numberInternalDivisions" value="4"/>

                    </meta:properties>
                </mml:cable>

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
                <mml:cablegroup name="all">
                    <mml:cable id="0"/>
                    <mml:cable id="1"/>
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                    <mml:inhomogeneous_param name="ZeroToOneOverCell" variable="p">
                        <mml:metric>Path Length from root</mml:metric>
                        <mml:proximal translationStart="0"/>
                        <mml:distal normalizationEnd="1"/>
                    </mml:inhomogeneous_param>

                    <mml:inhomogeneous_param name="PathLengthOverCell" variable="p">
                        <mml:metric>Path Length from root</mml:metric>
                    </mml:inhomogeneous_param>

               </mml:cablegroup>

                <mml:cablegroup name="soma_group">
                    <mml:cable id="0"/>
               </mml:cablegroup>

                <mml:cablegroup name="ModelViewParmSubset_2">
                    <mml:cable id="0"/>
                    <mml:cable id="1"/>
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               </mml:cablegroup>

                <mml:cablegroup name="ModelViewParmSubset_6">
                    <mml:cable id="0"/>
                    <mml:cable id="1"/>
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               </mml:cablegroup>

                <mml:cablegroup name="ModelViewParmSubset_9">
                    <mml:cable id="0"/>
                    <mml:cable id="3"/>
               </mml:cablegroup>

                <mml:cablegroup name="OneSecGrp_SectionRef_2">
                    <mml:cable id="0"/>
               </mml:cablegroup>

                <mml:cablegroup name="dendrite_group">
                    <mml:cable id="1"/>
                    <mml:cable id="2"/>
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                    <mml:inhomogeneous_param name="PathLengthOverDendrites" variable="p">
                        <mml:metric>Path Length from root</mml:metric>
                    </mml:inhomogeneous_param>

               </mml:cablegroup>

                <mml:cablegroup name="ModelViewParmSubset_1">
                    <mml:cable id="1"/>
                    <mml:cable id="5"/>
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               </mml:cablegroup>

                <mml:cablegroup name="ModelViewParmSubset_3">
                    <mml:cable id="1"/>
                    <mml:cable id="2"/>
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               </mml:cablegroup>

                <mml:cablegroup name="ModelViewParmSubset_7">
                    <mml:cable id="1"/>
                    <mml:cable id="2"/>
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               </mml:cablegroup>

                <mml:cablegroup name="OneSecGrp_SectionRef_3">
                    <mml:cable id="1"/>
               </mml:cablegroup>

                <mml:cablegroup name="OneSecGrp_SectionRef_4">
                    <mml:cable id="2"/>
               </mml:cablegroup>

                <mml:cablegroup name="ModelViewParmSubset_4">
                    <mml:cable id="3"/>
               </mml:cablegroup>

                <mml:cablegroup name="OneSecGrp_SectionRef_5">
                    <mml:cable id="3"/>
               </mml:cablegroup>

                <mml:cablegroup name="axon_group">
                    <mml:cable id="3"/>
               </mml:cablegroup>

                <mml:cablegroup name="OneSecGrp_SectionRef_6">
                    <mml:cable id="4"/>
               </mml:cablegroup>

                <mml:cablegroup name="OneSecGrp_SectionRef_7">
                    <mml:cable id="5"/>
               </mml:cablegroup>

                <mml:cablegroup name="OneSecGrp_SectionRef_8">
                    <mml:cable id="6"/>
               </mml:cablegroup>

                <mml:cablegroup name="OneSecGrp_SectionRef_9">
                    <mml:cable id="7"/>
               </mml:cablegroup>

                <mml:cablegroup name="OneSecGrp_SectionRef_10">
                    <mml:cable id="8"/>
               </mml:cablegroup>

                <mml:cablegroup name="OneSecGrp_SectionRef_11">
                    <mml:cable id="9"/>
               </mml:cablegroup>

                <mml:cablegroup name="OneSecGrp_SectionRef_12">
                    <mml:cable id="10"/>
               </mml:cablegroup>

                <mml:cablegroup name="OneSecGrp_SectionRef_13">
                    <mml:cable id="11"/>
               </mml:cablegroup>

                <mml:cablegroup name="OneSecGrp_SectionRef_14">
                    <mml:cable id="12"/>
               </mml:cablegroup>

                <mml:cablegroup name="OneSecGrp_SectionRef_15">
                    <mml:cable id="13"/>
               </mml:cablegroup>

                <mml:cablegroup name="OneSecGrp_SectionRef_16">
                    <mml:cable id="14"/>
               </mml:cablegroup>

                <mml:cablegroup name="OneSecGrp_SectionRef_17">
                    <mml:cable id="15"/>
               </mml:cablegroup>

                <mml:cablegroup name="ModelViewParmSubset_5">
                    <mml:cable id="16"/>
                    <mml:cable id="20"/>
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               </mml:cablegroup>

                <mml:cablegroup name="OneSecGrp_SectionRef_18">
                    <mml:cable id="16"/>
               </mml:cablegroup>

                <mml:cablegroup name="OneSecGrp_SectionRef_19">
                    <mml:cable id="17"/>
               </mml:cablegroup>

                <mml:cablegroup name="OneSecGrp_SectionRef_20">
                    <mml:cable id="18"/>
               </mml:cablegroup>

                <mml:cablegroup name="OneSecGrp_SectionRef_21">
                    <mml:cable id="19"/>
               </mml:cablegroup>

                <mml:cablegroup name="OneSecGrp_SectionRef_22">
                    <mml:cable id="20"/>
               </mml:cablegroup>

                <mml:cablegroup name="OneSecGrp_SectionRef_23">
                    <mml:cable id="21"/>
               </mml:cablegroup>

                <mml:cablegroup name="OneSecGrp_SectionRef_24">
                    <mml:cable id="22"/>
               </mml:cablegroup>

                <mml:cablegroup name="OneSecGrp_SectionRef_25">
                    <mml:cable id="23"/>
               </mml:cablegroup>

                <mml:cablegroup name="OneSecGrp_SectionRef_26">
                    <mml:cable id="24"/>
               </mml:cablegroup>

                <mml:cablegroup name="OneSecGrp_SectionRef_27">
                    <mml:cable id="25"/>
               </mml:cablegroup>

                <mml:cablegroup name="OneSecGrp_SectionRef_28">
                    <mml:cable id="26"/>
               </mml:cablegroup>

                <mml:cablegroup name="OneSecGrp_SectionRef_29">
                    <mml:cable id="27"/>
               </mml:cablegroup>

                <mml:cablegroup name="OneSecGrp_SectionRef_30">
                    <mml:cable id="28"/>
               </mml:cablegroup>

                <mml:cablegroup name="OneSecGrp_SectionRef_31">
                    <mml:cable id="29"/>
               </mml:cablegroup>

                <mml:cablegroup name="OneSecGrp_SectionRef_32">
                    <mml:cable id="30"/>
               </mml:cablegroup>

                <mml:cablegroup name="ModelViewParmSubset_8">
                    <mml:cable id="31"/>
                    <mml:cable id="32"/>
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               </mml:cablegroup>

                <mml:cablegroup name="OneSecGrp_SectionRef_33">
                    <mml:cable id="31"/>
               </mml:cablegroup>

                <mml:cablegroup name="OneSecGrp_SectionRef_34">
                    <mml:cable id="32"/>
               </mml:cablegroup>

                <mml:cablegroup name="OneSecGrp_SectionRef_35">
                    <mml:cable id="33"/>
               </mml:cablegroup>

                <mml:cablegroup name="OneSecGrp_SectionRef_36">
                    <mml:cable id="34"/>
               </mml:cablegroup>

                <mml:cablegroup name="OneSecGrp_SectionRef_37">
                    <mml:cable id="35"/>
               </mml:cablegroup>

                <mml:cablegroup name="OneSecGrp_SectionRef_38">
                    <mml:cable id="36"/>
               </mml:cablegroup>

                <mml:cablegroup name="OneSecGrp_SectionRef_39">
                    <mml:cable id="37"/>
               </mml:cablegroup>

                <mml:cablegroup name="OneSecGrp_SectionRef_40">
                    <mml:cable id="38"/>
               </mml:cablegroup>

                <mml:cablegroup name="OneSecGrp_SectionRef_41">
                    <mml:cable id="39"/>
               </mml:cablegroup>

                <mml:cablegroup name="OneSecGrp_SectionRef_42">
                    <mml:cable id="40"/>
               </mml:cablegroup>

                <mml:cablegroup name="OneSecGrp_SectionRef_43">
                    <mml:cable id="41"/>
               </mml:cablegroup>

                <mml:cablegroup name="OneSecGrp_SectionRef_44">
                    <mml:cable id="42"/>
               </mml:cablegroup>

                <mml:cablegroup name="OneSecGrp_SectionRef_45">
                    <mml:cable id="43"/>
               </mml:cablegroup>

                <mml:cablegroup name="OneSecGrp_SectionRef_46">
                    <mml:cable id="44"/>
               </mml:cablegroup>

                <mml:cablegroup name="OneSecGrp_SectionRef_47">
                    <mml:cable id="45"/>
               </mml:cablegroup>

                <mml:cablegroup name="OneSecGrp_SectionRef_48">
                    <mml:cable id="46"/>
               </mml:cablegroup>

                <mml:cablegroup name="OneSecGrp_SectionRef_49">
                    <mml:cable id="47"/>
               </mml:cablegroup>

                <mml:cablegroup name="OneSecGrp_SectionRef_50">
                    <mml:cable id="48"/>
               </mml:cablegroup>

                <mml:cablegroup name="OneSecGrp_SectionRef_51">
                    <mml:cable id="49"/>
               </mml:cablegroup>

                <mml:cablegroup name="OneSecGrp_SectionRef_52">
                    <mml:cable id="50"/>
               </mml:cablegroup>

                <mml:cablegroup name="OneSecGrp_SectionRef_53">
                    <mml:cable id="51"/>
               </mml:cablegroup>

                <mml:cablegroup name="OneSecGrp_SectionRef_54">
                    <mml:cable id="52"/>
               </mml:cablegroup>

                <mml:cablegroup name="OneSecGrp_SectionRef_55">
                    <mml:cable id="53"/>
               </mml:cablegroup>

                <mml:cablegroup name="OneSecGrp_SectionRef_56">
                    <mml:cable id="54"/>
               </mml:cablegroup>

                <mml:cablegroup name="OneSecGrp_SectionRef_57">
                    <mml:cable id="55"/>
               </mml:cablegroup>

                <mml:cablegroup name="OneSecGrp_SectionRef_58">
                    <mml:cable id="56"/>
               </mml:cablegroup>

                <mml:cablegroup name="OneSecGrp_SectionRef_59">
                    <mml:cable id="57"/>
               </mml:cablegroup>

                <mml:cablegroup name="OneSecGrp_SectionRef_60">
                    <mml:cable id="58"/>
               </mml:cablegroup>

                <mml:cablegroup name="OneSecGrp_SectionRef_61">
                    <mml:cable id="59"/>
               </mml:cablegroup>

                <mml:cablegroup name="OneSecGrp_SectionRef_62">
                    <mml:cable id="60"/>
               </mml:cablegroup>

                <mml:cablegroup name="OneSecGrp_SectionRef_63">
                    <mml:cable id="61"/>
               </mml:cablegroup>

                <mml:cablegroup name="OneSecGrp_SectionRef_64">
                    <mml:cable id="62"/>
               </mml:cablegroup>

                <mml:cablegroup name="OneSecGrp_SectionRef_65">
                    <mml:cable id="63"/>
               </mml:cablegroup>

                <mml:cablegroup name="OneSecGrp_SectionRef_66">
                    <mml:cable id="64"/>
               </mml:cablegroup>

                <mml:cablegroup name="OneSecGrp_SectionRef_67">
                    <mml:cable id="65"/>
               </mml:cablegroup>

                <mml:cablegroup name="OneSecGrp_SectionRef_68">
                    <mml:cable id="66"/>
               </mml:cablegroup>

                <mml:cablegroup name="OneSecGrp_SectionRef_69">
                    <mml:cable id="67"/>
               </mml:cablegroup>

                <mml:cablegroup name="OneSecGrp_SectionRef_70">
                    <mml:cable id="68"/>
               </mml:cablegroup>

                <mml:cablegroup name="OneSecGrp_SectionRef_71">
                    <mml:cable id="69"/>
               </mml:cablegroup>

                <mml:cablegroup name="OneSecGrp_SectionRef_72">
                    <mml:cable id="70"/>
               </mml:cablegroup>

                <mml:cablegroup name="OneSecGrp_SectionRef_73">
                    <mml:cable id="71"/>
               </mml:cablegroup>

                <mml:cablegroup name="OneSecGrp_SectionRef_74">
                    <mml:cable id="72"/>
               </mml:cablegroup>

                <mml:cablegroup name="OneSecGrp_SectionRef_75">
                    <mml:cable id="73"/>
               </mml:cablegroup>

                <mml:cablegroup name="OneSecGrp_SectionRef_76">
                    <mml:cable id="74"/>
               </mml:cablegroup>

                <mml:cablegroup name="OneSecGrp_SectionRef_77">
                    <mml:cable id="75"/>
               </mml:cablegroup>

                <mml:cablegroup name="OneSecGrp_SectionRef_78">
                    <mml:cable id="76"/>
               </mml:cablegroup>

                <mml:cablegroup name="OneSecGrp_SectionRef_79">
                    <mml:cable id="77"/>
               </mml:cablegroup>

                <mml:cablegroup name="OneSecGrp_SectionRef_80">
                    <mml:cable id="78"/>
               </mml:cablegroup>

                <mml:cablegroup name="OneSecGrp_SectionRef_81">
                    <mml:cable id="79"/>
               </mml:cablegroup>

                <mml:cablegroup name="OneSecGrp_SectionRef_82">
                    <mml:cable id="80"/>
               </mml:cablegroup>

                <mml:cablegroup name="OneSecGrp_SectionRef_83">
                    <mml:cable id="81"/>
               </mml:cablegroup>

                <mml:cablegroup name="OneSecGrp_SectionRef_84">
                    <mml:cable id="82"/>
               </mml:cablegroup>

                <mml:cablegroup name="OneSecGrp_SectionRef_85">
                    <mml:cable id="83"/>
               </mml:cablegroup>

                <mml:cablegroup name="OneSecGrp_SectionRef_86">
                    <mml:cable id="84"/>
               </mml:cablegroup>

                <mml:cablegroup name="OneSecGrp_SectionRef_87">
                    <mml:cable id="85"/>
               </mml:cablegroup>

                <mml:cablegroup name="OneSecGrp_SectionRef_88">
                    <mml:cable id="86"/>
               </mml:cablegroup>

                <mml:cablegroup name="OneSecGrp_SectionRef_89">
                    <mml:cable id="87"/>
               </mml:cablegroup>

                <mml:cablegroup name="OneSecGrp_SectionRef_90">
                    <mml:cable id="88"/>
               </mml:cablegroup>

                <mml:cablegroup name="OneSecGrp_SectionRef_91">
                    <mml:cable id="89"/>
               </mml:cablegroup>

                <mml:cablegroup name="OneSecGrp_SectionRef_92">
                    <mml:cable id="90"/>
               </mml:cablegroup>

                <mml:cablegroup name="OneSecGrp_SectionRef_93">
                    <mml:cable id="91"/>
               </mml:cablegroup>

                <mml:cablegroup name="OneSecGrp_SectionRef_94">
                    <mml:cable id="92"/>
               </mml:cablegroup>

                <mml:cablegroup name="OneSecGrp_SectionRef_95">
                    <mml:cable id="93"/>
               </mml:cablegroup>

                <mml:cablegroup name="OneSecGrp_SectionRef_96">
                    <mml:cable id="94"/>
               </mml:cablegroup>

                <mml:cablegroup name="OneSecGrp_SectionRef_97">
                    <mml:cable id="95"/>
               </mml:cablegroup>

                <mml:cablegroup name="OneSecGrp_SectionRef_98">
                    <mml:cable id="96"/>
               </mml:cablegroup>

                <mml:cablegroup name="OneSecGrp_SectionRef_99">
                    <mml:cable id="97"/>
               </mml:cablegroup>

                <mml:cablegroup name="OneSecGrp_SectionRef_100">
                    <mml:cable id="98"/>
               </mml:cablegroup>

                <mml:cablegroup name="OneSecGrp_SectionRef_101">
                    <mml:cable id="99"/>
               </mml:cablegroup>

                <mml:cablegroup name="OneSecGrp_SectionRef_102">
                    <mml:cable id="100"/>
               </mml:cablegroup>

                <mml:cablegroup name="OneSecGrp_SectionRef_103">
                    <mml:cable id="101"/>
               </mml:cablegroup>

                <mml:cablegroup name="OneSecGrp_SectionRef_104">
                    <mml:cable id="102"/>
               </mml:cablegroup>

                <mml:cablegroup name="OneSecGrp_SectionRef_105">
                    <mml:cable id="103"/>
               </mml:cablegroup>

                <mml:cablegroup name="OneSecGrp_SectionRef_106">
                    <mml:cable id="104"/>
               </mml:cablegroup>

                <mml:cablegroup name="OneSecGrp_SectionRef_107">
                    <mml:cable id="105"/>
               </mml:cablegroup>

                <mml:cablegroup name="OneSecGrp_SectionRef_108">
                    <mml:cable id="106"/>
               </mml:cablegroup>

                <mml:cablegroup name="OneSecGrp_SectionRef_109">
                    <mml:cable id="107"/>
               </mml:cablegroup>

                <mml:cablegroup name="OneSecGrp_SectionRef_110">
                    <mml:cable id="108"/>
               </mml:cablegroup>

                <mml:cablegroup name="OneSecGrp_SectionRef_111">
                    <mml:cable id="109"/>
               </mml:cablegroup>

                <mml:cablegroup name="OneSecGrp_SectionRef_112">
                    <mml:cable id="110"/>
               </mml:cablegroup>

                <mml:cablegroup name="OneSecGrp_SectionRef_113">
                    <mml:cable id="111"/>
               </mml:cablegroup>

                <mml:cablegroup name="OneSecGrp_SectionRef_114">
                    <mml:cable id="112"/>
               </mml:cablegroup>

                <mml:cablegroup name="OneSecGrp_SectionRef_115">
                    <mml:cable id="113"/>
               </mml:cablegroup>

                <mml:cablegroup name="OneSecGrp_SectionRef_116">
                    <mml:cable id="114"/>
               </mml:cablegroup>

                <mml:cablegroup name="OneSecGrp_SectionRef_117">
                    <mml:cable id="115"/>
               </mml:cablegroup>

                <mml:cablegroup name="OneSecGrp_SectionRef_118">
                    <mml:cable id="116"/>
               </mml:cablegroup>

                <mml:cablegroup name="OneSecGrp_SectionRef_119">
                    <mml:cable id="117"/>
               </mml:cablegroup>

                <mml:cablegroup name="OneSecGrp_SectionRef_120">
                    <mml:cable id="118"/>
               </mml:cablegroup>

                <mml:cablegroup name="OneSecGrp_SectionRef_121">
                    <mml:cable id="119"/>
               </mml:cablegroup>

                <mml:cablegroup name="OneSecGrp_SectionRef_122">
                    <mml:cable id="120"/>
               </mml:cablegroup>

                <mml:cablegroup name="OneSecGrp_SectionRef_123">
                    <mml:cable id="121"/>
               </mml:cablegroup>

                <mml:cablegroup name="OneSecGrp_SectionRef_124">
                    <mml:cable id="122"/>
               </mml:cablegroup>

                <mml:cablegroup name="OneSecGrp_SectionRef_125">
                    <mml:cable id="123"/>
               </mml:cablegroup>

                <mml:cablegroup name="OneSecGrp_SectionRef_126">
                    <mml:cable id="124"/>
               </mml:cablegroup>

                <mml:cablegroup name="OneSecGrp_SectionRef_127">
                    <mml:cable id="125"/>
               </mml:cablegroup>

                <mml:cablegroup name="OneSecGrp_SectionRef_128">
                    <mml:cable id="126"/>
               </mml:cablegroup>

                <mml:cablegroup name="OneSecGrp_SectionRef_129">
                    <mml:cable id="127"/>
               </mml:cablegroup>

                <mml:cablegroup name="OneSecGrp_SectionRef_130">
                    <mml:cable id="128"/>
               </mml:cablegroup>

                <mml:cablegroup name="OneSecGrp_SectionRef_131">
                    <mml:cable id="129"/>
               </mml:cablegroup>

                <mml:cablegroup name="OneSecGrp_SectionRef_132">
                    <mml:cable id="130"/>
               </mml:cablegroup>

                <mml:cablegroup name="OneSecGrp_SectionRef_133">
                    <mml:cable id="131"/>
               </mml:cablegroup>

                <mml:cablegroup name="OneSecGrp_SectionRef_134">
                    <mml:cable id="132"/>
               </mml:cablegroup>

                <mml:cablegroup name="OneSecGrp_SectionRef_135">
                    <mml:cable id="133"/>
               </mml:cablegroup>

                <mml:cablegroup name="OneSecGrp_SectionRef_136">
                    <mml:cable id="134"/>
               </mml:cablegroup>

                <mml:cablegroup name="OneSecGrp_SectionRef_137">
                    <mml:cable id="135"/>
               </mml:cablegroup>

                <mml:cablegroup name="OneSecGrp_SectionRef_138">
                    <mml:cable id="136"/>
               </mml:cablegroup>

                <mml:cablegroup name="OneSecGrp_SectionRef_139">
                    <mml:cable id="137"/>
               </mml:cablegroup>

                <mml:cablegroup name="OneSecGrp_SectionRef_140">
                    <mml:cable id="138"/>
               </mml:cablegroup>

                <mml:cablegroup name="OneSecGrp_SectionRef_141">
                    <mml:cable id="139"/>
               </mml:cablegroup>

                <mml:cablegroup name="OneSecGrp_SectionRef_142">
                    <mml:cable id="140"/>
               </mml:cablegroup>

                <mml:cablegroup name="OneSecGrp_SectionRef_143">
                    <mml:cable id="141"/>
               </mml:cablegroup>

                <mml:cablegroup name="OneSecGrp_SectionRef_144">
                    <mml:cable id="142"/>
               </mml:cablegroup>

                <mml:cablegroup name="OneSecGrp_SectionRef_145">
                    <mml:cable id="143"/>
               </mml:cablegroup>

                <mml:cablegroup name="OneSecGrp_SectionRef_146">
                    <mml:cable id="144"/>
               </mml:cablegroup>

                <mml:cablegroup name="OneSecGrp_SectionRef_147">
                    <mml:cable id="145"/>
               </mml:cablegroup>

                <mml:cablegroup name="OneSecGrp_SectionRef_148">
                    <mml:cable id="146"/>
               </mml:cablegroup>

                <mml:cablegroup name="OneSecGrp_SectionRef_149">
                    <mml:cable id="147"/>
               </mml:cablegroup>

                <mml:cablegroup name="OneSecGrp_SectionRef_150">
                    <mml:cable id="148"/>
               </mml:cablegroup>

                <mml:cablegroup name="OneSecGrp_SectionRef_151">
                    <mml:cable id="149"/>
               </mml:cablegroup>

                <mml:cablegroup name="OneSecGrp_SectionRef_152">
                    <mml:cable id="150"/>
               </mml:cablegroup>

                <mml:cablegroup name="OneSecGrp_SectionRef_153">
                    <mml:cable id="151"/>
               </mml:cablegroup>

                <mml:cablegroup name="OneSecGrp_SectionRef_154">
                    <mml:cable id="152"/>
               </mml:cablegroup>

                <mml:cablegroup name="OneSecGrp_SectionRef_155">
                    <mml:cable id="153"/>
               </mml:cablegroup>

                <mml:cablegroup name="OneSecGrp_SectionRef_156">
                    <mml:cable id="154"/>
               </mml:cablegroup>

                <mml:cablegroup name="OneSecGrp_SectionRef_157">
                    <mml:cable id="155"/>
               </mml:cablegroup>

                <mml:cablegroup name="OneSecGrp_SectionRef_158">
                    <mml:cable id="156"/>
               </mml:cablegroup>

                <mml:cablegroup name="OneSecGrp_SectionRef_159">
                    <mml:cable id="157"/>
               </mml:cablegroup>

                <mml:cablegroup name="OneSecGrp_SectionRef_160">
                    <mml:cable id="158"/>
               </mml:cablegroup>

                <mml:cablegroup name="OneSecGrp_SectionRef_161">
                    <mml:cable id="159"/>
               </mml:cablegroup>

                <mml:cablegroup name="OneSecGrp_SectionRef_162">
                    <mml:cable id="160"/>
               </mml:cablegroup>

                <mml:cablegroup name="OneSecGrp_SectionRef_163">
                    <mml:cable id="161"/>
               </mml:cablegroup>

                <mml:cablegroup name="OneSecGrp_SectionRef_164">
                    <mml:cable id="162"/>
               </mml:cablegroup>

                <mml:cablegroup name="OneSecGrp_SectionRef_165">
                    <mml:cable id="163"/>
               </mml:cablegroup>

                <mml:cablegroup name="OneSecGrp_SectionRef_166">
                    <mml:cable id="164"/>
               </mml:cablegroup>

                <mml:cablegroup name="OneSecGrp_SectionRef_167">
                    <mml:cable id="165"/>
               </mml:cablegroup>

                <mml:cablegroup name="OneSecGrp_SectionRef_168">
                    <mml:cable id="166"/>
               </mml:cablegroup>

                <mml:cablegroup name="OneSecGrp_SectionRef_169">
                    <mml:cable id="167"/>
               </mml:cablegroup>

                <mml:cablegroup name="OneSecGrp_SectionRef_170">
                    <mml:cable id="168"/>
               </mml:cablegroup>

                <mml:cablegroup name="OneSecGrp_SectionRef_171">
                    <mml:cable id="169"/>
               </mml:cablegroup>

                <mml:cablegroup name="OneSecGrp_SectionRef_172">
                    <mml:cable id="170"/>
               </mml:cablegroup>

                <mml:cablegroup name="OneSecGrp_SectionRef_173">
                    <mml:cable id="171"/>
               </mml:cablegroup>

                <mml:cablegroup name="OneSecGrp_SectionRef_174">
                    <mml:cable id="172"/>
               </mml:cablegroup>
            </mml:cables>

            <!--Adding the biophysical parameters-->

            <biophysics units="Physiological Units">

                <bio:mechanism name="kdr" type="Channel Mechanism">
                    <bio:parameter name="gmax" value="10.0">
                        <bio:group>all</bio:group>
                    </bio:parameter>
                </bio:mechanism>

                <bio:mechanism name="kap" type="Channel Mechanism">
                    <bio:parameter name="gmax" value="30.0">
                        <bio:group>axon_group</bio:group>
                        <bio:group>soma_group</bio:group>
                    </bio:parameter>
                </bio:mechanism>

                <bio:mechanism name="hd" type="Channel Mechanism">
                    <bio:parameter name="gmax" value="-1.0E8">
                        <bio:group>ModelViewParmSubset_5</bio:group>
                    </bio:parameter>
                    <bio:parameter name="vhalfl" value="-81.0">    <!--Note: Units of extra parameters are not known, except if it's e!!-->

                        <bio:group>ModelViewParmSubset_5</bio:group>
                    </bio:parameter>
                </bio:mechanism>

                <bio:mechanism name="pas" type="Channel Mechanism" passive_conductance="true">
                    <bio:parameter name="e" value="-58.0">
                        <bio:group>all</bio:group>
                    </bio:parameter>
                    <bio:parameter name="gmax" value="0.0357143">
                        <bio:group>all</bio:group>
                    </bio:parameter>
                </bio:mechanism>

                <bio:mechanism name="hd" type="Channel Mechanism">
                    <bio:parameter name="gmax" value="-1.0E8">
                        <bio:group>ModelViewParmSubset_7</bio:group>
                    </bio:parameter>
                    <bio:parameter name="vhalfl" value="-73.0">    <!--Note: Units of extra parameters are not known, except if it's e!!-->

                        <bio:group>ModelViewParmSubset_7</bio:group>
                    </bio:parameter>
                </bio:mechanism>

                <bio:mechanism name="hd" type="Channel Mechanism">
                    <bio:parameter name="gmax" value="0.05">
                        <bio:group>soma_group</bio:group>
                    </bio:parameter>
                    <bio:parameter name="vhalfl" value="-73.0">    <!--Note: Units of extra parameters are not known, except if it's e!!-->

                        <bio:group>soma_group</bio:group>
                    </bio:parameter>
                </bio:mechanism>

                <bio:mechanism name="nax" type="Channel Mechanism">
                    <bio:parameter name="gmax" value="125.0">
                        <bio:group>OneSecGrp_SectionRef_5</bio:group>
                    </bio:parameter>
                </bio:mechanism>

                <bio:mechanism name="na3" type="Channel Mechanism">
                    <bio:parameter name="gmax" value="25.0">
                        <bio:group>ModelViewParmSubset_2</bio:group>
                    </bio:parameter>
                    <bio:parameter name="ar" value="1.0">    <!--Note: Units of extra parameters are not known, except if it's e!!-->

                        <bio:group>ModelViewParmSubset_2</bio:group>
                    </bio:parameter>
                </bio:mechanism>    <!--kap with param: gmax = f(p) = (H(100 + ((-1) * p)) * 3.0E-7) * (1 + (p / 100)) on ParameterisedGroup: PathLengthOverDendrites on: dendrite_group with metric: Path Length from root (NO_TRANSLATION, NO_NORMALISATION), var: p-->

                <bio:mechanism name="kap" type="Channel Mechanism">
                    <bio:variable_parameter name="gmax">
                        <bio:group>dendrite_group</bio:group>
                        <bio:inhomogeneous_value param_name="PathLengthOverDendrites" value="1.0E8 * (sign(100 + ((-1) * p))*(100 + ((-1) * p)) * 3.0E-7) * (1 + (p / 100))"/>    <!--Note: conversion factor (1.0E8 * ) included to convert to units: GENESIS Physiological Units-->

                    </bio:variable_parameter>
                </bio:mechanism>    <!--hd with param: gmax = f(p) = 5.0E-10 * (1 + ((3 * p) / 100)) on ParameterisedGroup: PathLengthOverDendrites on: dendrite_group with metric: Path Length from root (NO_TRANSLATION, NO_NORMALISATION), var: p-->

                <bio:mechanism name="hd" type="Channel Mechanism">
                    <bio:variable_parameter name="gmax">
                        <bio:group>dendrite_group</bio:group>
                        <bio:inhomogeneous_value param_name="PathLengthOverDendrites" value="1.0E8 * 5.0E-10 * (1 + ((3 * p) / 100))"/>    <!--Note: conversion factor (1.0E8 * ) included to convert to units: GENESIS Physiological Units-->

                    </bio:variable_parameter>
                </bio:mechanism>    <!--kad with param: gmax = f(p) = (H(p - 100) * 3.0E-7) * (1 + (p / 100)) on ParameterisedGroup: PathLengthOverDendrites on: dendrite_group with metric: Path Length from root (NO_TRANSLATION, NO_NORMALISATION), var: p-->

                <bio:mechanism name="kad" type="Channel Mechanism">
                    <bio:variable_parameter name="gmax">
                        <bio:group>dendrite_group</bio:group>
                        <bio:inhomogeneous_value param_name="PathLengthOverDendrites" value="1.0E8 * (sign(p - 100)*(p - 100) * 3.0E-7) * (1 + (p / 100))"/>    <!--Note: conversion factor (1.0E8 * ) included to convert to units: GENESIS Physiological Units-->

                    </bio:variable_parameter>
                </bio:mechanism>

                <bio:spec_capacitance>
                    <bio:parameter value="1.0">
                        <bio:group>all</bio:group>
                    </bio:parameter>
                </bio:spec_capacitance>

                <bio:spec_axial_resistance>
                    <bio:parameter value="0.15">
                        <bio:group>ModelViewParmSubset_2</bio:group>
                    </bio:parameter>

                    <bio:parameter value="0.05">
                        <bio:group>OneSecGrp_SectionRef_5</bio:group>
                    </bio:parameter>
                </bio:spec_axial_resistance>

                <bio:init_memb_potential>
                    <bio:parameter value="-65.0">
                        <bio:group>all</bio:group>
                    </bio:parameter>
                </bio:init_memb_potential>

                <bio:ion_props name="k">
                    <bio:parameter name="e" value="-90.0">
                        <bio:group>all</bio:group>
                    </bio:parameter>
                </bio:ion_props>

                <bio:ion_props name="na">
                    <bio:parameter name="e" value="50.0">
                        <bio:group>all</bio:group>
                    </bio:parameter>
                </bio:ion_props>
            </biophysics>

            <connectivity/>

        </cell>
    </cells>
</neuroml>
