<?xml version="1.0" encoding="UTF-8"?>

<channelml xmlns="http://morphml.org/channelml/schema"
    xmlns:xsi="http://www.w3.org/2001/XMLSchema-instance"
    xmlns:meta="http://morphml.org/metadata/schema"
    xsi:schemaLocation="http://morphml.org/channelml/schema   http://www.neuroml.org/NeuroMLValidator/NeuroMLFiles/Schemata/v1.8.1/Level2/ChannelML_v1.8.1.xsd"
    units="SI Units">

    <meta:notes>A cell mechanism for creating a simple integrate and fire cell</meta:notes>

    <channel_type name="IaF">

        <meta:notes>A simple integrate and fire mechanism, for MOOSE where g_refrac is not implemented yet</meta:notes>

        <current_voltage_relation cond_law="integrate_and_fire">

            <integrate_and_fire threshold="-0.050" t_refrac="0.0" v_reset="-0.060" g_refrac="1e20"/>
            <!-- Very high g_refrac will ensure Vm = v_reset for t_refrac time. But not implemented in MOOSE yet. -->

        </current_voltage_relation>

    </channel_type>

</channelml>
