<?xml version="1.0" ?>
<neuroml lengthUnits="micrometer" xmlns="http://morphml.org/neuroml/schema" xmlns:bio="http://morphml.org/biophysics/schema" xmlns:cml="http://morphml.org/channelml/schema" xmlns:meta="http://morphml.org/metadata/schema" xmlns:mml="http://morphml.org/morphml/schema" xmlns:nml="http://morphml.org/networkml/schema" xmlns:xsi="http://www.w3.org/2001/XMLSchema-instance" xsi:schemaLocation="http://morphml.org/neuroml/schema">
	<meta:notes>
		Fully instantiated network model of Olfactory Bulb by Aditya Gilra, NCBS, Bangalore, India, 2010.
	</meta:notes>
	<populations xmlns="http://morphml.org/networkml/schema">
		<population cell_type="mitral" name="mitrals">
			<instances size="4">
				<instance id="0">
					<location x="-45.4390697915" y="-29.6553025138" z="300.0"/>
					<meta:notes>
						zrotation=4.45555739853
					</meta:notes>
				</instance>
				<instance id="1">
					<location x="-35.7151503729" y="36.0010987511" z="300.0"/>
					<meta:notes>
						zrotation=1.67580256963
					</meta:notes>
				</instance>
				<instance id="2">
					<location x="-850.970494448" y="-96.551478724" z="300.0"/>
					<meta:notes>
						zrotation=0.107490103564
					</meta:notes>
				</instance>
				<instance id="3">
					<location x="-783.922262134" y="-113.35098535" z="300.0"/>
					<meta:notes>
						zrotation=5.37465229285
					</meta:notes>
				</instance>
			</instances>
		</population>
		<population cell_type="granule" name="granules_singles">
			<instances size="128">
				<instance id="0">
					<location x="-2366.0" y="170.0" z="0.0"/>
				</instance>
				<instance id="1">
					<location x="-2138.0" y="46.0" z="0.0"/>
				</instance>
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			</instances>
		</population>
		<population cell_type="granule" name="granules_joints">
			<instances size="45">
				<instance id="0">
					<location x="-1076.0" y="-444.0" z="0.0"/>
				</instance>
				<instance id="1">
					<location x="-858.0" y="44.0" z="0.0"/>
				</instance>
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			</instances>
		</population>
		<population cell_type="granule" name="granules_multis">
			<instances size="2">
				<instance id="0">
					<location x="-258.0" y="552.0" z="0.0"/>
				</instance>
				<instance id="1">
					<location x="-52.0" y="-6.0" z="0.0"/>
				</instance>
			</instances>
		</population>
		<population cell_type="PG" name="PGs">
			<instances size="37">
				<instance id="0">
					<location x="-100.0" y="-40.0" z="1050.0"/>
				</instance>
				<instance id="1">
					<location x="-100.0" y="20.0" z="1050.0"/>
				</instance>
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			</instances>
		</population>
	</populations>
</neuroml>
