<?xml version="1.0" ?>
<neuroml lengthUnits="micrometer" xmlns="http://morphml.org/neuroml/schema" xmlns:bio="http://morphml.org/biophysics/schema" xmlns:cml="http://morphml.org/channelml/schema" xmlns:meta="http://morphml.org/metadata/schema" xmlns:mml="http://morphml.org/morphml/schema" xmlns:nml="http://morphml.org/networkml/schema" xmlns:xsi="http://www.w3.org/2001/XMLSchema-instance" xsi:schemaLocation="http://morphml.org/neuroml/schema">
	<meta:notes>
		Fully instantiated network model of Olfactory Bulb by Aditya Gilra, NCBS, Bangalore, India, 2010.
	</meta:notes>
	<populations xmlns="http://morphml.org/networkml/schema">
		<population cell_type="mitral" name="mitrals">
			<instances size="6">
				<instance id="0">
					<location x="-17.3287656701" y="-36.1248962639" z="300.0"/>
					<meta:notes>
						zrotation=1.51838909902
					</meta:notes>
				</instance>
				<instance id="1">
					<location x="7.88263389615" y="40.6892314855" z="300.0"/>
					<meta:notes>
						zrotation=0.639183861167
					</meta:notes>
				</instance>
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			</instances>
		</population>
		<population cell_type="granule" name="granules_singles">
			<instances size="564">
				<instance id="0">
					<location x="-1756.0" y="814.0" z="0.0"/>
				</instance>
				<instance id="1">
					<location x="-1696.0" y="-542.0" z="0.0"/>
				</instance>
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			</instances>
		</population>
		<population cell_type="granule" name="granules_joints">
			<instances size="1929">
				<instance id="0">
					<location x="-1496.0" y="-14.0" z="0.0"/>
				</instance>
				<instance id="1">
					<location x="-1492.0" y="30.0" z="0.0"/>
				</instance>
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			</instances>
		</population>
		<population cell_type="granule" name="granules_multis">
			<instances size="78">
				<instance id="0">
					<location x="-646.0" y="-238.0" z="0.0"/>
				</instance>
				<instance id="1">
					<location x="-456.0" y="-166.0" z="0.0"/>
				</instance>
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			</instances>
		</population>
		<population cell_type="PG" name="PGs">
			<instances size="110">
				<instance id="0">
					<location x="-85.8578643763" y="-57.5735931288" z="1050.0"/>
				</instance>
				<instance id="1">
					<location x="-85.8578643763" y="55.563491861" z="1050.0"/>
				</instance>
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			</instances>
		</population>
	</populations>
</neuroml>
