<?xml version='1.0' encoding='UTF-8'?>
<neuroml xmlns='http://morphml.org/neuroml/schema' xmlns:meta='http://morphml.org/metadata/schema' xmlns:nml='http://morphml.org/networkml/schema' xmlns:bio='http://morphml.org/biophysics/schema' xmlns:cml='http://morphml.org/channelml/schema' xmlns:mml='http://morphml.org/morphml/schema' xmlns:xsi='http://www.w3.org/2001/XMLSchema-instance' lengthUnits='micrometer' xsi:schemaLocation='http://morphml.org/neuroml/schema'>
  <meta:notes>Fully instantiated network model of Olfactory Bulb by Aditya Gilra, NCBS, Bangalore, India, 2010.</meta:notes>
  <populations xmlns='http://morphml.org/networkml/schema'>
    <population cell_type='mitral' name='mitrals'>
      <instances size='4'>
        <instance id='0'>
          <location y='0.0' x='0.0' z='300.0'/>
          <meta:notes>zrotation=0.915266923378</meta:notes>
        </instance>
        <instance id='1'>
          <location y='13.539190283' x='-2.2536497743' z='300.0'/>
          <meta:notes>zrotation=4.43287034149</meta:notes>
        </instance>
        <instance id='2'>
          <location y='0.0' x='100.0' z='300.0'/>
          <meta:notes>zrotation=1.88732185889</meta:notes>
        </instance>
        <instance id='3'>
          <location y='-3.06398520406' x='88.3574095541' z='300.0'/>
          <meta:notes>zrotation=4.26996423639</meta:notes>
        </instance>
      </instances>
    </population>
    <population cell_type='granule' name='granules_singles'>
      <instances size='356'>
        <instance id='0'>
          <location y='-90.0' x='-1100.0' z='0.0'/>
        </instance>
        <instance id='1'>
          <location y='-4.0' x='-1088.0' z='0.0'/>
        </instance>
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      </instances>
    </population>
    <population cell_type='granule' name='granules_joints'>
      <instances size='695'>
        <instance id='0'>
          <location y='-60.0' x='-688.0' z='0.0'/>
        </instance>
        <instance id='1'>
          <location y='-22.0' x='-602.0' z='0.0'/>
        </instance>
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      </instances>
    </population>
    <population cell_type='granule' name='granules_multis'>
      <instances size='46'>
        <instance id='0'>
          <location y='-18.0' x='-44.0' z='0.0'/>
        </instance>
        <instance id='1'>
          <location y='6.0' x='-38.0' z='0.0'/>
        </instance>
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      </instances>
    </population>
    <population cell_type='PG' name='PGs'>
      <instances size='74'>
        <instance id='0'>
          <location y='34.8528137424' x='-35.8578643763' z='1050.0'/>
        </instance>
        <instance id='1'>
          <location y='119.705627485' x='-35.8578643763' z='1050.0'/>
        </instance>
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      </instances>
    </population>
  </populations>
</neuroml>
