<?xml version="1.0" encoding="UTF-8"?>

<channelml xmlns="http://morphml.org/channelml/schema"
    xmlns:xsi="http://www.w3.org/2001/XMLSchema-instance"
    xmlns:meta="http://morphml.org/metadata/schema"
    xsi:schemaLocation="http://morphml.org/channelml/schema  http://www.neuroml.org/NeuroMLValidator/NeuroMLFiles/Schemata/v1.8.1/Level2/ChannelML_v1.8.1.xsd"
    units="SI Units">

    <meta:notes>GABA receptor synchan, 2 ms tau. </meta:notes>

	<synapse_type name = "GABA">
		<status value = "stable"/>
		<meta:notes>Simple double exponential waveform GABA synapse</meta:notes>
		<doub_exp_syn max_conductance="1.0E-9" rise_time="2e-3" decay_time="2e-3" reversal_potential="-70.0e-3"/>
	</synapse_type>
</channelml>
