// SBML level 3 version 1

model c_m()
  // model units - substance: substance, time: time, volume: volume, area: area, length: length, extent: substance

  // Compartments:
  compartment dend_455_0_ = 1e-12 volume;

  // Species:
  species IRSp53_dimer_463_0_ in dend_455_0_ = 0.0012;
  // We should note that binding to IBAR halts PIP2 lateral diffusion Zhao et al., Cell reports, 2013
  species IP_clx_465_0_ in dend_455_0_ = 0;
  species IRSp53_467_0_ in dend_455_0_ = 0.0012;
  species Rad_469_0_ in dend_455_0_ = 1.648351e-18;
  // This should have diffusion proportional to the curvature formed.
  species curv_IRSp53_471_0_ in dend_455_0_ = 0;
  species Ipool_473_0_ in dend_455_0_ = 0;
  species sort_475_0_ in dend_455_0_ = 0;
  species IRSp53_a_477_0_ in dend_455_0_ = 0;
  species Cdc42_479_0_ in dend_455_0_ = 0;
  species Eps8_481_0_ in dend_455_0_ = 0.00083;
  species IRSp53_m_483_0_ in dend_455_0_ = 0;
  species sort_func_485_0_ in dend_455_0_ = 0;
  species detach_487_0_ in dend_455_0_ = 0;
  species VASP_489_0_ in dend_455_0_ = 0.0035;
  species Gactin_491_0_ in dend_455_0_ = 0.01;
  species $tot_CaMKII_493_0_ in dend_455_0_;
  species $tot_CaM_CaMKII_495_0_ in dend_455_0_;
  // Basal CaMKII is set to zero here.
  species basal_CaMKII_497_0_ in dend_455_0_ = 0;
  species CaMKII_thr286_CaM_499_0_ in dend_455_0_ = 0;
  species CaMKII_CaM_501_0_ in dend_455_0_ = 0;
  species CaMKII_thr286_503_0_ in dend_455_0_ = 0;
  species CaMKII_505_0_ in dend_455_0_ = 0.03;
  species CaMKII_thr305_507_0_ in dend_455_0_ = 0;
  species CaMKII_p_p_p_509_0_ in dend_455_0_ = 0;
  species CaMKII_xchange_511_0_ in dend_455_0_ = 0;
  species $actCaMKII_513_0_ in dend_455_0_;
  // Guanine nucleotide exchange factor. This activates raf by exchanging bound GDP with GTP. I have left the GDP/GTP out of this reaction, it would be trivial to put them in. See Boguski _and McCormick. Possible candidate molecules: RasGRF, smgGDS, Vav (in dispute). rasGRF: Kcat= 1.2/min Km = 680 nM smgGDS: Kcat: 0.37 /min, Km = 220 nM. vav: Turnover up over baseline by 10X,
  species GEF_Gprot_bg_515_0_ in dend_455_0_ = 0;
  // Assume that SoS is present only at 50 nM. Revised to 100 nM to get equil to experimentally known levels.
  species inact_GEF_517_0_ in dend_455_0_ = 0.0001;
  // phosphorylated and thereby activated form of GEF. See, e.g. Orita et al JBC 268:34 25542-25546 1993, Gulbins et al. It is not clear whether there is major specificity for tyr or ser/thr.
  species GEF_p_519_0_ in dend_455_0_ = 0;
  // Only a very small fraction (7% unstim, 15% stim) of ras is GTP-bound. Gibbs et al JBC 265(33) 20437
  species GTP_Ras_521_0_ in dend_455_0_ = 0;
  // GDP bound form. See Rosen et al Neuron 12 1207-1221 June 1994. the activation loop is based on Boguski and McCormick Nature 366 643-654 93 Assume Ras is present at about the same level as craf-1, 0.2 uM. Hallberg et al JBC 269:6 3913-3916 1994 estimate upto 5-10% of cellular Raf is assoc with Ras. Given that only 5-10% of Ras is GTP-bound, we need similar amounts of Ras as Raf.
  species GDP_Ras_523_0_ in dend_455_0_ = 0.0002;
  species GAP_p_525_0_ in dend_455_0_ = 0;
  // GTPase-activating proteins. See Boguski and McCormick. Turn off Ras by helping to hydrolyze bound GTP. This one is probably NF1, ie., Neurofibromin as it is inhibited by AA and lipids, and expressed in neural cells. p120-GAP is also a possible candidate, but is less regulated. Both may exist at similar levels. See Eccleston et al JBC 268(36) pp27012-19 Level=.002
  species GAP_527_0_ in dend_455_0_ = 2e-6;
  // Phosphorylation-inactivated form of GEF. See Hordijk et al JBC 269:5 3534-3538 1994 and Buregering et al EMBO J 12:11 4211-4220 1993
  species inact_GEF_p_529_0_ in dend_455_0_ = 0;
  // See Farnsworth et al Nature 376 524-527 1995
  species CaM_GEF_531_0_ in dend_455_0_ = 0;
  // There is a LOT of this in the cell: upto 1% of total protein mass. (Alberts et al) Say 25 uM. Meyer et al Science 256 1199-1202 1992 refer to studies saying it is comparable to CaMK levels.
  species CaM_533_0_ in dend_455_0_ = 0.02;
  species CaM_Ca3_535_0_ in dend_455_0_ = 0;
  // This is the intermediate where the TR2 end (the high-affinity end) has bound the Ca but the TR1 end has not.
  species CaM_Ca2_537_0_ in dend_455_0_ = 0;
  // This is the intermediate where the TR2 end (the high-affinity end) has bound the Ca but the TR1 end has not.
  species CaM_Ca_539_0_ in dend_455_0_ = 0;
  species CaM_Ca4_541_0_ in dend_455_0_ = 0;
  species CaM_xchange_543_0_ in dend_455_0_ = 0;
  species $tot_auto_545_0_ in dend_455_0_;
  species $_286P_547_0_ in dend_455_0_;
  species CaM_CaN_549_0_ in dend_455_0_ = 0;
  // Strack et al JBC 1997 show that PP2A is the primary phosphatase acting on CaMKII in the bulk.
  species PP2A_551_0_ in dend_455_0_ = 0.006;
  species CaN_553_0_ in dend_455_0_ = 0.001;
  species Ca2_CaN_555_0_ in dend_455_0_ = 0;
  species Ca_557_0_ in dend_455_0_ = 0;
  species PP1_active_559_0_ in dend_455_0_ = 0.006;
  species PP1_I1_p_561_0_ in dend_455_0_ = 0;
  species I1_p_563_0_ in dend_455_0_ = 0.004;
  species I1_565_0_ in dend_455_0_ = 0;
  species PKA_active_567_0_ in dend_455_0_ = 0;
  species $PKC_active_569_0_ in dend_455_0_ = 0;
  species PP1_I1_571_0_ in dend_455_0_ = 0;
  species Rac_GDP_573_0_ in dend_455_0_ = 0.001;
  // compared with AKT in Tolias, 2005. Conc of AKT is given as 0.2 uM in Docqs.
  species Tiam1_575_0_ in dend_455_0_ = 0;
  species Rac_GTP_577_0_ in dend_455_0_ = 0;
  species Cdc42_GDP_579_0_ in dend_455_0_ = 0.001;
  species Tiam_inact_581_0_ in dend_455_0_ = 0.0001;
  species IRSp53_temp_583_0_ in dend_455_0_ = 0;
  species tube_IRSp53_585_0_ in dend_455_0_ = 0;
  species $Metabolism_587_0_ in dend_455_0_ = 0.001;
  species $Metabolism_Tiam_act_589_0_ in dend_455_0_ = 0.0001;
  species $Metabolism_Tiam_inact_591_0_ in dend_455_0_ = 0.0001;
  species Cdc42_m_593_0_ in dend_455_0_ = 0;
  species Rac_m_595_0_ in dend_455_0_ = 0;
  species Factin_649_0_ in dend_455_0_ = 0;
  species IR_actin_651_0_ in dend_455_0_ = 0;
  species auton_autoph_cplx_746_0_ in dend_455_0_ = 0;
  species auton_286_cplx_749_0_ in dend_455_0_ = 0;
  species auton_305_cplx_752_0_ in dend_455_0_ = 0;
  species CaM_act_autoph_cplx_755_0_ in dend_455_0_ = 0;
  species CaM_act_305_cplx_758_0_ in dend_455_0_ = 0;
  species CaM_act_286_cplx_761_0_ in dend_455_0_ = 0;
  species Deph_thr286_cplx_764_0_ in dend_455_0_ = 0;
  species Deph_thr286b_cplx_767_0_ in dend_455_0_ = 0;
  species Deph_thr305_cplx_770_0_ in dend_455_0_ = 0;
  species Deph_thr286c_cplx_773_0_ in dend_455_0_ = 0;
  species Deph_thr305a_cplx_776_0_ in dend_455_0_ = 0;
  species Enz_cplx_779_0_ in dend_455_0_ = 0;
  species Enz_cplx_782_0_ in dend_455_0_ = 0;
  species Enz_cplx_785_0_ in dend_455_0_ = 0;
  species Enz1_cplx_788_0_ in dend_455_0_ = 0;
  species Enz_cplx_791_0_ in dend_455_0_ = 0;
  species Enz_cplx_794_0_ in dend_455_0_ = 0;
  species Enz_cplx_797_0_ in dend_455_0_ = 0;
  species Enz_cplx_800_0_ in dend_455_0_ = 0;
  species Enz_cplx_803_0_ in dend_455_0_ = 0;
  species PKC_inact_GAP_cplx_806_0_ in dend_455_0_ = 0;
  species PKC_act_GEF_cplx_809_0_ in dend_455_0_ = 0;
  species GEF_bg_act_Ras_cplx_812_0_ in dend_455_0_ = 0;
  species basal_GEF_activity_cplx_815_0_ in dend_455_0_ = 0;
  species GEF_p_act_Ras_cplx_818_0_ in dend_455_0_ = 0;
  species GAP_inact_Ras_cplx_821_0_ in dend_455_0_ = 0;
  species CaM_GEF_act_Ras_cplx_824_0_ in dend_455_0_ = 0;
  species PKA_phosph_GEF_cplx_827_0_ in dend_455_0_ = 0;
  species PKA_phosph_I1_cplx_830_0_ in dend_455_0_ = 0;
  species PP2A_dephospho_I1_cplx_833_0_ in dend_455_0_ = 0;
  species PP2A_dephospho_PP1_I_p_cplx_836_0_ in dend_455_0_ = 0;
  species Enz1_cplx_839_0_ in dend_455_0_ = 0;
  species Enz_cplx_842_0_ in dend_455_0_ = 0;
  species Enz_cplx_845_0_ in dend_455_0_ = 0;
  species Enz_cplx_848_0_ in dend_455_0_ = 0;

  // Assignment rules:
  tot_auto_545_0_ := CaMKII_thr286_503_0_ + CaMKII_p_p_p_509_0_ + basal_CaMKII_497_0_;
  tot_CaMKII_493_0_ := actCaMKII_513_0_ + CaMKII_505_0_ + CaMKII_thr305_507_0_;
  _286P_547_0_ := CaMKII_thr286_CaM_499_0_ + CaMKII_thr286_503_0_;
  tot_CaM_CaMKII_495_0_ := CaMKII_thr286_CaM_499_0_ + CaMKII_CaM_501_0_;
  actCaMKII_513_0_ := CaMKII_thr286_CaM_499_0_ + CaMKII_CaM_501_0_ + tot_auto_545_0_;

  // Reactions:
  // dend_455_0_ * Reac_663_0__Kf * IRSp53_dimer_463_0_*Cdc42_479_0_^2-dend_455_0_ * Reac_663_0__Kb * IRSp53_a_477_0_
  // sudhaharan et al., Kd
  Reac_663_0_: IRSp53_dimer_463_0_ + 2 Cdc42_479_0_ -> IRSp53_a_477_0_; dend_455_0_*Reac_663_0__Kf*IRSp53_dimer_463_0_*Cdc42_479_0_^2 - dend_455_0_*Reac_663_0__Kb*IRSp53_a_477_0_;
    Reac_663_0__Kf = 100000000 sq_litre_per_mmole_sq_per_second; Reac_663_0__Kb = 4 per_second;
  // dend_455_0_ * mod_sort_665_0__Kf * IRSp53_m_483_0_-dend_455_0_ * mod_sort_665_0__Kb * curv_IRSp53_471_0_
  mod_sort_665_0_: IRSp53_m_483_0_ -> curv_IRSp53_471_0_; dend_455_0_*mod_sort_665_0__Kf*IRSp53_m_483_0_ - dend_455_0_*mod_sort_665_0__Kb*curv_IRSp53_471_0_;
    mod_sort_665_0__Kf = 0.1 per_second; mod_sort_665_0__Kb = 0.2 per_second;
  // dend_455_0_ * mod_detach_667_0__Kf * curv_IRSp53_471_0_-dend_455_0_ * mod_detach_667_0__Kb * IRSp53_m_483_0_
  mod_detach_667_0_: curv_IRSp53_471_0_ -> IRSp53_m_483_0_; dend_455_0_*mod_detach_667_0__Kf*curv_IRSp53_471_0_ - dend_455_0_*mod_detach_667_0__Kb*IRSp53_m_483_0_;
    mod_detach_667_0__Kf = 0.1 per_second; mod_detach_667_0__Kb = 0.2 per_second;
  // dend_455_0_ * CaM_Ca3_bind_Ca_669_0__Kf * Ca_557_0_*CaM_Ca3_535_0_-dend_455_0_ * CaM_Ca3_bind_Ca_669_0__Kb * CaM_Ca4_541_0_
  // Use K3 = 21.5 uM here from Stemmer and Klee table 3. kb/kf =21.5 * 6e5 so kf = 7.75e-7, kb = 10
  CaM_Ca3_bind_Ca_669_0_: Ca_557_0_ + CaM_Ca3_535_0_ -> CaM_Ca4_541_0_; dend_455_0_*CaM_Ca3_bind_Ca_669_0__Kf*Ca_557_0_*CaM_Ca3_535_0_ - dend_455_0_*CaM_Ca3_bind_Ca_669_0__Kb*CaM_Ca4_541_0_;
    CaM_Ca3_bind_Ca_669_0__Kf = 1799.982 litre_per_mmole_per_second; CaM_Ca3_bind_Ca_669_0__Kb = 10 per_second;
  // dend_455_0_ * CaM_bind_Ca_671_0__Kf * CaM_533_0_*Ca_557_0_-dend_455_0_ * CaM_bind_Ca_671_0__Kb * CaM_Ca_539_0_
  // Lets use the fast rate consts here. Since the rates are so different, I am not sure whether the order is relevant. These correspond to the TR2C fragment. We use the Martin et al rates here, plus the Drabicowski binding consts. All are scaled by 3X to cell temp. kf = 2e-10 kb = 72 Stemmer _and Klee: K1=.9, K2=1.1. Assume 1.0uM for both. kb/kf=3.6e11. If kb=72, kf = 2e-10 (Exactly the same !) 19 May 2006. Splitting the old CaM-TR2-bind-Ca reaction into two steps, each binding 1 Ca. This improves numerical stability and is conceptually better too. Overall rates are the same, so each kf and kb is the square root of the earlier ones. So kf = 1.125e-4, kb = 8.4853
  CaM_bind_Ca_671_0_: CaM_533_0_ + Ca_557_0_ -> CaM_Ca_539_0_; dend_455_0_*CaM_bind_Ca_671_0__Kf*CaM_533_0_*Ca_557_0_ - dend_455_0_*CaM_bind_Ca_671_0__Kb*CaM_Ca_539_0_;
    CaM_bind_Ca_671_0__Kf = 8484.48 litre_per_mmole_per_second; CaM_bind_Ca_671_0__Kb = 8.4853 per_second;
  // dend_455_0_ * CaM_Ca2_bind_Ca_673_0__Kf * CaM_Ca2_537_0_*Ca_557_0_-dend_455_0_ * CaM_Ca2_bind_Ca_673_0__Kb * CaM_Ca3_535_0_
  // K3 = 21.5, K4 = 2.8. Assuming that the K4 step happens first, we get kb/kf = 2.8 uM = 1.68e6 so kf =6e-6 assuming kb = 10
  CaM_Ca2_bind_Ca_673_0_: CaM_Ca2_537_0_ + Ca_557_0_ -> CaM_Ca3_535_0_; dend_455_0_*CaM_Ca2_bind_Ca_673_0__Kf*CaM_Ca2_537_0_*Ca_557_0_ - dend_455_0_*CaM_Ca2_bind_Ca_673_0__Kb*CaM_Ca3_535_0_;
    CaM_Ca2_bind_Ca_673_0__Kf = 3600.072 litre_per_mmole_per_second; CaM_Ca2_bind_Ca_673_0__Kb = 10 per_second;
  // dend_455_0_ * CaM_Ca_bind_Ca_675_0__Kf * CaM_Ca_539_0_*Ca_557_0_-dend_455_0_ * CaM_Ca_bind_Ca_675_0__Kb * CaM_Ca2_537_0_
  // Lets use the fast rate consts here. Since the rates are so different, I am not sure whether the order is relevant. These correspond to the TR2C fragment. We use the Martin et al rates here, plus the Drabicowski binding consts. All are scaled by 3X to cell temp. kf = 2e-10 kb = 72 Stemmer _and Klee: K1=.9, K2=1.1. Assume 1.0uM for both. kb/kf=3.6e11. If kb=72, kf = 2e-10 (Exactly the same !) 19 May 2006. Splitting the old CaM-TR2-bind-Ca reaction into two steps, each binding 1 Ca. This improves numerical stability and is conceptually better too. Overall rates are the same, so each kf and kb is the square root of the earlier ones. So kf = 1.125e-4, kb = 8.4853
  CaM_Ca_bind_Ca_675_0_: CaM_Ca_539_0_ + Ca_557_0_ -> CaM_Ca2_537_0_; dend_455_0_*CaM_Ca_bind_Ca_675_0__Kf*CaM_Ca_539_0_*Ca_557_0_ - dend_455_0_*CaM_Ca_bind_Ca_675_0__Kb*CaM_Ca2_537_0_;
    CaM_Ca_bind_Ca_675_0__Kf = 8484.48 litre_per_mmole_per_second; CaM_Ca_bind_Ca_675_0__Kb = 8.4853 per_second;
  // dend_455_0_ * CaM_x2_677_0__Kf * CaM_533_0_-dend_455_0_ * CaM_x2_677_0__Kb * CaM_xchange_543_0_
  CaM_x2_677_0_: CaM_533_0_ -> CaM_xchange_543_0_; dend_455_0_*CaM_x2_677_0__Kf*CaM_533_0_ - dend_455_0_*CaM_x2_677_0__Kb*CaM_xchange_543_0_;
    CaM_x2_677_0__Kf = 1 per_second; CaM_x2_677_0__Kb = 100 per_second;
  // dend_455_0_ * CaMKII_thr286_bind_CaM_679_0__Kf * CaM_Ca4_541_0_*CaMKII_thr286_503_0_-dend_455_0_ * CaMKII_thr286_bind_CaM_679_0__Kb * CaMKII_thr286_CaM_499_0_
  // Same values as for the main compartment Can the main compartment pool of Ca/CaM be used?
  CaMKII_thr286_bind_CaM_679_0_: CaM_Ca4_541_0_ + CaMKII_thr286_503_0_ -> CaMKII_thr286_CaM_499_0_; dend_455_0_*CaMKII_thr286_bind_CaM_679_0__Kf*CaM_Ca4_541_0_*CaMKII_thr286_503_0_ - dend_455_0_*CaMKII_thr286_bind_CaM_679_0__Kb*CaMKII_thr286_CaM_499_0_;
    CaMKII_thr286_bind_CaM_679_0__Kf = 65669.4 litre_per_mmole_per_second; CaMKII_thr286_bind_CaM_679_0__Kb = 0.0022 per_second;
  // dend_455_0_ * CaMKII_bind_CaM_681_0__Kf * CaMKII_505_0_*CaM_Ca4_541_0_-dend_455_0_ * CaMKII_bind_CaM_681_0__Kb * CaMKII_CaM_501_0_
  CaMKII_bind_CaM_681_0_: CaMKII_505_0_ + CaM_Ca4_541_0_ -> CaMKII_CaM_501_0_; dend_455_0_*CaMKII_bind_CaM_681_0__Kf*CaMKII_505_0_*CaM_Ca4_541_0_ - dend_455_0_*CaMKII_bind_CaM_681_0__Kb*CaMKII_CaM_501_0_;
    CaMKII_bind_CaM_681_0__Kf = 65669.4 litre_per_mmole_per_second; CaMKII_bind_CaM_681_0__Kb = 2.2 per_second;
  // dend_455_0_ * CaMKII_x2_683_0__Kf * CaMKII_505_0_-dend_455_0_ * CaMKII_x2_683_0__Kb * CaMKII_xchange_511_0_
  CaMKII_x2_683_0_: CaMKII_505_0_ -> CaMKII_xchange_511_0_; dend_455_0_*CaMKII_x2_683_0__Kf*CaMKII_505_0_ - dend_455_0_*CaMKII_x2_683_0__Kb*CaMKII_xchange_511_0_;
    CaMKII_x2_683_0__Kf = 1 per_second; CaMKII_x2_683_0__Kb = 100 per_second;
  // dend_455_0_ * CaM_Bind_CaN_685_0__Kf * CaM_Ca2_537_0_*Ca2_CaN_555_0_-dend_455_0_ * CaM_Bind_CaN_685_0__Kb * CaM_CaN_549_0_
  // From Quintana et al 2005
  CaM_Bind_CaN_685_0_: CaM_Ca2_537_0_ + Ca2_CaN_555_0_ -> CaM_CaN_549_0_; dend_455_0_*CaM_Bind_CaN_685_0__Kf*CaM_Ca2_537_0_*Ca2_CaN_555_0_ - dend_455_0_*CaM_Bind_CaN_685_0__Kb*CaM_CaN_549_0_;
    CaM_Bind_CaN_685_0__Kf = 45999.9 litre_per_mmole_per_second; CaM_Bind_CaN_685_0__Kb = 1 per_second;
  // dend_455_0_ * Ca_bind_CaN_687_0__Kf * CaN_553_0_*Ca_557_0_^2-dend_455_0_ * Ca_bind_CaN_687_0__Kb * Ca2_CaN_555_0_
  Ca_bind_CaN_687_0_: CaN_553_0_ + 2 Ca_557_0_ -> Ca2_CaN_555_0_; dend_455_0_*Ca_bind_CaN_687_0__Kf*CaN_553_0_*Ca_557_0_^2 - dend_455_0_*Ca_bind_CaN_687_0__Kb*Ca2_CaN_555_0_;
    Ca_bind_CaN_687_0__Kf = 2.500003e7 sq_litre_per_mmole_sq_per_second; Ca_bind_CaN_687_0__Kb = 1 per_second;
  // dend_455_0_ * Reac_duplicated_689_0__Kf * I1_p_563_0_*PP1_active_559_0_-dend_455_0_ * Reac_duplicated_689_0__Kb * PP1_I1_p_561_0_
  Reac_duplicated_689_0_: I1_p_563_0_ + PP1_active_559_0_ -> PP1_I1_p_561_0_; dend_455_0_*Reac_duplicated_689_0__Kf*I1_p_563_0_*PP1_active_559_0_ - dend_455_0_*Reac_duplicated_689_0__Kb*PP1_I1_p_561_0_;
    Reac_duplicated_689_0__Kf = 499980 litre_per_mmole_per_second; Reac_duplicated_689_0__Kb = 0.1 per_second;
  // dend_455_0_ * dissoc_PP1_I1_691_0__Kf * PP1_I1_571_0_
  dissoc_PP1_I1_691_0_: PP1_I1_571_0_ => I1_565_0_ + PP1_active_559_0_; dend_455_0_*dissoc_PP1_I1_691_0__Kf*PP1_I1_571_0_;
    dissoc_PP1_I1_691_0__Kf = 1 per_second;
  // dend_455_0_ * bg_act_GEF_693_0__Kf * inact_GEF_517_0_-dend_455_0_ * bg_act_GEF_693_0__Kb * GEF_Gprot_bg_515_0_
  // SoS/GEF is present at 50 nM ie 3e4/cell. BetaGamma maxes out at 9e4. Assume we have 1/3 of the GEF active when the BetaGamma is 1.5e4. so 1e4 * kb = 2e4 * 1.5e4 * kf, so kf/kb = 3e-5. The rate of this equil should be reasonably fast, say 1/sec
  bg_act_GEF_693_0_: inact_GEF_517_0_ -> GEF_Gprot_bg_515_0_; dend_455_0_*bg_act_GEF_693_0__Kf*inact_GEF_517_0_ - dend_455_0_*bg_act_GEF_693_0__Kb*GEF_Gprot_bg_515_0_;
    bg_act_GEF_693_0__Kf = 5999.982 per_second; bg_act_GEF_693_0__Kb = 1 per_second;
  // dend_455_0_ * dephosph_GEF_695_0__Kf * GEF_p_519_0_
  dephosph_GEF_695_0_: GEF_p_519_0_ => inact_GEF_517_0_; dend_455_0_*dephosph_GEF_695_0__Kf*GEF_p_519_0_;
    dephosph_GEF_695_0__Kf = 1 per_second;
  // dend_455_0_ * Ras_intrinsic_GTPase_697_0__Kf * GTP_Ras_521_0_
  // This is extremely slow (1e-4), but it is significant as so little GAP actually gets complexed with it that the total GTP turnover rises only by 2-3 X (see Gibbs et al, JBC 265(33) 20437-20422) and Eccleston et al JBC 268(36) 27012-27019 kf = 1e-4
  Ras_intrinsic_GTPase_697_0_: GTP_Ras_521_0_ => GDP_Ras_523_0_; dend_455_0_*Ras_intrinsic_GTPase_697_0__Kf*GTP_Ras_521_0_;
    Ras_intrinsic_GTPase_697_0__Kf = 0.0001 per_second;
  // dend_455_0_ * dephosph_GAP_699_0__Kf * GAP_p_525_0_
  // Assume a reasonably good rate for dephosphorylating it, 1/sec
  dephosph_GAP_699_0_: GAP_p_525_0_ => GAP_527_0_; dend_455_0_*dephosph_GAP_699_0__Kf*GAP_p_525_0_;
    dephosph_GAP_699_0__Kf = 0.1 per_second;
  // dend_455_0_ * CaM_GEF1_Reac_701_0__Kf * inact_GEF_517_0_*CaM_Ca4_541_0_-dend_455_0_ * CaM_GEF1_Reac_701_0__Kb * CaM_GEF_531_0_
  // We have no numbers for this. It is probably between the two extremes represented by the CaMKII phosph states, and I have used guesses based on this. kf=1e-4 kb=1 The reaction is based on Farnsworth et al Nature 376 524-527 1995
  CaM_GEF1_Reac_701_0_: inact_GEF_517_0_ + CaM_Ca4_541_0_ -> CaM_GEF_531_0_; dend_455_0_*CaM_GEF1_Reac_701_0__Kf*inact_GEF_517_0_*CaM_Ca4_541_0_ - dend_455_0_*CaM_GEF1_Reac_701_0__Kb*CaM_GEF_531_0_;
    CaM_GEF1_Reac_701_0__Kf = 59999.82 litre_per_mmole_per_second; CaM_GEF1_Reac_701_0__Kb = 1 per_second;
  // dend_455_0_ * dephosph_inact_GEF_p_703_0__Kf * inact_GEF_p_529_0_
  dephosph_inact_GEF_p_703_0_: inact_GEF_p_529_0_ => inact_GEF_517_0_; dend_455_0_*dephosph_inact_GEF_p_703_0__Kf*inact_GEF_p_529_0_;
    dephosph_inact_GEF_p_703_0__Kf = 1 per_second;
  // dend_455_0_ * Inact_PP1_705_0__Kf * I1_p_563_0_*PP1_active_559_0_-dend_455_0_ * Inact_PP1_705_0__Kb * PP1_I1_p_561_0_
  // K inhib = 1nM from Cohen Ann Rev Bioch 1989, 4 nM from Foukes et al Assume 2 nM. kf /kb = 8.333e-4
  Inact_PP1_705_0_: I1_p_563_0_ + PP1_active_559_0_ -> PP1_I1_p_561_0_; dend_455_0_*Inact_PP1_705_0__Kf*I1_p_563_0_*PP1_active_559_0_ - dend_455_0_*Inact_PP1_705_0__Kb*PP1_I1_p_561_0_;
    Inact_PP1_705_0__Kf = 499979.6 litre_per_mmole_per_second; Inact_PP1_705_0__Kb = 0.1 per_second;
  // dend_455_0_ * Rac_Tiam_Reac_707_0__Kf * Rac_GTP_577_0_^2*IRSp53_dimer_463_0_-dend_455_0_ * Rac_Tiam_Reac_707_0__Kb * IRSp53_a_477_0_
  Rac_Tiam_Reac_707_0_: 2 Rac_GTP_577_0_ + IRSp53_dimer_463_0_ -> IRSp53_a_477_0_; dend_455_0_*Rac_Tiam_Reac_707_0__Kf*Rac_GTP_577_0_^2*IRSp53_dimer_463_0_ - dend_455_0_*Rac_Tiam_Reac_707_0__Kb*IRSp53_a_477_0_;
    Rac_Tiam_Reac_707_0__Kf = 100000000 sq_litre_per_mmole_sq_per_second; Rac_Tiam_Reac_707_0__Kb = 4 per_second;
  // dend_455_0_ * IRa_IRm_Reac_709_0__Kf * Eps8_481_0_^2*IRSp53_a_477_0_-dend_455_0_ * IRa_IRm_Reac_709_0__Kb * IRSp53_m_483_0_
  IRa_IRm_Reac_709_0_: 2 Eps8_481_0_ + IRSp53_a_477_0_ -> IRSp53_m_483_0_; dend_455_0_*IRa_IRm_Reac_709_0__Kf*Eps8_481_0_^2*IRSp53_a_477_0_ - dend_455_0_*IRa_IRm_Reac_709_0__Kb*IRSp53_m_483_0_;
    IRa_IRm_Reac_709_0__Kf = 1000000 sq_litre_per_mmole_sq_per_second; IRa_IRm_Reac_709_0__Kb = 0.01 per_second;
  // dend_455_0_ * detach_attach_711_0__Kf * curv_IRSp53_471_0_
  detach_attach_711_0_: curv_IRSp53_471_0_ => IRSp53_m_483_0_; dend_455_0_*detach_attach_711_0__Kf*curv_IRSp53_471_0_;
    detach_attach_711_0__Kf = 0 per_second;
  // dend_455_0_ * CaM_GEF2_Reac_713_0__Kf * GEF_Gprot_bg_515_0_*CaM_Ca4_541_0_-dend_455_0_ * CaM_GEF2_Reac_713_0__Kb * CaM_GEF_531_0_
  CaM_GEF2_Reac_713_0_: GEF_Gprot_bg_515_0_ + CaM_Ca4_541_0_ -> CaM_GEF_531_0_; dend_455_0_*CaM_GEF2_Reac_713_0__Kf*GEF_Gprot_bg_515_0_*CaM_Ca4_541_0_ - dend_455_0_*CaM_GEF2_Reac_713_0__Kb*CaM_GEF_531_0_;
    CaM_GEF2_Reac_713_0__Kf = 60000 litre_per_mmole_per_second; CaM_GEF2_Reac_713_0__Kb = 1 per_second;
  // dend_455_0_ * CaM_GEF3_Reac_715_0__Kf * inact_GEF_517_0_*CaM_Ca4_541_0_-dend_455_0_ * CaM_GEF3_Reac_715_0__Kb * CaM_GEF_531_0_
  CaM_GEF3_Reac_715_0_: inact_GEF_517_0_ + CaM_Ca4_541_0_ -> CaM_GEF_531_0_; dend_455_0_*CaM_GEF3_Reac_715_0__Kf*inact_GEF_517_0_*CaM_Ca4_541_0_ - dend_455_0_*CaM_GEF3_Reac_715_0__Kb*CaM_GEF_531_0_;
    CaM_GEF3_Reac_715_0__Kf = 60000 litre_per_mmole_per_second; CaM_GEF3_Reac_715_0__Kb = 1 per_second;
  // dend_455_0_ * Cdc42_GTP_GDP_Reac_717_0__Kf * Cdc42_479_0_
  Cdc42_GTP_GDP_Reac_717_0_: Cdc42_479_0_ => Cdc42_GDP_579_0_; dend_455_0_*Cdc42_GTP_GDP_Reac_717_0__Kf*Cdc42_479_0_;
    Cdc42_GTP_GDP_Reac_717_0__Kf = 0 per_second;
  // dend_455_0_ * Rac_GTP_GDP_Reac_719_0__Kf * Rac_GTP_577_0_
  Rac_GTP_GDP_Reac_719_0_: Rac_GTP_577_0_ => Rac_GDP_573_0_; dend_455_0_*Rac_GTP_GDP_Reac_719_0__Kf*Rac_GTP_577_0_;
    Rac_GTP_GDP_Reac_719_0__Kf = 0 per_second;
  // dend_455_0_ * to_tube_Reac_721_0__Kf * curv_IRSp53_471_0_-dend_455_0_ * to_tube_Reac_721_0__Kb * tube_IRSp53_585_0_
  to_tube_Reac_721_0_: curv_IRSp53_471_0_ -> tube_IRSp53_585_0_; dend_455_0_*to_tube_Reac_721_0__Kf*curv_IRSp53_471_0_ - dend_455_0_*to_tube_Reac_721_0__Kb*tube_IRSp53_585_0_;
    to_tube_Reac_721_0__Kf = 0.1 per_second; to_tube_Reac_721_0__Kb = 0.01 per_second;
  // dend_455_0_ * Tiam_Rev_Reac_723_0__Kf * Tiam1_575_0_-dend_455_0_ * Tiam_Rev_Reac_723_0__Kb * Tiam_inact_581_0_
  Tiam_Rev_Reac_723_0_: Tiam1_575_0_ -> Tiam_inact_581_0_; dend_455_0_*Tiam_Rev_Reac_723_0__Kf*Tiam1_575_0_ - dend_455_0_*Tiam_Rev_Reac_723_0__Kb*Tiam_inact_581_0_;
    Tiam_Rev_Reac_723_0__Kf = 0.01 per_second; Tiam_Rev_Reac_723_0__Kb = 0.01 per_second;
  // dend_455_0_ * Metab_Reac_725_0__Kf * Cdc42_479_0_
  Metab_Reac_725_0_: Cdc42_479_0_ => $Metabolism_587_0_; dend_455_0_*Metab_Reac_725_0__Kf*Cdc42_479_0_;
    Metab_Reac_725_0__Kf = 1.3 per_second;
  // dend_455_0_ * Metab_Reac_Rac_727_0__Kf * Rac_GTP_577_0_
  Metab_Reac_Rac_727_0_: Rac_GTP_577_0_ => $Metabolism_587_0_; dend_455_0_*Metab_Reac_Rac_727_0__Kf*Rac_GTP_577_0_;
    Metab_Reac_Rac_727_0__Kf = 0.25 per_second;
  // dend_455_0_ * Metab_Tiam_act_Reac_729_0__Kf * Tiam1_575_0_
  Metab_Tiam_act_Reac_729_0_: Tiam1_575_0_ => $Metabolism_Tiam_act_589_0_; dend_455_0_*Metab_Tiam_act_Reac_729_0__Kf*Tiam1_575_0_;
    Metab_Tiam_act_Reac_729_0__Kf = 0.005 per_second;
  // dend_455_0_ * Metab_Tiam_inact_Reac_731_0__Kf * Tiam_inact_581_0_-dend_455_0_ * Metab_Tiam_inact_Reac_731_0__Kb * Metabolism_Tiam_inact_591_0_
  Metab_Tiam_inact_Reac_731_0_: Tiam_inact_581_0_ -> $Metabolism_Tiam_inact_591_0_; dend_455_0_*Metab_Tiam_inact_Reac_731_0__Kf*Tiam_inact_581_0_ - dend_455_0_*Metab_Tiam_inact_Reac_731_0__Kb*Metabolism_Tiam_inact_591_0_;
    Metab_Tiam_inact_Reac_731_0__Kf = 0.01 per_second; Metab_Tiam_inact_Reac_731_0__Kb = 0.01 per_second;
  // dend_455_0_ * Metab_Cdc_GDP_Reac_733_0__Kf * Cdc42_GDP_579_0_-dend_455_0_ * Metab_Cdc_GDP_Reac_733_0__Kb * Metabolism_587_0_
  Metab_Cdc_GDP_Reac_733_0_: Cdc42_GDP_579_0_ -> $Metabolism_587_0_; dend_455_0_*Metab_Cdc_GDP_Reac_733_0__Kf*Cdc42_GDP_579_0_ - dend_455_0_*Metab_Cdc_GDP_Reac_733_0__Kb*Metabolism_587_0_;
    Metab_Cdc_GDP_Reac_733_0__Kf = 0.1 per_second; Metab_Cdc_GDP_Reac_733_0__Kb = 0.1 per_second;
  // dend_455_0_ * Metab_Rac_GDP_Reac_735_0__Kf * Rac_GDP_573_0_-dend_455_0_ * Metab_Rac_GDP_Reac_735_0__Kb * Metabolism_587_0_
  Metab_Rac_GDP_Reac_735_0_: Rac_GDP_573_0_ -> $Metabolism_587_0_; dend_455_0_*Metab_Rac_GDP_Reac_735_0__Kf*Rac_GDP_573_0_ - dend_455_0_*Metab_Rac_GDP_Reac_735_0__Kb*Metabolism_587_0_;
    Metab_Rac_GDP_Reac_735_0__Kf = 0.1 per_second; Metab_Rac_GDP_Reac_735_0__Kb = 0.1 per_second;
  // dend_455_0_ * c_m_Rac_Reac_737_0__Kf * Rac_GTP_577_0_-dend_455_0_ * c_m_Rac_Reac_737_0__Kb * Rac_m_595_0_
  c_m_Rac_Reac_737_0_: Rac_GTP_577_0_ -> Rac_m_595_0_; dend_455_0_*c_m_Rac_Reac_737_0__Kf*Rac_GTP_577_0_ - dend_455_0_*c_m_Rac_Reac_737_0__Kb*Rac_m_595_0_;
    c_m_Rac_Reac_737_0__Kf = 0 per_second; c_m_Rac_Reac_737_0__Kb = 0 per_second;
  // dend_455_0_ * c_m_Cdc_Reac_739_0__Kf * Cdc42_479_0_-dend_455_0_ * c_m_Cdc_Reac_739_0__Kb * Cdc42_m_593_0_
  c_m_Cdc_Reac_739_0_: Cdc42_479_0_ -> Cdc42_m_593_0_; dend_455_0_*c_m_Cdc_Reac_739_0__Kf*Cdc42_479_0_ - dend_455_0_*c_m_Cdc_Reac_739_0__Kb*Cdc42_m_593_0_;
    c_m_Cdc_Reac_739_0__Kf = 0 per_second; c_m_Cdc_Reac_739_0__Kb = 0 per_second;
  // dend_455_0_ * GF_Reac_741_0__Kf * Gactin_491_0_-dend_455_0_ * GF_Reac_741_0__Kb * Factin_649_0_
  GF_Reac_741_0_: Gactin_491_0_ -> Factin_649_0_; dend_455_0_*GF_Reac_741_0__Kf*Gactin_491_0_ - dend_455_0_*GF_Reac_741_0__Kb*Factin_649_0_;
    GF_Reac_741_0__Kf = 0.1 per_second; GF_Reac_741_0__Kb = 0.01 per_second;
  // dend_455_0_ * IR_F_Reac_743_0__Kf * Factin_649_0_*IRSp53_m_483_0_-dend_455_0_ * IR_F_Reac_743_0__Kb * IR_actin_651_0_
  IR_F_Reac_743_0_: Factin_649_0_ + IRSp53_m_483_0_ -> IR_actin_651_0_; dend_455_0_*IR_F_Reac_743_0__Kf*Factin_649_0_*IRSp53_m_483_0_ - dend_455_0_*IR_F_Reac_743_0__Kb*IR_actin_651_0_;
    IR_F_Reac_743_0__Kf = 100 litre_per_mmole_per_second; IR_F_Reac_743_0__Kb = 10 per_second;
  // dend_455_0_ * ( k1 * tot_auto_545_0_*CaMKII_505_0_ - k2 * auton_autoph_cplx_746_0_ )
  auton_autoph_745_0_Complex_formation_: $tot_auto_545_0_ + CaMKII_505_0_ -> auton_autoph_cplx_746_0_; dend_455_0_*(auton_autoph_745_0_Complex_formation__k1*tot_auto_545_0_*CaMKII_505_0_ - auton_autoph_745_0_Complex_formation__k2*auton_autoph_cplx_746_0_);
    auton_autoph_745_0_Complex_formation__k1 = 397.0637 litre_per_mmole_per_second; auton_autoph_745_0_Complex_formation__k2 = 8 per_second;
  // dend_455_0_ * k3*auton_autoph_cplx_746_0_
  auton_autoph_745_0_Product_formation_: auton_autoph_cplx_746_0_ => $tot_auto_545_0_ + CaMKII_thr286_503_0_; dend_455_0_*auton_autoph_745_0_Product_formation__k3*auton_autoph_cplx_746_0_;
    auton_autoph_745_0_Product_formation__k3 = 2 per_second;
  // dend_455_0_ * ( k1 * tot_auto_545_0_*CaMKII_CaM_501_0_ - k2 * auton_286_cplx_749_0_ )
  auton_286_748_0_Complex_formation_: $tot_auto_545_0_ + CaMKII_CaM_501_0_ -> auton_286_cplx_749_0_; dend_455_0_*(auton_286_748_0_Complex_formation__k1*tot_auto_545_0_*CaMKII_CaM_501_0_ - auton_286_748_0_Complex_formation__k2*auton_286_cplx_749_0_);
    auton_286_748_0_Complex_formation__k1 = 99.2686 litre_per_mmole_per_second; auton_286_748_0_Complex_formation__k2 = 2 per_second;
  // dend_455_0_ * k3*auton_286_cplx_749_0_
  auton_286_748_0_Product_formation_: auton_286_cplx_749_0_ => $tot_auto_545_0_ + CaMKII_thr286_CaM_499_0_; dend_455_0_*auton_286_748_0_Product_formation__k3*auton_286_cplx_749_0_;
    auton_286_748_0_Product_formation__k3 = 0.5 per_second;
  // dend_455_0_ * ( k1 * tot_auto_545_0_*CaMKII_thr286_503_0_ - k2 * auton_305_cplx_752_0_ )
  auton_305_751_0_Complex_formation_: $tot_auto_545_0_ + CaMKII_thr286_503_0_ -> auton_305_cplx_752_0_; dend_455_0_*(auton_305_751_0_Complex_formation__k1*tot_auto_545_0_*CaMKII_thr286_503_0_ - auton_305_751_0_Complex_formation__k2*auton_305_cplx_752_0_);
    auton_305_751_0_Complex_formation__k1 = 1191.18 litre_per_mmole_per_second; auton_305_751_0_Complex_formation__k2 = 24 per_second;
  // dend_455_0_ * k3*auton_305_cplx_752_0_
  auton_305_751_0_Product_formation_: auton_305_cplx_752_0_ => $tot_auto_545_0_ + CaMKII_p_p_p_509_0_; dend_455_0_*auton_305_751_0_Product_formation__k3*auton_305_cplx_752_0_;
    auton_305_751_0_Product_formation__k3 = 6 per_second;
  // dend_455_0_ * ( k1 * CaMKII_505_0_*tot_CaM_CaMKII_495_0_ - k2 * CaM_act_autoph_cplx_755_0_ )
  CaM_act_autoph_754_0_Complex_formation_: CaMKII_505_0_ + $tot_CaM_CaMKII_495_0_ -> CaM_act_autoph_cplx_755_0_; dend_455_0_*(CaM_act_autoph_754_0_Complex_formation__k1*CaMKII_505_0_*tot_CaM_CaMKII_495_0_ - CaM_act_autoph_754_0_Complex_formation__k2*CaM_act_autoph_cplx_755_0_);
    CaM_act_autoph_754_0_Complex_formation__k1 = 620.4086 litre_per_mmole_per_second; CaM_act_autoph_754_0_Complex_formation__k2 = 8 per_second;
  // dend_455_0_ * k3*CaM_act_autoph_cplx_755_0_
  CaM_act_autoph_754_0_Product_formation_: CaM_act_autoph_cplx_755_0_ => $tot_CaM_CaMKII_495_0_ + CaMKII_thr286_503_0_; dend_455_0_*CaM_act_autoph_754_0_Product_formation__k3*CaM_act_autoph_cplx_755_0_;
    CaM_act_autoph_754_0_Product_formation__k3 = 2 per_second;
  // dend_455_0_ * ( k1 * CaMKII_thr286_503_0_*tot_CaM_CaMKII_495_0_ - k2 * CaM_act_305_cplx_758_0_ )
  CaM_act_305_757_0_Complex_formation_: CaMKII_thr286_503_0_ + $tot_CaM_CaMKII_495_0_ -> CaM_act_305_cplx_758_0_; dend_455_0_*(CaM_act_305_757_0_Complex_formation__k1*CaMKII_thr286_503_0_*tot_CaM_CaMKII_495_0_ - CaM_act_305_757_0_Complex_formation__k2*CaM_act_305_cplx_758_0_);
    CaM_act_305_757_0_Complex_formation__k1 = 1861.226 litre_per_mmole_per_second; CaM_act_305_757_0_Complex_formation__k2 = 24 per_second;
  // dend_455_0_ * k3*CaM_act_305_cplx_758_0_
  CaM_act_305_757_0_Product_formation_: CaM_act_305_cplx_758_0_ => CaMKII_p_p_p_509_0_ + $tot_CaM_CaMKII_495_0_; dend_455_0_*CaM_act_305_757_0_Product_formation__k3*CaM_act_305_cplx_758_0_;
    CaM_act_305_757_0_Product_formation__k3 = 6 per_second;
  // dend_455_0_ * ( k1 * CaMKII_CaM_501_0_*tot_CaM_CaMKII_495_0_ - k2 * CaM_act_286_cplx_761_0_ )
  CaM_act_286_760_0_Complex_formation_: CaMKII_CaM_501_0_ + $tot_CaM_CaMKII_495_0_ -> CaM_act_286_cplx_761_0_; dend_455_0_*(CaM_act_286_760_0_Complex_formation__k1*CaMKII_CaM_501_0_*tot_CaM_CaMKII_495_0_ - CaM_act_286_760_0_Complex_formation__k2*CaM_act_286_cplx_761_0_);
    CaM_act_286_760_0_Complex_formation__k1 = 155.1022 litre_per_mmole_per_second; CaM_act_286_760_0_Complex_formation__k2 = 2 per_second;
  // dend_455_0_ * k3*CaM_act_286_cplx_761_0_
  CaM_act_286_760_0_Product_formation_: CaM_act_286_cplx_761_0_ => CaMKII_thr286_CaM_499_0_ + $tot_CaM_CaMKII_495_0_; dend_455_0_*CaM_act_286_760_0_Product_formation__k3*CaM_act_286_cplx_761_0_;
    CaM_act_286_760_0_Product_formation__k3 = 0.5 per_second;
  // dend_455_0_ * ( k1 * CaMKII_thr286_CaM_499_0_*PP2A_551_0_ - k2 * Deph_thr286_cplx_764_0_ )
  Deph_thr286_763_0_Complex_formation_: CaMKII_thr286_CaM_499_0_ + PP2A_551_0_ -> Deph_thr286_cplx_764_0_; dend_455_0_*(Deph_thr286_763_0_Complex_formation__k1*CaMKII_thr286_CaM_499_0_*PP2A_551_0_ - Deph_thr286_763_0_Complex_formation__k2*Deph_thr286_cplx_764_0_);
    Deph_thr286_763_0_Complex_formation__k1 = 1985.372 litre_per_mmole_per_second; Deph_thr286_763_0_Complex_formation__k2 = 8 per_second;
  // dend_455_0_ * k3*Deph_thr286_cplx_764_0_
  Deph_thr286_763_0_Product_formation_: Deph_thr286_cplx_764_0_ => CaMKII_CaM_501_0_ + PP2A_551_0_; dend_455_0_*Deph_thr286_763_0_Product_formation__k3*Deph_thr286_cplx_764_0_;
    Deph_thr286_763_0_Product_formation__k3 = 2 per_second;
  // dend_455_0_ * ( k1 * CaMKII_thr286_503_0_*PP2A_551_0_ - k2 * Deph_thr286b_cplx_767_0_ )
  Deph_thr286b_766_0_Complex_formation_: CaMKII_thr286_503_0_ + PP2A_551_0_ -> Deph_thr286b_cplx_767_0_; dend_455_0_*(Deph_thr286b_766_0_Complex_formation__k1*CaMKII_thr286_503_0_*PP2A_551_0_ - Deph_thr286b_766_0_Complex_formation__k2*Deph_thr286b_cplx_767_0_);
    Deph_thr286b_766_0_Complex_formation__k1 = 1985.372 litre_per_mmole_per_second; Deph_thr286b_766_0_Complex_formation__k2 = 8 per_second;
  // dend_455_0_ * k3*Deph_thr286b_cplx_767_0_
  Deph_thr286b_766_0_Product_formation_: Deph_thr286b_cplx_767_0_ => CaMKII_505_0_ + PP2A_551_0_; dend_455_0_*Deph_thr286b_766_0_Product_formation__k3*Deph_thr286b_cplx_767_0_;
    Deph_thr286b_766_0_Product_formation__k3 = 2 per_second;
  // dend_455_0_ * ( k1 * CaMKII_p_p_p_509_0_*PP2A_551_0_ - k2 * Deph_thr305_cplx_770_0_ )
  Deph_thr305_769_0_Complex_formation_: CaMKII_p_p_p_509_0_ + PP2A_551_0_ -> Deph_thr305_cplx_770_0_; dend_455_0_*(Deph_thr305_769_0_Complex_formation__k1*CaMKII_p_p_p_509_0_*PP2A_551_0_ - Deph_thr305_769_0_Complex_formation__k2*Deph_thr305_cplx_770_0_);
    Deph_thr305_769_0_Complex_formation__k1 = 1985.372 litre_per_mmole_per_second; Deph_thr305_769_0_Complex_formation__k2 = 8 per_second;
  // dend_455_0_ * k3*Deph_thr305_cplx_770_0_
  Deph_thr305_769_0_Product_formation_: Deph_thr305_cplx_770_0_ => PP2A_551_0_ + CaMKII_thr286_503_0_; dend_455_0_*Deph_thr305_769_0_Product_formation__k3*Deph_thr305_cplx_770_0_;
    Deph_thr305_769_0_Product_formation__k3 = 2 per_second;
  // dend_455_0_ * ( k1 * CaMKII_p_p_p_509_0_*PP2A_551_0_ - k2 * Deph_thr286c_cplx_773_0_ )
  Deph_thr286c_772_0_Complex_formation_: CaMKII_p_p_p_509_0_ + PP2A_551_0_ -> Deph_thr286c_cplx_773_0_; dend_455_0_*(Deph_thr286c_772_0_Complex_formation__k1*CaMKII_p_p_p_509_0_*PP2A_551_0_ - Deph_thr286c_772_0_Complex_formation__k2*Deph_thr286c_cplx_773_0_);
    Deph_thr286c_772_0_Complex_formation__k1 = 496.3323 litre_per_mmole_per_second; Deph_thr286c_772_0_Complex_formation__k2 = 2 per_second;
  // dend_455_0_ * k3*Deph_thr286c_cplx_773_0_
  Deph_thr286c_772_0_Product_formation_: Deph_thr286c_cplx_773_0_ => CaMKII_thr305_507_0_ + PP2A_551_0_; dend_455_0_*Deph_thr286c_772_0_Product_formation__k3*Deph_thr286c_cplx_773_0_;
    Deph_thr286c_772_0_Product_formation__k3 = 0.5 per_second;
  // dend_455_0_ * ( k1 * CaMKII_thr305_507_0_*PP2A_551_0_ - k2 * Deph_thr305a_cplx_776_0_ )
  Deph_thr305a_775_0_Complex_formation_: CaMKII_thr305_507_0_ + PP2A_551_0_ -> Deph_thr305a_cplx_776_0_; dend_455_0_*(Deph_thr305a_775_0_Complex_formation__k1*CaMKII_thr305_507_0_*PP2A_551_0_ - Deph_thr305a_775_0_Complex_formation__k2*Deph_thr305a_cplx_776_0_);
    Deph_thr305a_775_0_Complex_formation__k1 = 1985.372 litre_per_mmole_per_second; Deph_thr305a_775_0_Complex_formation__k2 = 8 per_second;
  // dend_455_0_ * k3*Deph_thr305a_cplx_776_0_
  Deph_thr305a_775_0_Product_formation_: Deph_thr305a_cplx_776_0_ => CaMKII_505_0_ + PP2A_551_0_; dend_455_0_*Deph_thr305a_775_0_Product_formation__k3*Deph_thr305a_cplx_776_0_;
    Deph_thr305a_775_0_Product_formation__k3 = 2 per_second;
  // dend_455_0_ * ( k1 * I1_p_563_0_*CaM_CaN_549_0_ - k2 * Enz_cplx_779_0_ )
  dephosph_inhib1_778_0_Complex_formation_: I1_p_563_0_ + CaM_CaN_549_0_ -> Enz_cplx_779_0_; dend_455_0_*(dephosph_inhib1_778_0_Complex_formation__k1*I1_p_563_0_*CaM_CaN_549_0_ - dephosph_inhib1_778_0_Complex_formation__k2*Enz_cplx_779_0_);
    dephosph_inhib1_778_0_Complex_formation__k1 = 37.72148 litre_per_mmole_per_second; dephosph_inhib1_778_0_Complex_formation__k2 = 1.36 per_second;
  // dend_455_0_ * k3*Enz_cplx_779_0_
  dephosph_inhib1_778_0_Product_formation_: Enz_cplx_779_0_ => I1_565_0_ + CaM_CaN_549_0_; dend_455_0_*dephosph_inhib1_778_0_Product_formation__k3*Enz_cplx_779_0_;
    dephosph_inhib1_778_0_Product_formation__k3 = 0.34 per_second;
  // dend_455_0_ * ( k1 * I1_565_0_*PKA_active_567_0_ - k2 * Enz_cplx_782_0_ )
  Enz_781_0_Complex_formation_: I1_565_0_ + PKA_active_567_0_ -> Enz_cplx_782_0_; dend_455_0_*(Enz_781_0_Complex_formation__k1*I1_565_0_*PKA_active_567_0_ - Enz_781_0_Complex_formation__k2*Enz_cplx_782_0_);
    Enz_781_0_Complex_formation__k1 = 73.52634 litre_per_mmole_per_second; Enz_781_0_Complex_formation__k2 = 4 per_second;
  // dend_455_0_ * k3*Enz_cplx_782_0_
  Enz_781_0_Product_formation_: Enz_cplx_782_0_ => I1_p_563_0_ + PKA_active_567_0_; dend_455_0_*Enz_781_0_Product_formation__k3*Enz_cplx_782_0_;
    Enz_781_0_Product_formation__k3 = 1 per_second;
  // dend_455_0_ * ( k1 * I1_p_563_0_*PP2A_551_0_ - k2 * Enz_cplx_785_0_ )
  PP2A_dephosph_I1_784_0_Complex_formation_: I1_p_563_0_ + PP2A_551_0_ -> Enz_cplx_785_0_; dend_455_0_*(PP2A_dephosph_I1_784_0_Complex_formation__k1*I1_p_563_0_*PP2A_551_0_ - PP2A_dephosph_I1_784_0_Complex_formation__k2*Enz_cplx_785_0_);
    PP2A_dephosph_I1_784_0_Complex_formation__k1 = 7.914164 litre_per_mmole_per_second; PP2A_dephosph_I1_784_0_Complex_formation__k2 = 0.8888 per_second;
  // dend_455_0_ * k3*Enz_cplx_785_0_
  PP2A_dephosph_I1_784_0_Product_formation_: Enz_cplx_785_0_ => I1_565_0_ + PP2A_551_0_; dend_455_0_*PP2A_dephosph_I1_784_0_Product_formation__k3*Enz_cplx_785_0_;
    PP2A_dephosph_I1_784_0_Product_formation__k3 = 0.2222 per_second;
  // dend_455_0_ * ( k1 * PP1_I1_p_561_0_*CaM_CaN_549_0_ - k2 * Enz1_cplx_788_0_ )
  dephosph_PP1_I_p_787_0_Complex_formation_: PP1_I1_p_561_0_ + CaM_CaN_549_0_ -> Enz1_cplx_788_0_; dend_455_0_*(dephosph_PP1_I_p_787_0_Complex_formation__k1*PP1_I1_p_561_0_*CaM_CaN_549_0_ - dephosph_PP1_I_p_787_0_Complex_formation__k2*Enz1_cplx_788_0_);
    dephosph_PP1_I_p_787_0_Complex_formation__k1 = 37.72148 litre_per_mmole_per_second; dephosph_PP1_I_p_787_0_Complex_formation__k2 = 1.36 per_second;
  // dend_455_0_ * k3*Enz1_cplx_788_0_
  dephosph_PP1_I_p_787_0_Product_formation_: Enz1_cplx_788_0_ => PP1_I1_571_0_ + CaM_CaN_549_0_; dend_455_0_*dephosph_PP1_I_p_787_0_Product_formation__k3*Enz1_cplx_788_0_;
    dephosph_PP1_I_p_787_0_Product_formation__k3 = 0.34 per_second;
  // dend_455_0_ * ( k1 * CaMKII_thr286_CaM_499_0_*PP1_active_559_0_ - k2 * Enz_cplx_791_0_ )
  Deph_thr286_790_0_Complex_formation_: CaMKII_thr286_CaM_499_0_ + PP1_active_559_0_ -> Enz_cplx_791_0_; dend_455_0_*(Deph_thr286_790_0_Complex_formation__k1*CaMKII_thr286_CaM_499_0_*PP1_active_559_0_ - Deph_thr286_790_0_Complex_formation__k2*Enz_cplx_791_0_);
    Deph_thr286_790_0_Complex_formation__k1 = 4963.221 litre_per_mmole_per_second; Deph_thr286_790_0_Complex_formation__k2 = 20 per_second;
  // dend_455_0_ * k3*Enz_cplx_791_0_
  Deph_thr286_790_0_Product_formation_: Enz_cplx_791_0_ => CaMKII_CaM_501_0_ + PP1_active_559_0_; dend_455_0_*Deph_thr286_790_0_Product_formation__k3*Enz_cplx_791_0_;
    Deph_thr286_790_0_Product_formation__k3 = 5 per_second;
  // dend_455_0_ * ( k1 * CaMKII_thr286_503_0_*PP1_active_559_0_ - k2 * Enz_cplx_794_0_ )
  Deph_thr286b_793_0_Complex_formation_: CaMKII_thr286_503_0_ + PP1_active_559_0_ -> Enz_cplx_794_0_; dend_455_0_*(Deph_thr286b_793_0_Complex_formation__k1*CaMKII_thr286_503_0_*PP1_active_559_0_ - Deph_thr286b_793_0_Complex_formation__k2*Enz_cplx_794_0_);
    Deph_thr286b_793_0_Complex_formation__k1 = 4963.221 litre_per_mmole_per_second; Deph_thr286b_793_0_Complex_formation__k2 = 20 per_second;
  // dend_455_0_ * k3*Enz_cplx_794_0_
  Deph_thr286b_793_0_Product_formation_: Enz_cplx_794_0_ => CaMKII_505_0_ + PP1_active_559_0_; dend_455_0_*Deph_thr286b_793_0_Product_formation__k3*Enz_cplx_794_0_;
    Deph_thr286b_793_0_Product_formation__k3 = 5 per_second;
  // dend_455_0_ * ( k1 * CaMKII_p_p_p_509_0_*PP1_active_559_0_ - k2 * Enz_cplx_797_0_ )
  Deph_thr305_796_0_Complex_formation_: CaMKII_p_p_p_509_0_ + PP1_active_559_0_ -> Enz_cplx_797_0_; dend_455_0_*(Deph_thr305_796_0_Complex_formation__k1*CaMKII_p_p_p_509_0_*PP1_active_559_0_ - Deph_thr305_796_0_Complex_formation__k2*Enz_cplx_797_0_);
    Deph_thr305_796_0_Complex_formation__k1 = 4963.221 litre_per_mmole_per_second; Deph_thr305_796_0_Complex_formation__k2 = 20 per_second;
  // dend_455_0_ * k3*Enz_cplx_797_0_
  Deph_thr305_796_0_Product_formation_: Enz_cplx_797_0_ => PP1_active_559_0_ + CaMKII_thr286_503_0_; dend_455_0_*Deph_thr305_796_0_Product_formation__k3*Enz_cplx_797_0_;
    Deph_thr305_796_0_Product_formation__k3 = 5 per_second;
  // dend_455_0_ * ( k1 * CaMKII_p_p_p_509_0_*PP1_active_559_0_ - k2 * Enz_cplx_800_0_ )
  Deph_thr286c_799_0_Complex_formation_: CaMKII_p_p_p_509_0_ + PP1_active_559_0_ -> Enz_cplx_800_0_; dend_455_0_*(Deph_thr286c_799_0_Complex_formation__k1*CaMKII_p_p_p_509_0_*PP1_active_559_0_ - Deph_thr286c_799_0_Complex_formation__k2*Enz_cplx_800_0_);
    Deph_thr286c_799_0_Complex_formation__k1 = 1240.805 litre_per_mmole_per_second; Deph_thr286c_799_0_Complex_formation__k2 = 5 per_second;
  // dend_455_0_ * k3*Enz_cplx_800_0_
  Deph_thr286c_799_0_Product_formation_: Enz_cplx_800_0_ => CaMKII_thr305_507_0_ + PP1_active_559_0_; dend_455_0_*Deph_thr286c_799_0_Product_formation__k3*Enz_cplx_800_0_;
    Deph_thr286c_799_0_Product_formation__k3 = 1.25 per_second;
  // dend_455_0_ * ( k1 * CaMKII_thr305_507_0_*PP1_active_559_0_ - k2 * Enz_cplx_803_0_ )
  Deph_thr305a_802_0_Complex_formation_: CaMKII_thr305_507_0_ + PP1_active_559_0_ -> Enz_cplx_803_0_; dend_455_0_*(Deph_thr305a_802_0_Complex_formation__k1*CaMKII_thr305_507_0_*PP1_active_559_0_ - Deph_thr305a_802_0_Complex_formation__k2*Enz_cplx_803_0_);
    Deph_thr305a_802_0_Complex_formation__k1 = 5000 litre_per_mmole_per_second; Deph_thr305a_802_0_Complex_formation__k2 = 20 per_second;
  // dend_455_0_ * k3*Enz_cplx_803_0_
  Deph_thr305a_802_0_Product_formation_: Enz_cplx_803_0_ => CaMKII_505_0_ + PP1_active_559_0_; dend_455_0_*Deph_thr305a_802_0_Product_formation__k3*Enz_cplx_803_0_;
    Deph_thr305a_802_0_Product_formation__k3 = 5 per_second;
  // dend_455_0_ * ( k1 * PKC_active_569_0_*GAP_527_0_ - k2 * PKC_inact_GAP_cplx_806_0_ )
  PKC_inact_GAP_805_0_Complex_formation_: $PKC_active_569_0_ + GAP_527_0_ -> PKC_inact_GAP_cplx_806_0_; dend_455_0_*(PKC_inact_GAP_805_0_Complex_formation__k1*PKC_active_569_0_*GAP_527_0_ - PKC_inact_GAP_805_0_Complex_formation__k2*PKC_inact_GAP_cplx_806_0_);
    PKC_inact_GAP_805_0_Complex_formation__k1 = 5553.335 litre_per_mmole_per_second; PKC_inact_GAP_805_0_Complex_formation__k2 = 16 per_second;
  // dend_455_0_ * k3*PKC_inact_GAP_cplx_806_0_
  PKC_inact_GAP_805_0_Product_formation_: PKC_inact_GAP_cplx_806_0_ => $PKC_active_569_0_ + GAP_p_525_0_; dend_455_0_*PKC_inact_GAP_805_0_Product_formation__k3*PKC_inact_GAP_cplx_806_0_;
    PKC_inact_GAP_805_0_Product_formation__k3 = 4 per_second;
  // dend_455_0_ * ( k1 * PKC_active_569_0_*inact_GEF_517_0_ - k2 * PKC_act_GEF_cplx_809_0_ )
  PKC_act_GEF_808_0_Complex_formation_: $PKC_active_569_0_ + inact_GEF_517_0_ -> PKC_act_GEF_cplx_809_0_; dend_455_0_*(PKC_act_GEF_808_0_Complex_formation__k1*PKC_active_569_0_*inact_GEF_517_0_ - PKC_act_GEF_808_0_Complex_formation__k2*PKC_act_GEF_cplx_809_0_);
    PKC_act_GEF_808_0_Complex_formation__k1 = 5553.335 litre_per_mmole_per_second; PKC_act_GEF_808_0_Complex_formation__k2 = 16 per_second;
  // dend_455_0_ * k3*PKC_act_GEF_cplx_809_0_
  PKC_act_GEF_808_0_Product_formation_: PKC_act_GEF_cplx_809_0_ => $PKC_active_569_0_ + GEF_p_519_0_; dend_455_0_*PKC_act_GEF_808_0_Product_formation__k3*PKC_act_GEF_cplx_809_0_;
    PKC_act_GEF_808_0_Product_formation__k3 = 4 per_second;
  // dend_455_0_ * ( k1 * GDP_Ras_523_0_*GEF_Gprot_bg_515_0_ - k2 * GEF_bg_act_Ras_cplx_812_0_ )
  GEF_bg_act_Ras_811_0_Complex_formation_: GDP_Ras_523_0_ + GEF_Gprot_bg_515_0_ -> GEF_bg_act_Ras_cplx_812_0_; dend_455_0_*(GEF_bg_act_Ras_811_0_Complex_formation__k1*GDP_Ras_523_0_*GEF_Gprot_bg_515_0_ - GEF_bg_act_Ras_811_0_Complex_formation__k2*GEF_bg_act_Ras_cplx_812_0_);
    GEF_bg_act_Ras_811_0_Complex_formation__k1 = 183.26 litre_per_mmole_per_second; GEF_bg_act_Ras_811_0_Complex_formation__k2 = 0.08 per_second;
  // dend_455_0_ * k3*GEF_bg_act_Ras_cplx_812_0_
  GEF_bg_act_Ras_811_0_Product_formation_: GEF_bg_act_Ras_cplx_812_0_ => GTP_Ras_521_0_ + GEF_Gprot_bg_515_0_; dend_455_0_*GEF_bg_act_Ras_811_0_Product_formation__k3*GEF_bg_act_Ras_cplx_812_0_;
    GEF_bg_act_Ras_811_0_Product_formation__k3 = 0.02 per_second;
  // dend_455_0_ * ( k1 * GDP_Ras_523_0_*inact_GEF_517_0_ - k2 * basal_GEF_activity_cplx_815_0_ )
  basal_GEF_activity_814_0_Complex_formation_: GDP_Ras_523_0_ + inact_GEF_517_0_ -> basal_GEF_activity_cplx_815_0_; dend_455_0_*(basal_GEF_activity_814_0_Complex_formation__k1*GDP_Ras_523_0_*inact_GEF_517_0_ - basal_GEF_activity_814_0_Complex_formation__k2*basal_GEF_activity_cplx_815_0_);
    basal_GEF_activity_814_0_Complex_formation__k1 = 9.299065 litre_per_mmole_per_second; basal_GEF_activity_814_0_Complex_formation__k2 = 0.08 per_second;
  // dend_455_0_ * k3*basal_GEF_activity_cplx_815_0_
  basal_GEF_activity_814_0_Product_formation_: basal_GEF_activity_cplx_815_0_ => GTP_Ras_521_0_ + inact_GEF_517_0_; dend_455_0_*basal_GEF_activity_814_0_Product_formation__k3*basal_GEF_activity_cplx_815_0_;
    basal_GEF_activity_814_0_Product_formation__k3 = 0.02 per_second;
  // dend_455_0_ * ( k1 * GDP_Ras_523_0_*GEF_p_519_0_ - k2 * GEF_p_act_Ras_cplx_818_0_ )
  GEF_p_act_Ras_817_0_Complex_formation_: GDP_Ras_523_0_ + GEF_p_519_0_ -> GEF_p_act_Ras_cplx_818_0_; dend_455_0_*(GEF_p_act_Ras_817_0_Complex_formation__k1*GDP_Ras_523_0_*GEF_p_519_0_ - GEF_p_act_Ras_817_0_Complex_formation__k2*GEF_p_act_Ras_cplx_818_0_);
    GEF_p_act_Ras_817_0_Complex_formation__k1 = 183.26 litre_per_mmole_per_second; GEF_p_act_Ras_817_0_Complex_formation__k2 = 0.08 per_second;
  // dend_455_0_ * k3*GEF_p_act_Ras_cplx_818_0_
  GEF_p_act_Ras_817_0_Product_formation_: GEF_p_act_Ras_cplx_818_0_ => GTP_Ras_521_0_ + GEF_p_519_0_; dend_455_0_*GEF_p_act_Ras_817_0_Product_formation__k3*GEF_p_act_Ras_cplx_818_0_;
    GEF_p_act_Ras_817_0_Product_formation__k3 = 0.02 per_second;
  // dend_455_0_ * ( k1 * GTP_Ras_521_0_*GAP_527_0_ - k2 * GAP_inact_Ras_cplx_821_0_ )
  GAP_inact_Ras_820_0_Complex_formation_: GTP_Ras_521_0_ + GAP_527_0_ -> GAP_inact_Ras_cplx_821_0_; dend_455_0_*(GAP_inact_Ras_820_0_Complex_formation__k1*GTP_Ras_521_0_*GAP_527_0_ - GAP_inact_Ras_820_0_Complex_formation__k2*GAP_inact_Ras_cplx_821_0_);
    GAP_inact_Ras_820_0_Complex_formation__k1 = 45802.08 litre_per_mmole_per_second; GAP_inact_Ras_820_0_Complex_formation__k2 = 40 per_second;
  // dend_455_0_ * k3*GAP_inact_Ras_cplx_821_0_
  GAP_inact_Ras_820_0_Product_formation_: GAP_inact_Ras_cplx_821_0_ => GDP_Ras_523_0_ + GAP_527_0_; dend_455_0_*GAP_inact_Ras_820_0_Product_formation__k3*GAP_inact_Ras_cplx_821_0_;
    GAP_inact_Ras_820_0_Product_formation__k3 = 10 per_second;
  // dend_455_0_ * ( k1 * GDP_Ras_523_0_*CaM_GEF_531_0_ - k2 * CaM_GEF_act_Ras_cplx_824_0_ )
  CaM_GEF_act_Ras_823_0_Complex_formation_: GDP_Ras_523_0_ + CaM_GEF_531_0_ -> CaM_GEF_act_Ras_cplx_824_0_; dend_455_0_*(CaM_GEF_act_Ras_823_0_Complex_formation__k1*GDP_Ras_523_0_*CaM_GEF_531_0_ - CaM_GEF_act_Ras_823_0_Complex_formation__k2*CaM_GEF_act_Ras_cplx_824_0_);
    CaM_GEF_act_Ras_823_0_Complex_formation__k1 = 183.26 litre_per_mmole_per_second; CaM_GEF_act_Ras_823_0_Complex_formation__k2 = 0.08 per_second;
  // dend_455_0_ * k3*CaM_GEF_act_Ras_cplx_824_0_
  CaM_GEF_act_Ras_823_0_Product_formation_: CaM_GEF_act_Ras_cplx_824_0_ => GTP_Ras_521_0_ + CaM_GEF_531_0_; dend_455_0_*CaM_GEF_act_Ras_823_0_Product_formation__k3*CaM_GEF_act_Ras_cplx_824_0_;
    CaM_GEF_act_Ras_823_0_Product_formation__k3 = 0.02 per_second;
  // dend_455_0_ * ( k1 * inact_GEF_517_0_*PKA_active_567_0_ - k2 * PKA_phosph_GEF_cplx_827_0_ )
  PKA_phosph_GEF_826_0_Complex_formation_: inact_GEF_517_0_ + PKA_active_567_0_ -> PKA_phosph_GEF_cplx_827_0_; dend_455_0_*(PKA_phosph_GEF_826_0_Complex_formation__k1*inact_GEF_517_0_*PKA_active_567_0_ - PKA_phosph_GEF_826_0_Complex_formation__k2*PKA_phosph_GEF_cplx_827_0_);
    PKA_phosph_GEF_826_0_Complex_formation__k1 = 5553.335 litre_per_mmole_per_second; PKA_phosph_GEF_826_0_Complex_formation__k2 = 36 per_second;
  // dend_455_0_ * k3*PKA_phosph_GEF_cplx_827_0_
  PKA_phosph_GEF_826_0_Product_formation_: PKA_phosph_GEF_cplx_827_0_ => inact_GEF_p_529_0_ + PKA_active_567_0_; dend_455_0_*PKA_phosph_GEF_826_0_Product_formation__k3*PKA_phosph_GEF_cplx_827_0_;
    PKA_phosph_GEF_826_0_Product_formation__k3 = 9 per_second;
  // dend_455_0_ * ( k1 * I1_565_0_*PKA_active_567_0_ - k2 * PKA_phosph_I1_cplx_830_0_ )
  PKA_phosph_I1_829_0_Complex_formation_: I1_565_0_ + PKA_active_567_0_ -> PKA_phosph_I1_cplx_830_0_; dend_455_0_*(PKA_phosph_I1_829_0_Complex_formation__k1*I1_565_0_*PKA_active_567_0_ - PKA_phosph_I1_829_0_Complex_formation__k2*PKA_phosph_I1_cplx_830_0_);
    PKA_phosph_I1_829_0_Complex_formation__k1 = 5553.335 litre_per_mmole_per_second; PKA_phosph_I1_829_0_Complex_formation__k2 = 36 per_second;
  // dend_455_0_ * k3*PKA_phosph_I1_cplx_830_0_
  PKA_phosph_I1_829_0_Product_formation_: PKA_phosph_I1_cplx_830_0_ => I1_p_563_0_ + PKA_active_567_0_; dend_455_0_*PKA_phosph_I1_829_0_Product_formation__k3*PKA_phosph_I1_cplx_830_0_;
    PKA_phosph_I1_829_0_Product_formation__k3 = 9 per_second;
  // dend_455_0_ * ( k1 * I1_p_563_0_*PP2A_551_0_ - k2 * PP2A_dephospho_I1_cplx_833_0_ )
  PP2A_dephospho_I1_832_0_Complex_formation_: I1_p_563_0_ + PP2A_551_0_ -> PP2A_dephospho_I1_cplx_833_0_; dend_455_0_*(PP2A_dephospho_I1_832_0_Complex_formation__k1*I1_p_563_0_*PP2A_551_0_ - PP2A_dephospho_I1_832_0_Complex_formation__k2*PP2A_dephospho_I1_cplx_833_0_);
    PP2A_dephospho_I1_832_0_Complex_formation__k1 = 3665.201 litre_per_mmole_per_second; PP2A_dephospho_I1_832_0_Complex_formation__k2 = 24 per_second;
  // dend_455_0_ * k3*PP2A_dephospho_I1_cplx_833_0_
  PP2A_dephospho_I1_832_0_Product_formation_: PP2A_dephospho_I1_cplx_833_0_ => I1_565_0_ + PP2A_551_0_; dend_455_0_*PP2A_dephospho_I1_832_0_Product_formation__k3*PP2A_dephospho_I1_cplx_833_0_;
    PP2A_dephospho_I1_832_0_Product_formation__k3 = 6 per_second;
  // dend_455_0_ * ( k1 * PP1_I1_p_561_0_*PP2A_551_0_ - k2 * PP2A_dephospho_PP1_I_p_cplx_836_0_ )
  PP2A_dephospho_PP1_I_p_835_0_Complex_formation_: PP1_I1_p_561_0_ + PP2A_551_0_ -> PP2A_dephospho_PP1_I_p_cplx_836_0_; dend_455_0_*(PP2A_dephospho_PP1_I_p_835_0_Complex_formation__k1*PP1_I1_p_561_0_*PP2A_551_0_ - PP2A_dephospho_PP1_I_p_835_0_Complex_formation__k2*PP2A_dephospho_PP1_I_p_cplx_836_0_);
    PP2A_dephospho_PP1_I_p_835_0_Complex_formation__k1 = 7.835806 litre_per_mmole_per_second; PP2A_dephospho_PP1_I_p_835_0_Complex_formation__k2 = 0.88 per_second;
  // dend_455_0_ * k3*PP2A_dephospho_PP1_I_p_cplx_836_0_
  PP2A_dephospho_PP1_I_p_835_0_Product_formation_: PP2A_dephospho_PP1_I_p_cplx_836_0_ => PP1_I1_571_0_ + PP2A_551_0_; dend_455_0_*PP2A_dephospho_PP1_I_p_835_0_Product_formation__k3*PP2A_dephospho_PP1_I_p_cplx_836_0_;
    PP2A_dephospho_PP1_I_p_835_0_Product_formation__k3 = 0.22 per_second;
  // dend_455_0_ * ( k1 * Rac_GDP_573_0_*Tiam1_575_0_ - k2 * Enz1_cplx_839_0_ )
  Enz1_838_0_Complex_formation_: Rac_GDP_573_0_ + Tiam1_575_0_ -> Enz1_cplx_839_0_; dend_455_0_*(Enz1_838_0_Complex_formation__k1*Rac_GDP_573_0_*Tiam1_575_0_ - Enz1_838_0_Complex_formation__k2*Enz1_cplx_839_0_);
    Enz1_838_0_Complex_formation__k1 = 250 litre_per_mmole_per_second; Enz1_838_0_Complex_formation__k2 = 0.2 per_second;
  // dend_455_0_ * k3*Enz1_cplx_839_0_
  Enz1_838_0_Product_formation_: Enz1_cplx_839_0_ => Rac_GTP_577_0_ + Tiam1_575_0_; dend_455_0_*Enz1_838_0_Product_formation__k3*Enz1_cplx_839_0_;
    Enz1_838_0_Product_formation__k3 = 0.05 per_second;
  // dend_455_0_ * ( k1 * Cdc42_GDP_579_0_*Tiam1_575_0_ - k2 * Enz_cplx_842_0_ )
  Enz_Cdc42_GDP_GTP_841_0_Complex_formation_: Cdc42_GDP_579_0_ + Tiam1_575_0_ -> Enz_cplx_842_0_; dend_455_0_*(Enz_Cdc42_GDP_GTP_841_0_Complex_formation__k1*Cdc42_GDP_579_0_*Tiam1_575_0_ - Enz_Cdc42_GDP_GTP_841_0_Complex_formation__k2*Enz_cplx_842_0_);
    Enz_Cdc42_GDP_GTP_841_0_Complex_formation__k1 = 250 litre_per_mmole_per_second; Enz_Cdc42_GDP_GTP_841_0_Complex_formation__k2 = 0.2 per_second;
  // dend_455_0_ * k3*Enz_cplx_842_0_
  Enz_Cdc42_GDP_GTP_841_0_Product_formation_: Enz_cplx_842_0_ => Tiam1_575_0_ + Cdc42_479_0_; dend_455_0_*Enz_Cdc42_GDP_GTP_841_0_Product_formation__k3*Enz_cplx_842_0_;
    Enz_Cdc42_GDP_GTP_841_0_Product_formation__k3 = 0.05 per_second;
  // dend_455_0_ * ( k1 * CaM_GEF_531_0_*Rac_GDP_573_0_ - k2 * Enz_cplx_845_0_ )
  CaM_GEF_RAC_GDP_GTP_enz_844_0_Complex_formation_: CaM_GEF_531_0_ + Rac_GDP_573_0_ -> Enz_cplx_845_0_; dend_455_0_*(CaM_GEF_RAC_GDP_GTP_enz_844_0_Complex_formation__k1*CaM_GEF_531_0_*Rac_GDP_573_0_ - CaM_GEF_RAC_GDP_GTP_enz_844_0_Complex_formation__k2*Enz_cplx_845_0_);
    CaM_GEF_RAC_GDP_GTP_enz_844_0_Complex_formation__k1 = 27777.78 litre_per_mmole_per_second; CaM_GEF_RAC_GDP_GTP_enz_844_0_Complex_formation__k2 = 8 per_second;
  // dend_455_0_ * k3*Enz_cplx_845_0_
  CaM_GEF_RAC_GDP_GTP_enz_844_0_Product_formation_: Enz_cplx_845_0_ => Rac_GTP_577_0_ + CaM_GEF_531_0_; dend_455_0_*CaM_GEF_RAC_GDP_GTP_enz_844_0_Product_formation__k3*Enz_cplx_845_0_;
    CaM_GEF_RAC_GDP_GTP_enz_844_0_Product_formation__k3 = 2 per_second;
  // dend_455_0_ * ( k1 * Tiam_inact_581_0_*CaMKII_thr286_503_0_ - k2 * Enz_cplx_848_0_ )
  thr_286_enz_847_0_Complex_formation_: Tiam_inact_581_0_ + CaMKII_thr286_503_0_ -> Enz_cplx_848_0_; dend_455_0_*(thr_286_enz_847_0_Complex_formation__k1*Tiam_inact_581_0_*CaMKII_thr286_503_0_ - thr_286_enz_847_0_Complex_formation__k2*Enz_cplx_848_0_);
    thr_286_enz_847_0_Complex_formation__k1 = 250 litre_per_mmole_per_second; thr_286_enz_847_0_Complex_formation__k2 = 0.2 per_second;
  // dend_455_0_ * k3*Enz_cplx_848_0_
  thr_286_enz_847_0_Product_formation_: Enz_cplx_848_0_ => CaMKII_thr286_503_0_ + Tiam1_575_0_; dend_455_0_*thr_286_enz_847_0_Product_formation__k3*Enz_cplx_848_0_;
    thr_286_enz_847_0_Product_formation__k3 = 0.05 per_second;

  // Unit definitions:
  unit volume = litre;
  unit substance = 1e-3 mole;
  unit length = metre;
  unit area = metre^2;
  unit time = second;
  unit sq_litre_per_mmole_sq_per_second = litre^2 / ((1e-3 mole)^2 * second);
  unit per_second = 1 / second;
  unit litre_per_mmole_per_second = litre / (1e-3 mole * second);
end
