// SBML level 2 version 1
// DOQCS : http://doqcs.ncbs.res.in/
//    Accession Name = mkp1_feedback_effects
//    Accession Number = 4
//    Transcriber = Upinder S. Bhalla, NCBS
//    Developer = Upinder S. Bhalla, NCBS
//    Species = Generic mammalian
//    Tissue = NIH 3T3 Expression
//    Cell Compartment = Surface - nucleus
//    Notes =  This is a network involving the MAPK-PKC feedback loop with input from the PDGFR in the synapse. The distinctive feature of this model is that it includes MKP-1 induction by MAPK, and the consequent inhibitory regulation of MAPK and the feedback loop. Lots of interesting dynamics arise from this. This <a href= http://www.ncbs.res.in/~bhalla/ltploop/mkpfeedback/index.html >link</a> provides supplementary material for the paper <a href= http://www.ncbi.nlm.nih.gov/entrez/query.fcgi?cmd=Retrieve&db=pubmed&dopt=Abstract&list_uids=12169734 >Bhalla US et al. Science (2002) 297(5583):1018-23</a>. In the form of several example simulations and demos for the figures in the paper.
//     Note: All the concentrations are in micro Mole (uM)

model testid()
  // mkp1_feedback_effects
  // This is a network involving the MAPK-PKC feedback loop with input from the PDGFR in the synapse. The distinctive feature of this model is that it includes MKP-1 induction by MAPK, and the consequent inhibitory regulation of MAPK and the feedback loop. Lots of interesting dynamics arise from this. This <a href = "http://www.ncbs.res.in/~bhalla/ltploop/mkpfeedback/index.html"">link</a> provides supplementary material for the paper <a href = "http://www.ncbi.nlm.nih.gov/entrez/query.fcgi?cmd=Retrieve&db=pubmed&dopt=Abstract&list_uids=12169734>Bhalla US et al. Science (2002) 297(5583):1018-23</a>. In the form of several example simulations and demos for the figures in the paper.

  // Compartments:
  compartment default_compartment = 1e-18;
  compartment geometry = 1e-12;
  compartment geometry_sbo_1_sbc_ = 2e-13;

  // Species:
  species Shc_star__dot_Sos_dot_Grb2 in geometry = 0;
  species Shc_star__dot_Sos_dot_Grb2_slash_Sos_dot_Ras_GEF_slash_Sos_dot_Ras_GEF_cplx in geometry = 0;
  species Sos_slash_Sos_star__dot_Grb2 in geometry = 0;
  species Sos_slash_Grb2 in geometry = 1;
  species Sos_slash_Sos_dot_Grb2 in geometry = 0;
  species Sos_slash_Sos_star_ in geometry = 0;
  species Sos_slash_Sos in geometry = 0.1;
  species PKC_slash_PKC_minus_Ca in geometry = 3.720833e-17;
  species PKC_slash_PKC_minus_DAG_minus_AA_star_ in geometry = 4.913667e-18;
  species PKC_slash_PKC_minus_Ca_minus_AA_star_ in geometry = 1.75e-16;
  species PKC_slash_PKC_minus_Ca_minus_memb_star_ in geometry = 1.3896e-17;
  species PKC_slash_PKC_minus_DAG_minus_memb_star_ in geometry = 9.435167e-21;
  species PKC_slash_PKC_minus_basal_star_ in geometry = 0.02;
  species PKC_slash_PKC_minus_AA_star_ in geometry = 1.813333e-17;
  species PKC_slash_PKC_minus_Ca_minus_DAG in geometry = 8.463167e-23;
  species PKC_slash_PKC_minus_DAG in geometry = 0;
  species PKC_slash_PKC_minus_DAG_minus_AA in geometry = 2.518833e-19;
  species PKC_slash_PKC_minus_cytosolic in geometry = 1;
  species AA in geometry = 6.12;
  species PKC_minus_active_slash_PKC_minus_act_minus_raf_slash_PKC_minus_act_minus_raf_cplx in geometry = 0;
  species PKC_minus_active_slash_PKC_minus_inact_minus_GAP_slash_PKC_minus_inact_minus_GAP_cplx in geometry = 0;
  species PKC_minus_active_slash_PKC_minus_act_minus_GEF_slash_PKC_minus_act_minus_GEF_cplx in geometry = 0;
  species MAPK_slash_craf_minus_1 in geometry = 0.2;
  species MAPK_slash_craf_minus_1_star_ in geometry = 0;
  species MAPK_slash_MAPKK in geometry = 0.18;
  species MAPK_slash_MAPK in geometry = 0.36;
  species MAPK_slash_craf_minus_1_star__star_ in geometry = 0;
  species MAPK_slash_MAPK_minus_tyr in geometry = 0;
  species MAPK_slash_MAPKK_star_ in geometry = 0;
  species MAPK_slash_MAPKK_star__slash_MAPKKtyr_slash_MAPKKtyr_cplx in geometry = 0;
  species MAPK_slash_MAPKK_star__slash_MAPKKthr_slash_MAPKKthr_cplx in geometry = 0;
  species MAPK_slash_MAPKK_minus_ser in geometry = 0;
  species MAPK_slash_RGR in geometry = 0;
  species MAPK_slash_RGR_slash_RGR_dot_1_slash_RGR_dot_1_cplx in geometry = 0;
  species MAPK_slash_RGR_slash_RGR_dot_2_slash_RGR_dot_2_cplx in geometry = 0;
  species MAPK_slash_MKP_minus_1_minus_ser359_star_ in geometry = 0;
  species MAPK_slash_MKP_minus_1_star__star_ in geometry = 0;
  species MAPK_slash_nuc_MAPK_star_ in geometry_sbo_1_sbc_ = 0;
  species MAPK_slash_nuc_MAPK_star__slash_act_transcription_slash_act_transcription_cplx in geometry_sbo_1_sbc_ = 0;
  species MAPK_slash_MKP1_minus_RNA in geometry_sbo_1_sbc_ = 0.0001;
  species MAPK_slash_Raf_star__minus_GTP_minus_Ras in geometry = 0;
  species MAPK_slash_Raf_star__minus_GTP_minus_Ras_slash_Raf_star__minus_GTP_minus_Ras_dot_1_slash_Raf_star__minus_GTP_minus_Ras_dot_1_cplx in geometry = 0;
  species MAPK_slash_Raf_star__minus_GTP_minus_Ras_slash_Raf_star__minus_GTP_minus_Ras_dot_2_slash_Raf_star__minus_GTP_minus_Ras_dot_2_cplx in geometry = 0;
  species MAPK_star_ in geometry = 0;
  species MAPK_star__slash_MAPK_star__minus_feedback_slash_MAPK_star__minus_feedback_cplx in geometry = 0;
  species MAPK_star__slash_MAPK_star__slash_MAPK_star__cplx in geometry = 0;
  species MAPK_star__slash_MKP_minus_1_minus_phosph_slash_MKP_minus_1_minus_phosph_cplx in geometry = 0;
  species MAPK_star__slash_MKP_minus_1_minus_phosph2_slash_MKP_minus_1_minus_phosph2_cplx in geometry = 0;
  species MKP_minus_1 in geometry = 0.0004;
  species PPhosphatase2A in geometry = 0.224;
  species PPhosphatase2A_slash_craf_minus_deph_slash_craf_minus_deph_cplx in geometry = 0;
  species PPhosphatase2A_slash_MAPKK_minus_deph_slash_MAPKK_minus_deph_cplx in geometry = 0;
  species PPhosphatase2A_slash_MAPKK_minus_deph_minus_ser_slash_MAPKK_minus_deph_minus_ser_cplx in geometry = 0;
  species PPhosphatase2A_slash_craf_star__star__minus_deph_slash_craf_star__star__minus_deph_cplx in geometry = 0;
  species PLA2_slash_PLA2_minus_cytosolic in geometry = 0.4;
  species PLA2_slash_PLA2_minus_Ca_star_ in geometry = 0;
  species PLA2_slash_PLA2_minus_Ca_star__slash_kenz_slash_kenz_cplx in geometry = 0;
  species PLA2_slash_PIP2_minus_PLA2_star_ in geometry = 0;
  species PLA2_slash_PIP2_minus_PLA2_star__slash_kenz_slash_kenz_cplx in geometry = 0;
  species PLA2_slash_PIP2_minus_Ca_minus_PLA2_star_ in geometry = 0;
  species PLA2_slash_PIP2_minus_Ca_minus_PLA2_star__slash_kenz_slash_kenz_cplx in geometry = 0;
  species PLA2_slash_DAG_minus_Ca_minus_PLA2_star_ in geometry = 0;
  species PLA2_slash_DAG_minus_Ca_minus_PLA2_star__slash_kenz_slash_kenz_cplx in geometry = 0;
  species PLA2_slash_PLA2_star__minus_Ca in geometry = 0;
  species PLA2_slash_PLA2_star__minus_Ca_slash_kenz_slash_kenz_cplx in geometry = 0;
  species PLA2_slash_PLA2_star_ in geometry = 0;
  species Ras_slash_inact_minus_GEF in geometry = 0.1;
  species Ras_slash_GEF_star_ in geometry = 0;
  species Ras_slash_GEF_star__slash_GEF_star__minus_act_minus_ras_slash_GEF_star__minus_act_minus_ras_cplx in geometry = 0;
  species Ras_slash_GTP_minus_Ras in geometry = 0;
  species Ras_slash_GDP_minus_Ras in geometry = 0.2;
  species Ras_slash_GAP_star_ in geometry = 0;
  species Ras_slash_GAP in geometry = 0.002;
  species Ras_slash_GAP_slash_GAP_minus_inact_minus_ras_slash_GAP_minus_inact_minus_ras_cplx in geometry = 0;
  species PDGFR_slash_PDGFR in geometry = 0.1083333;
  species PDGFR_slash_L_dot_PDGFR in geometry = 0;
  species PDGFR_slash_L_dot_PDGFR_slash_phosph_Shc_slash_phosph_Shc_cplx in geometry = 0;
  species PDGFR_slash_L_dot_PDGFR_slash_phosph_PLC_g_slash_phosph_PLC_g_cplx in geometry = 0;
  species PDGFR_slash_SHC in geometry = 0.5;
  species PDGFR_slash_SHC_star_ in geometry = 0;
  species PDGFR_slash_Internal_L_dot_PDGFR in geometry = 0;
  species MKP_minus_2 in geometry = 0.002;
  species MKP_minus_2_slash_MKP2_minus_tyr_minus_deph_slash_MKP2_minus_tyr_minus_deph_cplx in geometry = 0;
  species MKP_minus_2_slash_MKP2_minus_thr_minus_deph_slash_MKP2_minus_thr_minus_deph_cplx in geometry = 0;
  // Baseline in model is 11.661 uM. DAG is pretty nasty to estimate. In this model we just hold it fixed at this baseline level. Data sources are many and varied and sometimes difficult to reconcile. Welsh and Cabot 1987 JCB 35:231-245: DAG degradation Bocckino et al JBC 260(26):14201-14207: hepatocytes stim with vasopressin: 190 uM. Bocckino et al 1987 JBC 262(31):15309-15315: DAG rises from 70 to 200 ng/mg wet weight, approx 150 to 450 uM. Prescott and Majerus 1983 JBC 258:764-769: Platelets: 6 uM. Also see Rittenhouse-Simmons 1979 J Clin Invest 63. Sano et al JBC 258(3):2010-2013: Report a nearly 10 fold rise. Habenicht et al 1981 JBC 256(23)12329-12335: 3T3 cells with PDGF stim: 27 uM Cornell and Vance 1987 BBA 919:23-36: 10x rise from 10 to 100 uM. Summary: I see much lower rises in my PLC models, but the baseline could be anywhere from 5 to 100 uM. I have chosen about 11 uM based on the stimulus -response characteristics from the Schaechter and Benowitz paper and the Shinomura et al papers.
  species $DAG in geometry = 11.661;
  // This calcium pool is treated as being buffered to a steady 0.08 uM, which is the resting level.
  species $Ca in geometry = 0.08;
  // This is a representation of generic ubiquitination followed by degradation. Since this pool is buffered to zero, anything that ends up here is removed from the model.
  species $MAPK_slash_Ubiquitination in geometry = 0;
  // Infinite supply assumed for formation of mRNA.
  species $MAPK_slash_Nucleotides in geometry_sbo_1_sbc_ = 0.1;
  // arachodonylphosphatidylcholine is the favoured substrate from Wijkander and Sundler, JBC 202 pp 873-880, 1991. Their assay used 30 uM substrate, which is what the kinetics in this model are based on. For the later model we should locate a more realistic value for APC. For now it is treated as a buffered metabolite.
  species $PLA2_slash_APC in geometry = 30;
  // This is a steady PIP2 input to PLA2. The sensitivity of PLA2 to PIP2 discussed below does not match with the reported free levels which are used by the phosphlipase Cs. My understanding is that there may be different pools of PIP2 available for stimulating PLA2 as opposed to being substrates for PLCs. For that reason I have given this PIP2 pool a separate identity. As it is a steady input this is not a problem in this model. Majerus et al Cell 37:701-703 report a brain concentration of 0.1 - 0.2 mole % Majerus et al Science 234:1519-1526 report a huge range of concentrations: from 1 to 10% of PI content, which is in turn 2-8% of cell lipid. This gives 2e-4 to 8e-3 of cell lipid. In concentrations in total volume of cell (a somewhat strange number given the compartmental considerations) this comes to anywhere from 4 uM to 200 uM. PLA2 is stim 7x by PIP2 (Leslie and Channon BBA 1045:261(1990) Leslie and Channon say PIP2 is present at 0.1 - 0.2mol% range in membs, so I\'ll use a value at the lower end of the scale for basal PIP2.
  species $temp_minus_PIP2 in geometry = 2.5;
  // Platelet-derived growth factor. Heterodimer Mol wt. is approx 30 KDa Deuel et al 1985 Cancer Surv. 4(4):633-53 Conc of 50 ng/ml is close to saturating, and is used by P. Ram (personal communication). Other refs use 65 ng/ml Weise RJ et al 1995 JBC 270(7):3442-3446 A stimulus of 5 min is commonly used. Conversion factor: 1ng/ml = (1e-9/30K)* 1000 Moles/litre = 3e-11M = 3e-5 uM So 50 ng/ml ~ 1.5 nM.
  species $PDGFR_slash_PDGF in geometry = 0;
  species PKC_minus_active in geometry;
  species tot_MKP1 in geometry;
  species tot_MAPK in geometry;

  // Assignment rules:
  PKC_minus_active := PKC_slash_PKC_minus_DAG_minus_AA_star_ + PKC_slash_PKC_minus_Ca_minus_memb_star_ + PKC_slash_PKC_minus_Ca_minus_AA_star_ + PKC_slash_PKC_minus_DAG_minus_memb_star_ + PKC_slash_PKC_minus_basal_star_ + PKC_slash_PKC_minus_AA_star_ - (PKC_minus_active_slash_PKC_minus_act_minus_raf_slash_PKC_minus_act_minus_raf_cplx + PKC_minus_active_slash_PKC_minus_inact_minus_GAP_slash_PKC_minus_inact_minus_GAP_cplx + PKC_minus_active_slash_PKC_minus_act_minus_GEF_slash_PKC_minus_act_minus_GEF_cplx);
  tot_MKP1 := MKP_minus_1 + MAPK_slash_MKP_minus_1_minus_ser359_star_ + MAPK_slash_MKP_minus_1_star__star_;
  tot_MAPK := MAPK_star_ + MAPK_slash_nuc_MAPK_star_*120000/600000;

  // Reactions:
  // kf*Sos_slash_Sos_dot_Grb2*PDGFR_slash_SHC_star_-kb*Shc_star__dot_Sos_dot_Grb2
  // Sasaoka et al JBC 269:51 pp 32621 1994, table on pg 32623 indicates that this pathway accounts for about 50% of the GEF activation. (88% - 39%). Error is large, about 20%. Fig 1 is most useful in constraining rates. Chook et al JBC 271:48 pp 30472, 1996 say that the Kd is 0.2 uM for Shc binding to EGFR. The Kd for Grb direct binding is 0.7, so we\'ll ignore it.
  Sos_slash_Shc_bind_Sos_dot_Grb2: Sos_slash_Sos_dot_Grb2 + PDGFR_slash_SHC_star_ -> Shc_star__dot_Sos_dot_Grb2; Sos_slash_Shc_bind_Sos_dot_Grb2_kf*Sos_slash_Sos_dot_Grb2*PDGFR_slash_SHC_star_ - Sos_slash_Shc_bind_Sos_dot_Grb2_kb*Shc_star__dot_Sos_dot_Grb2;
    Sos_slash_Shc_bind_Sos_dot_Grb2_kf = 4.9998e-13 vol_uMINVsecINV; Sos_slash_Shc_bind_Sos_dot_Grb2_kb = 1e-13 vol_secINV;
  // kf*Sos_slash_Sos_star_*Sos_slash_Grb2-kb*Sos_slash_Sos_star__dot_Grb2
  // Same rates as Grb2_bind_Sos: Porfiri and McCormick JBC 271:10 pp 5871 1996 show that the binding is not affected by the phosphorylation.
  Sos_slash_Grb2_bind_Sos_star_: Sos_slash_Sos_star_ + Sos_slash_Grb2 -> Sos_slash_Sos_star__dot_Grb2; Sos_slash_Grb2_bind_Sos_star__kf*Sos_slash_Sos_star_*Sos_slash_Grb2 - Sos_slash_Grb2_bind_Sos_star__kb*Sos_slash_Sos_star__dot_Grb2;
    Sos_slash_Grb2_bind_Sos_star__kf = 2.50002e-14 vol_uMINVsecINV; Sos_slash_Grb2_bind_Sos_star__kb = 1.68e-14 vol_secINV;
  // kf*Sos_slash_Sos_star_-kb*Sos_slash_Sos
  // The best clue I have to these rates is from the time courses of the EGF activation, which is around 1 to 5 min. The dephosph would be expected to be of the same order, perhaps a bit longer. Lets use 0.002 which is about 8 min. Sep 17: The transient activation curve matches better with kf = 0.001
  Sos_slash_dephosph_Sos: Sos_slash_Sos_star_ -> Sos_slash_Sos; Sos_slash_dephosph_Sos_kf*Sos_slash_Sos_star_ - Sos_slash_dephosph_Sos_kb*Sos_slash_Sos;
    Sos_slash_dephosph_Sos_kf = 1e-15 vol_secINV; Sos_slash_dephosph_Sos_kb = 0 vol_secINV;
  // kf*Sos_slash_Grb2*Sos_slash_Sos-kb*Sos_slash_Sos_dot_Grb2
  // As there are 2 SH3 domains, this reaction could be 2nd order. I have a Kd of 22 uM from peptide binding (Lemmon et al JBC 269:50 pg 31653). However, Chook et al JBC 271:48 pg30472 say it is 0.4uM with purified proteins, so we believe them. They say it is 1:1 binding. Porfiri and McCormick JBC 271 also have related data. After comparing with the time-course of 1 min and the efficacy of activation of Ras, settle on Kd of 0.672 which is close to the Chook et al value.
  Sos_slash_Grb2_bind_Sos: Sos_slash_Grb2 + Sos_slash_Sos -> Sos_slash_Sos_dot_Grb2; Sos_slash_Grb2_bind_Sos_kf*Sos_slash_Grb2*Sos_slash_Sos - Sos_slash_Grb2_bind_Sos_kb*Sos_slash_Sos_dot_Grb2;
    Sos_slash_Grb2_bind_Sos_kf = 2.50002e-14 vol_uMINVsecINV; Sos_slash_Grb2_bind_Sos_kb = 1.68e-14 vol_secINV;
  // kf*PKC_slash_PKC_minus_cytosolic*Ca-kb*PKC_slash_PKC_minus_Ca
  // This Kd is a straightforward result from the Schaechter and Benowitz 1993 J Neurosci 13(10):4361 curves. The time-course is based on the known rapid activation of PKC and also the fact that Ca association with proteins is typically quite fast. My guess is that this tau of 2 sec is quite conservative and the actualy rate may be much faster. The parameter is quite insensitive for most stimuli.
  PKC_slash_PKC_minus_act_minus_by_minus_Ca: PKC_slash_PKC_minus_cytosolic + $Ca -> PKC_slash_PKC_minus_Ca; PKC_slash_PKC_minus_act_minus_by_minus_Ca_kf*PKC_slash_PKC_minus_cytosolic*Ca - PKC_slash_PKC_minus_act_minus_by_minus_Ca_kb*PKC_slash_PKC_minus_Ca;
    PKC_slash_PKC_minus_act_minus_by_minus_Ca_kf = 6e-13 vol_uMINVsecINV; PKC_slash_PKC_minus_act_minus_by_minus_Ca_kb = 5e-13 vol_secINV;
  // kf*DAG*PKC_slash_PKC_minus_Ca-kb*PKC_slash_PKC_minus_Ca_minus_DAG
  // Ca.PKC interaction with DAG is modeled by this reaction. Kf based on Shinomura et al PNAS 88 5149-5153 1991 and Schaechter and Benowitz 1993 J Neurosci 13(10):4361 and uses the constraining procedure referred to in the general notes for PKC.
  PKC_slash_PKC_minus_act_minus_by_minus_DAG: $DAG + PKC_slash_PKC_minus_Ca -> PKC_slash_PKC_minus_Ca_minus_DAG; PKC_slash_PKC_minus_act_minus_by_minus_DAG_kf*DAG*PKC_slash_PKC_minus_Ca - PKC_slash_PKC_minus_act_minus_by_minus_DAG_kb*PKC_slash_PKC_minus_Ca_minus_DAG;
    PKC_slash_PKC_minus_act_minus_by_minus_DAG_kf = 7.9998e-15 vol_uMINVsecINV; PKC_slash_PKC_minus_act_minus_by_minus_DAG_kb = 8.6348e-12 vol_secINV;
  // kf*PKC_slash_PKC_minus_Ca-kb*PKC_slash_PKC_minus_Ca_minus_memb_star_
  // Membrane translocation is a standard step in PKC activation. It also turns out to be necessary to replicate the curves from Schaechter and Benowitz 1993 J Neurosci 13(10):4361 and Shonomura et al 1991 PNAS 88:5149-5153. These rates are constrained by matching the curves in the above papers and by fixing a rather fast (sub-second) tau for PKC activation.
  PKC_slash_PKC_minus_Ca_minus_to_minus_memb: PKC_slash_PKC_minus_Ca -> PKC_slash_PKC_minus_Ca_minus_memb_star_; PKC_slash_PKC_minus_Ca_minus_to_minus_memb_kf*PKC_slash_PKC_minus_Ca - PKC_slash_PKC_minus_Ca_minus_to_minus_memb_kb*PKC_slash_PKC_minus_Ca_minus_memb_star_;
    PKC_slash_PKC_minus_Ca_minus_to_minus_memb_kf = 1.2705e-12 vol_secINV; PKC_slash_PKC_minus_Ca_minus_to_minus_memb_kb = 3.5026e-12 vol_secINV;
  // kf*PKC_slash_PKC_minus_Ca_minus_DAG-kb*PKC_slash_PKC_minus_DAG_minus_memb_star_
  // membrane translocation step for Ca.DAG.PKC complex. Rates constrained from Shinomura et al 1991 PNAS 88:5149-5153 and Schaechter and Benowitz 1993 J Neurosci 13(10):4361 as derived in the references cited in PKC general notes.
  PKC_slash_PKC_minus_DAG_minus_to_minus_memb: PKC_slash_PKC_minus_Ca_minus_DAG -> PKC_slash_PKC_minus_DAG_minus_memb_star_; PKC_slash_PKC_minus_DAG_minus_to_minus_memb_kf*PKC_slash_PKC_minus_Ca_minus_DAG - PKC_slash_PKC_minus_DAG_minus_to_minus_memb_kb*PKC_slash_PKC_minus_DAG_minus_memb_star_;
    PKC_slash_PKC_minus_DAG_minus_to_minus_memb_kf = 1e-12 vol_secINV; PKC_slash_PKC_minus_DAG_minus_to_minus_memb_kb = 1e-13 vol_secINV;
  // kf*PKC_slash_PKC_minus_Ca*AA-kb*PKC_slash_PKC_minus_Ca_minus_AA_star_
  // Ca-dependent AA activation of PKC. Note that this step combines the AA activation and also the membrane translocation. From Schaechter and Benowitz 1993 J Neurosci 13(10):4361
  PKC_slash_PKC_minus_act_minus_by_minus_Ca_minus_AA: PKC_slash_PKC_minus_Ca + AA -> PKC_slash_PKC_minus_Ca_minus_AA_star_; PKC_slash_PKC_minus_act_minus_by_minus_Ca_minus_AA_kf*PKC_slash_PKC_minus_Ca*AA - PKC_slash_PKC_minus_act_minus_by_minus_Ca_minus_AA_kb*PKC_slash_PKC_minus_Ca_minus_AA_star_;
    PKC_slash_PKC_minus_act_minus_by_minus_Ca_minus_AA_kf = 1.2e-15 vol_uMINVsecINV; PKC_slash_PKC_minus_act_minus_by_minus_Ca_minus_AA_kb = 1e-13 vol_secINV;
  // kf*PKC_slash_PKC_minus_DAG_minus_AA-kb*PKC_slash_PKC_minus_DAG_minus_AA_star_
  // Membrane translocation step for PKC-DAG-AA complex. Rates from matching concentration-effect data in our two main references: Schaechter and Benowitz 1993 J Neurosci 13(10):4361 and Shinomura et al 1988 PNAS 88: 5149-5153
  PKC_slash_PKC_minus_act_minus_by_minus_DAG_minus_AA: PKC_slash_PKC_minus_DAG_minus_AA -> PKC_slash_PKC_minus_DAG_minus_AA_star_; PKC_slash_PKC_minus_act_minus_by_minus_DAG_minus_AA_kf*PKC_slash_PKC_minus_DAG_minus_AA - PKC_slash_PKC_minus_act_minus_by_minus_DAG_minus_AA_kb*PKC_slash_PKC_minus_DAG_minus_AA_star_;
    PKC_slash_PKC_minus_act_minus_by_minus_DAG_minus_AA_kf = 2e-12 vol_secINV; PKC_slash_PKC_minus_act_minus_by_minus_DAG_minus_AA_kb = 2e-13 vol_secINV;
  // kf*PKC_slash_PKC_minus_cytosolic-kb*PKC_slash_PKC_minus_basal_star_
  // Basal activity of PKC is quite high, about 10% of max. See Schaechter and Benowitz 1993 J Neurosci 13(10):4361 and Shinomura et al 1991 PNAS 88:5149-5153. This is partly due to basal levels of DAG, AA and Ca, but even when these are taken into account (see the derivations as per the PKC general notes) there is a small basal activity still to be accounted for. This reaction handles it by giving a 2% activity at baseline.
  PKC_slash_PKC_minus_basal_minus_act: PKC_slash_PKC_minus_cytosolic -> PKC_slash_PKC_minus_basal_star_; PKC_slash_PKC_minus_basal_minus_act_kf*PKC_slash_PKC_minus_cytosolic - PKC_slash_PKC_minus_basal_minus_act_kb*PKC_slash_PKC_minus_basal_star_;
    PKC_slash_PKC_minus_basal_minus_act_kf = 1e-12 vol_secINV; PKC_slash_PKC_minus_basal_minus_act_kb = 5e-11 vol_secINV;
  // kf*AA*PKC_slash_PKC_minus_cytosolic-kb*PKC_slash_PKC_minus_AA_star_
  // AA stimulates PKC activity even at rather low Ca. Schaechter and Benowitz 1993 J Neurosci 13(10):4361 Note that this one reaction combines the initial interaction and also membrane translocation.
  PKC_slash_PKC_minus_act_minus_by_minus_AA: AA + PKC_slash_PKC_minus_cytosolic -> PKC_slash_PKC_minus_AA_star_; PKC_slash_PKC_minus_act_minus_by_minus_AA_kf*AA*PKC_slash_PKC_minus_cytosolic - PKC_slash_PKC_minus_act_minus_by_minus_AA_kb*PKC_slash_PKC_minus_AA_star_;
    PKC_slash_PKC_minus_act_minus_by_minus_AA_kf = 1.2e-16 vol_uMINVsecINV; PKC_slash_PKC_minus_act_minus_by_minus_AA_kb = 1e-13 vol_secINV;
  // kf*PKC_slash_PKC_minus_cytosolic*DAG-kb*PKC_slash_PKC_minus_DAG
  // Binding of PKC to DAG, non-Ca dependent. Kf based on Shinomura et al PNAS 88 5149-5153 1991 Tau estimated as fast and here it is about the same time-course as the formation of DAG so it will not be rate-limiting.
  PKC_slash_PKC_minus_n_minus_DAG: PKC_slash_PKC_minus_cytosolic + $DAG -> PKC_slash_PKC_minus_DAG; PKC_slash_PKC_minus_n_minus_DAG_kf*PKC_slash_PKC_minus_cytosolic*DAG - PKC_slash_PKC_minus_n_minus_DAG_kb*PKC_slash_PKC_minus_DAG;
    PKC_slash_PKC_minus_n_minus_DAG_kf = 6e-16 vol_uMINVsecINV; PKC_slash_PKC_minus_n_minus_DAG_kb = 1e-13 vol_secINV;
  // kf*PKC_slash_PKC_minus_DAG*AA-kb*PKC_slash_PKC_minus_DAG_minus_AA
  // This is one of the more interesting steps. Mechanistically it does not seem necessary at first glance. Turns out that one needs this step to quantitatively match the curves in Schaechter and Benowitz 1993 J Neurosci 13(10):4361 and Shinomura et al 1991 PNAS 88:5149-5153. There is a synergy between DAG and AA activation even at low Ca levels, which is most simply represented by this reaction. Tau is assumed to be fast. Kd comes from matching the experimental curves.
  PKC_slash_PKC_minus_n_minus_DAG_minus_AA: PKC_slash_PKC_minus_DAG + AA -> PKC_slash_PKC_minus_DAG_minus_AA; PKC_slash_PKC_minus_n_minus_DAG_minus_AA_kf*PKC_slash_PKC_minus_DAG*AA - PKC_slash_PKC_minus_n_minus_DAG_minus_AA_kb*PKC_slash_PKC_minus_DAG_minus_AA;
    PKC_slash_PKC_minus_n_minus_DAG_minus_AA_kf = 1.8e-14 vol_uMINVsecINV; PKC_slash_PKC_minus_n_minus_DAG_minus_AA_kb = 2e-12 vol_secINV;
  // kf*AA-kb*PLA2_slash_APC
  // Degradation pathway for AA. APC is a convenient buffered pool to dump it back into, though the actual metabolism is probably far more complex. For the purposes of the full model we use a rate of degradation of 0.4/sec to give a dynamic range of AA comparable to what is seen experimentally. Wijkander and Sundler 1991 Eur J Biochem 202:873 Leslie and Channon 1990 BBA 1045:261
  PLA2_slash_Degrade_minus_AA: AA -> $PLA2_slash_APC; PLA2_slash_Degrade_minus_AA_kf*AA - PLA2_slash_Degrade_minus_AA_kb*PLA2_slash_APC;
    PLA2_slash_Degrade_minus_AA_kf = 4e-13 vol_secINV; PLA2_slash_Degrade_minus_AA_kb = 0 vol_secINV;
  // kf*MKP_minus_1-kb*MAPK_slash_Ubiquitination
  // Rate of turnover of non-phosph form of MKP1 is from Brondello et al Science 286:2514 1999. Tau is about 45 min.
  MAPK_slash_turnover_MKP1: MKP_minus_1 -> $MAPK_slash_Ubiquitination; MAPK_slash_turnover_MKP1_kf*MKP_minus_1 - MAPK_slash_turnover_MKP1_kb*MAPK_slash_Ubiquitination;
    MAPK_slash_turnover_MKP1_kf = 3.7e-16 vol_secINV; MAPK_slash_turnover_MKP1_kb = 0 vol_secINV;
  // kf*MAPK_slash_MKP_minus_1_star__star_-kb*MAPK_slash_Ubiquitination
  // Rate of turnover of phosph form of MKP1 is from Brondello et al Science 286:2514 1999. Tau is about 150 min though it is not a clean exponential falloff.
  MAPK_slash_turnover_MKP1_star__star_: MAPK_slash_MKP_minus_1_star__star_ -> $MAPK_slash_Ubiquitination; MAPK_slash_turnover_MKP1_star__star__kf*MAPK_slash_MKP_minus_1_star__star_ - MAPK_slash_turnover_MKP1_star__star__kb*MAPK_slash_Ubiquitination;
    MAPK_slash_turnover_MKP1_star__star__kf = 1e-16 vol_secINV; MAPK_slash_turnover_MKP1_star__star__kb = 0 vol_secINV;
  // kf*MAPK_slash_MKP_minus_1_minus_ser359_star_-kb*MAPK_slash_Ubiquitination
  // Rate of turnover of phosph form of MKP1 is from Brondello et al Science 286:2514 1999. Tau is about 150 min though it is not a clean exponential falloff.
  MAPK_slash_turnover_MKP1_star_: MAPK_slash_MKP_minus_1_minus_ser359_star_ -> $MAPK_slash_Ubiquitination; MAPK_slash_turnover_MKP1_star__kf*MAPK_slash_MKP_minus_1_minus_ser359_star_ - MAPK_slash_turnover_MKP1_star__kb*MAPK_slash_Ubiquitination;
    MAPK_slash_turnover_MKP1_star__kf = 1e-16 vol_secINV; MAPK_slash_turnover_MKP1_star__kb = 0 vol_secINV;
  // kf*MAPK_slash_MKP_minus_1_minus_ser359_star_-kb*MKP_minus_1
  // 24 Apr 2K: Based on 12 Feb 2K: Scaled up 10x so kf=0.01, kb=0 13 Apr 2001: MKP1* Goes down too fast, equil amount too small. Note that tau for turnover is 150 min. Doesn\'t make sense to have this tau be so much less. Go for 1e-4
  MAPK_slash_MKP_minus_1_star_dephosph: MAPK_slash_MKP_minus_1_minus_ser359_star_ -> MKP_minus_1; MAPK_slash_MKP_minus_1_star_dephosph_kf*MAPK_slash_MKP_minus_1_minus_ser359_star_ - MAPK_slash_MKP_minus_1_star_dephosph_kb*MKP_minus_1;
    MAPK_slash_MKP_minus_1_star_dephosph_kf = 1e-16 vol_secINV; MAPK_slash_MKP_minus_1_star_dephosph_kb = 0 vol_secINV;
  // kf*MAPK_slash_MKP_minus_1_star__star_-kb*MAPK_slash_MKP_minus_1_minus_ser359_star_
  // 24 Apr 2K, based on 12 Feb 2K: Scaled up 10x to kf=0.01, kb=0 13 Apr 2001. Slowing down to 0.0001 to match turnover rates.
  MAPK_slash_MKP_minus_1_star__star_dephosph: MAPK_slash_MKP_minus_1_star__star_ -> MAPK_slash_MKP_minus_1_minus_ser359_star_; MAPK_slash_MKP_minus_1_star__star_dephosph_kf*MAPK_slash_MKP_minus_1_star__star_ - MAPK_slash_MKP_minus_1_star__star_dephosph_kb*MAPK_slash_MKP_minus_1_minus_ser359_star_;
    MAPK_slash_MKP_minus_1_star__star_dephosph_kf = 1e-16 vol_secINV; MAPK_slash_MKP_minus_1_star__star_dephosph_kb = 0 vol_secINV;
  // kf*MAPK_star_^2-kb*MAPK_slash_nuc_MAPK_star_
  // A nuclear translocation step. This lumps in all sorts of processes into a single set of rates constrained by time courses. Furuno et al J Immunol 166:4416-4421 (2001): In within 6 min, out within 7. The outgoing path is dephosphorylated MAPK so this reac will be one-way. Kf=0.01, Kb=0.005. The reaction is 2nd order in MAPK*, to represent dimerization of transcription factors.
  MAPK_slash_translocation: 2 MAPK_star_ -> MAPK_slash_nuc_MAPK_star_; MAPK_slash_translocation_kf*MAPK_star_^2 - MAPK_slash_translocation_kb*MAPK_slash_nuc_MAPK_star_;
    MAPK_slash_translocation_kf = 1.00002e-14 vol_uMINVsecINV; MAPK_slash_translocation_kb = 1e-15 vol_secINV;
  // kf*MAPK_slash_MKP1_minus_RNA-kb*MKP_minus_1
  // This is a \'black box\' approximation to the process of translation. I assume that there is unity stoichiometry, that is, a single RNA gives a single protein. This is obviously wrong, but since the RNA level itself is just a ratio against baseline, the conversion factor is absorbed there.
  MAPK_slash_MKP1_synth: MAPK_slash_MKP1_minus_RNA -> MKP_minus_1; MAPK_slash_MKP1_synth_kf*MAPK_slash_MKP1_minus_RNA - MAPK_slash_MKP1_synth_kb*MKP_minus_1;
    MAPK_slash_MKP1_synth_kf = 4e-16 vol_secINV; MAPK_slash_MKP1_synth_kb = 0 vol_secINV;
  // kf*MAPK_slash_Nucleotides-kb*MAPK_slash_MKP1_minus_RNA
  // This is just a basal rate of MKP-1 transcription scaled to give reasonable basal levels of the MKP-1.
  MAPK_slash_Basal_transcription: $MAPK_slash_Nucleotides -> MAPK_slash_MKP1_minus_RNA; MAPK_slash_Basal_transcription_kf*MAPK_slash_Nucleotides - MAPK_slash_Basal_transcription_kb*MAPK_slash_MKP1_minus_RNA;
    MAPK_slash_Basal_transcription_kf = 1e-18 vol_secINV; MAPK_slash_Basal_transcription_kb = 0 vol_secINV;
  // kf*MAPK_slash_craf_minus_1_star_*Ras_slash_GTP_minus_Ras-kb*MAPK_slash_Raf_star__minus_GTP_minus_Ras
  // Assume binding is fast and limited only by available Ras*. So kf = kb/[craf-1] If kb is 1/sec, then kf = 1/0.2 uM = 1/(0.2 * 6e5) = 8.3e-6 Later: Raise it by 10 X to about 1e-4, giving a Kf of 60 for Kb of 0.5 and a tau of approx 2 sec. Based on: Hallberg et al JBC 269:6 3913-3916 1994, 3% of cellular Raf is complexed with Ras. This step needed to memb-anchor and activate Raf: Leevers et al Nature 369 411-414. Also see Koide et al 1993 PNAS USA 90(18):8683-8686
  Ras_minus_act_minus_craf: MAPK_slash_craf_minus_1_star_ + Ras_slash_GTP_minus_Ras -> MAPK_slash_Raf_star__minus_GTP_minus_Ras; Ras_minus_act_minus_craf_kf*MAPK_slash_craf_minus_1_star_*Ras_slash_GTP_minus_Ras - Ras_minus_act_minus_craf_kb*MAPK_slash_Raf_star__minus_GTP_minus_Ras;
    Ras_minus_act_minus_craf_kf = 6e-11 vol_uMINVsecINV; Ras_minus_act_minus_craf_kb = 5e-13 vol_secINV;
  // kf*PLA2_slash_PLA2_minus_cytosolic*Ca-kb*PLA2_slash_PLA2_minus_Ca_star_
  // Direct activation of PLA2 by Ca. From Leslie and Channon BBA 1045 (1990) 261-270 fig6 pp267.
  PLA2_slash_PLA2_minus_Ca_minus_act: PLA2_slash_PLA2_minus_cytosolic + $Ca -> PLA2_slash_PLA2_minus_Ca_star_; PLA2_slash_PLA2_minus_Ca_minus_act_kf*PLA2_slash_PLA2_minus_cytosolic*Ca - PLA2_slash_PLA2_minus_Ca_minus_act_kb*PLA2_slash_PLA2_minus_Ca_star_;
    PLA2_slash_PLA2_minus_Ca_minus_act_kf = 1.00002e-12 vol_uMINVsecINV; PLA2_slash_PLA2_minus_Ca_minus_act_kb = 1e-13 vol_secINV;
  // kf*temp_minus_PIP2*PLA2_slash_PLA2_minus_cytosolic-kb*PLA2_slash_PIP2_minus_PLA2_star_
  // Activation of PLA2 by PIP2. From Leslie and Channon 1990 BBA 1045:261 the stimulation of PLA2 activity by high PIP2 is 7x. In this model we don\'t really expect any PIP2 stimulus.
  PLA2_slash_PIP2_minus_PLA2_minus_act: $temp_minus_PIP2 + PLA2_slash_PLA2_minus_cytosolic -> PLA2_slash_PIP2_minus_PLA2_star_; PLA2_slash_PIP2_minus_PLA2_minus_act_kf*temp_minus_PIP2*PLA2_slash_PLA2_minus_cytosolic - PLA2_slash_PIP2_minus_PLA2_minus_act_kb*PLA2_slash_PIP2_minus_PLA2_star_;
    PLA2_slash_PIP2_minus_PLA2_minus_act_kf = 1.2e-15 vol_uMINVsecINV; PLA2_slash_PIP2_minus_PLA2_minus_act_kb = 5e-13 vol_secINV;
  // kf*temp_minus_PIP2*PLA2_slash_PLA2_minus_Ca_star_-kb*PLA2_slash_PIP2_minus_Ca_minus_PLA2_star_
  // Synergistic activation of PLA2 by Ca and PIP2. Again from Leslie and Channon 1990 BBA 1045:261
  PLA2_slash_PIP2_minus_Ca_minus_PLA2_minus_act: $temp_minus_PIP2 + PLA2_slash_PLA2_minus_Ca_star_ -> PLA2_slash_PIP2_minus_Ca_minus_PLA2_star_; PLA2_slash_PIP2_minus_Ca_minus_PLA2_minus_act_kf*temp_minus_PIP2*PLA2_slash_PLA2_minus_Ca_star_ - PLA2_slash_PIP2_minus_Ca_minus_PLA2_minus_act_kb*PLA2_slash_PIP2_minus_Ca_minus_PLA2_star_;
    PLA2_slash_PIP2_minus_Ca_minus_PLA2_minus_act_kf = 1.2e-14 vol_uMINVsecINV; PLA2_slash_PIP2_minus_Ca_minus_PLA2_minus_act_kb = 1e-13 vol_secINV;
  // kf*DAG*PLA2_slash_PLA2_minus_Ca_star_-kb*PLA2_slash_DAG_minus_Ca_minus_PLA2_star_
  // Synergistic activation of PLA2 by Ca and DAG. Based on Leslie and Channon 1990 BBA 1045:261 The Kd is rather large and may reflect the complications in measuring DAG. For this model it is not critical since DAG is held fixed.
  PLA2_slash_DAG_minus_Ca_minus_PLA2_minus_act: $DAG + PLA2_slash_PLA2_minus_Ca_star_ -> PLA2_slash_DAG_minus_Ca_minus_PLA2_star_; PLA2_slash_DAG_minus_Ca_minus_PLA2_minus_act_kf*DAG*PLA2_slash_PLA2_minus_Ca_star_ - PLA2_slash_DAG_minus_Ca_minus_PLA2_minus_act_kb*PLA2_slash_DAG_minus_Ca_minus_PLA2_star_;
    PLA2_slash_DAG_minus_Ca_minus_PLA2_minus_act_kf = 3e-15 vol_uMINVsecINV; PLA2_slash_DAG_minus_Ca_minus_PLA2_minus_act_kb = 4e-12 vol_secINV;
  // kf*PLA2_slash_PLA2_star_*Ca-kb*PLA2_slash_PLA2_star__minus_Ca
  // Nemenoff et al 1993 JBC 268:1960 report a 2X to 4x activation of PLA2 by MAPK, which seems dependent on Ca as well. This reaction represents this activation. Rates are scaled to give appropriate fold activation.
  PLA2_slash_PLA2_star__minus_Ca_minus_act: PLA2_slash_PLA2_star_ + $Ca -> PLA2_slash_PLA2_star__minus_Ca; PLA2_slash_PLA2_star__minus_Ca_minus_act_kf*PLA2_slash_PLA2_star_*Ca - PLA2_slash_PLA2_star__minus_Ca_minus_act_kb*PLA2_slash_PLA2_star__minus_Ca;
    PLA2_slash_PLA2_star__minus_Ca_minus_act_kf = 6e-12 vol_uMINVsecINV; PLA2_slash_PLA2_star__minus_Ca_minus_act_kb = 1e-13 vol_secINV;
  // kf*PLA2_slash_PLA2_star_-kb*PLA2_slash_PLA2_minus_cytosolic
  // Dephosphorylation reaction to balance MAPK phosphorylation of PLA2. This is probably mediated by PP2A. Rates determined to keep the balance of phosphorylated and non-phosphorylated PLA2 reasonable. The constraining factor is the fold activation of PLA2 by MAPK.
  PLA2_slash_dephosphorylate_minus_PLA2_star_: PLA2_slash_PLA2_star_ -> PLA2_slash_PLA2_minus_cytosolic; PLA2_slash_dephosphorylate_minus_PLA2_star__kf*PLA2_slash_PLA2_star_ - PLA2_slash_dephosphorylate_minus_PLA2_star__kb*PLA2_slash_PLA2_minus_cytosolic;
    PLA2_slash_dephosphorylate_minus_PLA2_star__kf = 1.7e-13 vol_secINV; PLA2_slash_dephosphorylate_minus_PLA2_star__kb = 0 vol_secINV;
  // kf*Ras_slash_GEF_star_-kb*Ras_slash_inact_minus_GEF
  // This rate is based on the known ratio of GDP-Ras to GTP-Ras. Basal: Ras.GTP = 7% Stimulated 15% Time course is within 10 min, probably much faster as not all early data points are there. See Gibbs et al JBC 265(33):20437-20422
  Ras_slash_dephosph_minus_GEF: Ras_slash_GEF_star_ -> Ras_slash_inact_minus_GEF; Ras_slash_dephosph_minus_GEF_kf*Ras_slash_GEF_star_ - Ras_slash_dephosph_minus_GEF_kb*Ras_slash_inact_minus_GEF;
    Ras_slash_dephosph_minus_GEF_kf = 1e-13 vol_secINV; Ras_slash_dephosph_minus_GEF_kb = 0 vol_secINV;
  // kf*Ras_slash_GTP_minus_Ras-kb*Ras_slash_GDP_minus_Ras
  // This is extremely slow (kf = 1e-4), but it is significant as so little GAP actually gets complexed with it that the total GTP turnover rises only by 2-3 X (see Gibbs et al, JBC 265(33) 20437-20422) and Eccleston et al JBC 268(36) 27012-27019 There is no back reaction as we assume this to be a regular irreversible Michaelis-Menten zeroth order hydrolysis.
  Ras_slash_Ras_minus_intrinsic_minus_GTPase: Ras_slash_GTP_minus_Ras -> Ras_slash_GDP_minus_Ras; Ras_slash_Ras_minus_intrinsic_minus_GTPase_kf*Ras_slash_GTP_minus_Ras - Ras_slash_Ras_minus_intrinsic_minus_GTPase_kb*Ras_slash_GDP_minus_Ras;
    Ras_slash_Ras_minus_intrinsic_minus_GTPase_kf = 1e-16 vol_secINV; Ras_slash_Ras_minus_intrinsic_minus_GTPase_kb = 0 vol_secINV;
  // kf*Ras_slash_GAP_star_-kb*Ras_slash_GAP
  // Assume a reasonably good rate for dephosphorylating it, 0.1/sec. This fits well with resting levels of active kinase and the degree of activation as well as time-course of turnoff of Ras activation, but data is quite indirect.
  Ras_slash_dephosph_minus_GAP: Ras_slash_GAP_star_ -> Ras_slash_GAP; Ras_slash_dephosph_minus_GAP_kf*Ras_slash_GAP_star_ - Ras_slash_dephosph_minus_GAP_kb*Ras_slash_GAP;
    Ras_slash_dephosph_minus_GAP_kf = 1e-13 vol_secINV; Ras_slash_dephosph_minus_GAP_kb = 0 vol_secINV;
  // kf*MAPK_slash_craf_minus_1*Ras_slash_GTP_minus_Ras-kb*MAPK_slash_RGR
  // Based on rates of Ras-act-craf which has Kf=60, Kb= 0.5. This reaction was introduced to account for the PKC-independent activation of MAPK. This reac should have less affinity but similar tau as compared to the Ras-cat-craf, since the phosphorylated Raf form has a greater effect on MAPK.
  Ras_minus_act_minus_unphosph_minus_raf: MAPK_slash_craf_minus_1 + Ras_slash_GTP_minus_Ras -> MAPK_slash_RGR; Ras_minus_act_minus_unphosph_minus_raf_kf*MAPK_slash_craf_minus_1*Ras_slash_GTP_minus_Ras - Ras_minus_act_minus_unphosph_minus_raf_kb*MAPK_slash_RGR;
    Ras_minus_act_minus_unphosph_minus_raf_kf = 6e-12 vol_uMINVsecINV; Ras_minus_act_minus_unphosph_minus_raf_kb = 1e-12 vol_secINV;
  // kf*PDGFR_slash_PDGFR*PDGFR_slash_PDGF-kb*PDGFR_slash_L_dot_PDGFR
  // From Heidaran et al JBC268(13):9287 Fig 5. Kd is ~0.5 nM
  PDGFR_slash_act_PDGFR: PDGFR_slash_PDGFR + $PDGFR_slash_PDGF -> PDGFR_slash_L_dot_PDGFR; PDGFR_slash_act_PDGFR_kf*PDGFR_slash_PDGFR*PDGFR_slash_PDGF - PDGFR_slash_act_PDGFR_kb*PDGFR_slash_L_dot_PDGFR;
    PDGFR_slash_act_PDGFR_kf = 1.99998e-10 vol_uMINVsecINV; PDGFR_slash_act_PDGFR_kb = 1e-13 vol_secINV;
  // kf*PDGFR_slash_SHC_star_-kb*PDGFR_slash_SHC
  // Time course of decline of phosph is 20 min from Sasaoka et al 1994 JBC 269(51):32621. Part of this is the turnoff time of the EGFR itself. Lets assume a tau of 10 min for this dephosphorylation as a first pass. 27 Apr 2001: Dephosph too slow, shifts SHC balance over to phosphorylated form. Increase Kf to 0.01. This gives a reasonable overall time-course.
  PDGFR_slash_dephosph_Shc: PDGFR_slash_SHC_star_ -> PDGFR_slash_SHC; PDGFR_slash_dephosph_Shc_kf*PDGFR_slash_SHC_star_ - PDGFR_slash_dephosph_Shc_kb*PDGFR_slash_SHC;
    PDGFR_slash_dephosph_Shc_kf = 1e-14 vol_secINV; PDGFR_slash_dephosph_Shc_kb = 0 vol_secINV;
  // kf*PDGFR_slash_L_dot_PDGFR-kb*PDGFR_slash_Internal_L_dot_PDGFR
  // Original model derived from EGFR model. See Helin and Beguinot JBC 266:13 1991 pg 8363-8368. In Fig 3 they have internalization tau about 10 min, equil at about 20% EGF available. So kf = 4x kb, and 1/(kf + kb) = 600 sec so kb = 1/3K = 3.3e-4, and kf = 1.33e-3. This doesn\'t take into account the unbound receptor, so we need to push the kf up a bit, to 0.002 26 apr 2001: Keq too low for the PDGF model. Now Kf=0.001,Kb=0.00066 The previously calculated internalization equilibrium led to very high internalization which shifted the effective dependence of the receptor on PDGF so it looked like the receptor binding was higher affinity than experimentally determined. Used two constraining factors: 1. Time course of SHC phosphorylation/dephosphorylation which is fast on, but 10-20 minutes off. 2. Conc dependence of MAPK on PDGF has a halfmax around 3ng/ml. See Brondello et al 1997 JBC 272(2):1368-1376 and Brondello et al 1999 Science 286:2514-1517.
  PDGFR_slash_Internalize: PDGFR_slash_L_dot_PDGFR -> PDGFR_slash_Internal_L_dot_PDGFR; PDGFR_slash_Internalize_kf*PDGFR_slash_L_dot_PDGFR - PDGFR_slash_Internalize_kb*PDGFR_slash_Internal_L_dot_PDGFR;
    PDGFR_slash_Internalize_kf = 1e-15 vol_secINV; PDGFR_slash_Internalize_kb = 6.6e-16 vol_secINV;
  // k1*Ras_slash_GDP_minus_Ras*Shc_star__dot_Sos_dot_Grb2-k2*Shc_star__dot_Sos_dot_Grb2_slash_Sos_dot_Ras_GEF_slash_Sos_dot_Ras_GEF_cplx
  // Rates from Orita et al JBC 268(34):25542-25546
  Shc_star__dot_Sos_dot_Grb2_slash_Sos_dot_Ras_GEF_1: Ras_slash_GDP_minus_Ras + Shc_star__dot_Sos_dot_Grb2 -> Shc_star__dot_Sos_dot_Grb2_slash_Sos_dot_Ras_GEF_slash_Sos_dot_Ras_GEF_cplx; Shc_star__dot_Sos_dot_Grb2_slash_Sos_dot_Ras_GEF_1_k1*Ras_slash_GDP_minus_Ras*Shc_star__dot_Sos_dot_Grb2 - Shc_star__dot_Sos_dot_Grb2_slash_Sos_dot_Ras_GEF_1_k2*Shc_star__dot_Sos_dot_Grb2_slash_Sos_dot_Ras_GEF_slash_Sos_dot_Ras_GEF_cplx;
    Shc_star__dot_Sos_dot_Grb2_slash_Sos_dot_Ras_GEF_1_k1 = 1.98e-13 vol_uMINVsecINV; Shc_star__dot_Sos_dot_Grb2_slash_Sos_dot_Ras_GEF_1_k2 = 8e-14 vol_secINV;
  // k3*Shc_star__dot_Sos_dot_Grb2_slash_Sos_dot_Ras_GEF_slash_Sos_dot_Ras_GEF_cplx
  Shc_star__dot_Sos_dot_Grb2_slash_Sos_dot_Ras_GEF_2: Shc_star__dot_Sos_dot_Grb2_slash_Sos_dot_Ras_GEF_slash_Sos_dot_Ras_GEF_cplx => Ras_slash_GTP_minus_Ras + Shc_star__dot_Sos_dot_Grb2; Shc_star__dot_Sos_dot_Grb2_slash_Sos_dot_Ras_GEF_2_k3*Shc_star__dot_Sos_dot_Grb2_slash_Sos_dot_Ras_GEF_slash_Sos_dot_Ras_GEF_cplx;
    Shc_star__dot_Sos_dot_Grb2_slash_Sos_dot_Ras_GEF_2_k3 = 2e-14 vol_secINV;
  // k1*MAPK_slash_craf_minus_1*PKC_minus_active-k2*PKC_minus_active_slash_PKC_minus_act_minus_raf_slash_PKC_minus_act_minus_raf_cplx
  // Rate consts from Chen et al Biochem 32, 1032 (1993) k3 = 4 Km for this substrate is trickier. Specific substrates are in the uM range, so we use a higher Km here. This may be too conservative in which case PKC would have a still higher effect on raf. The presence of this phosphorylation and activation step is from Kolch et al 1993 Nature 364:249
  PKC_minus_active_slash_PKC_minus_act_minus_raf_1: MAPK_slash_craf_minus_1 + PKC_minus_active -> PKC_minus_active_slash_PKC_minus_act_minus_raf_slash_PKC_minus_act_minus_raf_cplx; PKC_minus_active_slash_PKC_minus_act_minus_raf_1_k1*MAPK_slash_craf_minus_1*PKC_minus_active - PKC_minus_active_slash_PKC_minus_act_minus_raf_1_k2*PKC_minus_active_slash_PKC_minus_act_minus_raf_slash_PKC_minus_act_minus_raf_cplx;
    PKC_minus_active_slash_PKC_minus_act_minus_raf_1_k1 = 3e-13 vol_uMINVsecINV; PKC_minus_active_slash_PKC_minus_act_minus_raf_1_k2 = 1.6e-11 vol_secINV;
  // k3*PKC_minus_active_slash_PKC_minus_act_minus_raf_slash_PKC_minus_act_minus_raf_cplx
  PKC_minus_active_slash_PKC_minus_act_minus_raf_2: PKC_minus_active_slash_PKC_minus_act_minus_raf_slash_PKC_minus_act_minus_raf_cplx => MAPK_slash_craf_minus_1_star_ + PKC_minus_active; PKC_minus_active_slash_PKC_minus_act_minus_raf_2_k3*PKC_minus_active_slash_PKC_minus_act_minus_raf_slash_PKC_minus_act_minus_raf_cplx;
    PKC_minus_active_slash_PKC_minus_act_minus_raf_2_k3 = 4e-12 vol_secINV;
  // k1*Ras_slash_GAP*PKC_minus_active-k2*PKC_minus_active_slash_PKC_minus_inact_minus_GAP_slash_PKC_minus_inact_minus_GAP_cplx
  // Rate consts are PKC generic rates. This reaction inactivates GAP. The reaction is from the Boguski and McCormick 1993 review in Nature 366:643-654 The phosphorylation Vmax is 6x higher to account for balance of GDP-Ras:GDP-Ras.
  PKC_minus_active_slash_PKC_minus_inact_minus_GAP_1: Ras_slash_GAP + PKC_minus_active -> PKC_minus_active_slash_PKC_minus_inact_minus_GAP_slash_PKC_minus_inact_minus_GAP_cplx; PKC_minus_active_slash_PKC_minus_inact_minus_GAP_1_k1*Ras_slash_GAP*PKC_minus_active - PKC_minus_active_slash_PKC_minus_inact_minus_GAP_1_k2*PKC_minus_active_slash_PKC_minus_inact_minus_GAP_slash_PKC_minus_inact_minus_GAP_cplx;
    PKC_minus_active_slash_PKC_minus_inact_minus_GAP_1_k1 = 1.875e-12 vol_uMINVsecINV; PKC_minus_active_slash_PKC_minus_inact_minus_GAP_1_k2 = 1e-10 vol_secINV;
  // k3*PKC_minus_active_slash_PKC_minus_inact_minus_GAP_slash_PKC_minus_inact_minus_GAP_cplx
  PKC_minus_active_slash_PKC_minus_inact_minus_GAP_2: PKC_minus_active_slash_PKC_minus_inact_minus_GAP_slash_PKC_minus_inact_minus_GAP_cplx => Ras_slash_GAP_star_ + PKC_minus_active; PKC_minus_active_slash_PKC_minus_inact_minus_GAP_2_k3*PKC_minus_active_slash_PKC_minus_inact_minus_GAP_slash_PKC_minus_inact_minus_GAP_cplx;
    PKC_minus_active_slash_PKC_minus_inact_minus_GAP_2_k3 = 2.5e-11 vol_secINV;
  // k1*Ras_slash_inact_minus_GEF*PKC_minus_active-k2*PKC_minus_active_slash_PKC_minus_act_minus_GEF_slash_PKC_minus_act_minus_GEF_cplx
  // Rate constants are generic PKC rates. See <a href = "http://www.ncbi.nlm.nih.gov/entrez/query.fcgi?cmd=Retrieve&db=pubmed&dopt=Abstract&list_uids=8424932">Chen SJ, Klann E, Gower MC, Powell CM, Sessoms JS, Sweatt JD. (1993) Biochemistry 32(4):1032-9</a>. This reaction activates GEF. Gives >= 2X stim of ras, and a 2X stim of MAPK over amount from direct phosph of c-raf. Note that it is a push-pull reaction, and also get effect through phosph and inact of GAPs.
  PKC_minus_active_slash_PKC_minus_act_minus_GEF_1: Ras_slash_inact_minus_GEF + PKC_minus_active -> PKC_minus_active_slash_PKC_minus_act_minus_GEF_slash_PKC_minus_act_minus_GEF_cplx; PKC_minus_active_slash_PKC_minus_act_minus_GEF_1_k1*Ras_slash_inact_minus_GEF*PKC_minus_active - PKC_minus_active_slash_PKC_minus_act_minus_GEF_1_k2*PKC_minus_active_slash_PKC_minus_act_minus_GEF_slash_PKC_minus_act_minus_GEF_cplx;
    PKC_minus_active_slash_PKC_minus_act_minus_GEF_1_k1 = 3e-13 vol_uMINVsecINV; PKC_minus_active_slash_PKC_minus_act_minus_GEF_1_k2 = 1.6e-11 vol_secINV;
  // k3*PKC_minus_active_slash_PKC_minus_act_minus_GEF_slash_PKC_minus_act_minus_GEF_cplx
  PKC_minus_active_slash_PKC_minus_act_minus_GEF_2: PKC_minus_active_slash_PKC_minus_act_minus_GEF_slash_PKC_minus_act_minus_GEF_cplx => Ras_slash_GEF_star_ + PKC_minus_active; PKC_minus_active_slash_PKC_minus_act_minus_GEF_2_k3*PKC_minus_active_slash_PKC_minus_act_minus_GEF_slash_PKC_minus_act_minus_GEF_cplx;
    PKC_minus_active_slash_PKC_minus_act_minus_GEF_2_k3 = 4e-12 vol_secINV;
  // k1*MAPK_slash_MAPK*MAPK_slash_MAPKK_star_-k2*MAPK_slash_MAPKK_star__slash_MAPKKtyr_slash_MAPKKtyr_cplx
  // The actual MAPKK is 2 forms from Seger et al JBC 267:20 14373(1992) Vmax = 150nmol/min/mg From Haystead et al FEBS 306(1):17-22 we get Km=46.6nM for at least one of the phosphs. Putting these together: k3=0.15/sec, ratio of 4 to get k2=0.6. k1=0.75/46.6nM=2.7e-5 In terms of Michaelis-Menten rates, Km = 0.046, Vmax = 0.15, ratio = 4.
  MAPK_slash_MAPKK_star__slash_MAPKKtyr_1: MAPK_slash_MAPK + MAPK_slash_MAPKK_star_ -> MAPK_slash_MAPKK_star__slash_MAPKKtyr_slash_MAPKKtyr_cplx; MAPK_slash_MAPKK_star__slash_MAPKKtyr_1_k1*MAPK_slash_MAPK*MAPK_slash_MAPKK_star_ - MAPK_slash_MAPKK_star__slash_MAPKKtyr_1_k2*MAPK_slash_MAPKK_star__slash_MAPKKtyr_slash_MAPKKtyr_cplx;
    MAPK_slash_MAPKK_star__slash_MAPKKtyr_1_k1 = 1.62e-11 vol_uMINVsecINV; MAPK_slash_MAPKK_star__slash_MAPKKtyr_1_k2 = 6e-13 vol_secINV;
  // k3*MAPK_slash_MAPKK_star__slash_MAPKKtyr_slash_MAPKKtyr_cplx
  MAPK_slash_MAPKK_star__slash_MAPKKtyr_2: MAPK_slash_MAPKK_star__slash_MAPKKtyr_slash_MAPKKtyr_cplx => MAPK_slash_MAPK_minus_tyr + MAPK_slash_MAPKK_star_; MAPK_slash_MAPKK_star__slash_MAPKKtyr_2_k3*MAPK_slash_MAPKK_star__slash_MAPKKtyr_slash_MAPKKtyr_cplx;
    MAPK_slash_MAPKK_star__slash_MAPKKtyr_2_k3 = 1.5e-13 vol_secINV;
  // k1*MAPK_slash_MAPK_minus_tyr*MAPK_slash_MAPKK_star_-k2*MAPK_slash_MAPKK_star__slash_MAPKKthr_slash_MAPKKthr_cplx
  // Rate consts same as for MAPKKtyr.
  MAPK_slash_MAPKK_star__slash_MAPKKthr_1: MAPK_slash_MAPK_minus_tyr + MAPK_slash_MAPKK_star_ -> MAPK_slash_MAPKK_star__slash_MAPKKthr_slash_MAPKKthr_cplx; MAPK_slash_MAPKK_star__slash_MAPKKthr_1_k1*MAPK_slash_MAPK_minus_tyr*MAPK_slash_MAPKK_star_ - MAPK_slash_MAPKK_star__slash_MAPKKthr_1_k2*MAPK_slash_MAPKK_star__slash_MAPKKthr_slash_MAPKKthr_cplx;
    MAPK_slash_MAPKK_star__slash_MAPKKthr_1_k1 = 1.62e-11 vol_uMINVsecINV; MAPK_slash_MAPKK_star__slash_MAPKKthr_1_k2 = 6e-13 vol_secINV;
  // k3*MAPK_slash_MAPKK_star__slash_MAPKKthr_slash_MAPKKthr_cplx
  MAPK_slash_MAPKK_star__slash_MAPKKthr_2: MAPK_slash_MAPKK_star__slash_MAPKKthr_slash_MAPKKthr_cplx => MAPK_star_ + MAPK_slash_MAPKK_star_; MAPK_slash_MAPKK_star__slash_MAPKKthr_2_k3*MAPK_slash_MAPKK_star__slash_MAPKKthr_slash_MAPKKthr_cplx;
    MAPK_slash_MAPKK_star__slash_MAPKKthr_2_k3 = 1.5e-13 vol_secINV;
  // k1*MAPK_slash_MAPKK*MAPK_slash_RGR-k2*MAPK_slash_RGR_slash_RGR_dot_1_slash_RGR_dot_1_cplx
  // Kinetics are the same as for the craf-1* activity, ie., k1=5.5e-6, k2=.42, k3 =0.105 These are based on Force et al PNAS USA 91 1270-1274 1994.
  MAPK_slash_RGR_slash_RGR_dot_1_1: MAPK_slash_MAPKK + MAPK_slash_RGR -> MAPK_slash_RGR_slash_RGR_dot_1_slash_RGR_dot_1_cplx; MAPK_slash_RGR_slash_RGR_dot_1_1_k1*MAPK_slash_MAPKK*MAPK_slash_RGR - MAPK_slash_RGR_slash_RGR_dot_1_1_k2*MAPK_slash_RGR_slash_RGR_dot_1_slash_RGR_dot_1_cplx;
    MAPK_slash_RGR_slash_RGR_dot_1_1_k1 = 3.3e-12 vol_uMINVsecINV; MAPK_slash_RGR_slash_RGR_dot_1_1_k2 = 4.2e-13 vol_secINV;
  // k3*MAPK_slash_RGR_slash_RGR_dot_1_slash_RGR_dot_1_cplx
  MAPK_slash_RGR_slash_RGR_dot_1_2: MAPK_slash_RGR_slash_RGR_dot_1_slash_RGR_dot_1_cplx => MAPK_slash_MAPKK_minus_ser + MAPK_slash_RGR; MAPK_slash_RGR_slash_RGR_dot_1_2_k3*MAPK_slash_RGR_slash_RGR_dot_1_slash_RGR_dot_1_cplx;
    MAPK_slash_RGR_slash_RGR_dot_1_2_k3 = 1.05e-13 vol_secINV;
  // k1*MAPK_slash_MAPKK_minus_ser*MAPK_slash_RGR-k2*MAPK_slash_RGR_slash_RGR_dot_2_slash_RGR_dot_2_cplx
  // Same kinetics as other c-raf activated forms. See Force et al PNAS 91 1270-1274 1994. k1 = 5.5e-6, k2 = .42, k3 = 0.105
  MAPK_slash_RGR_slash_RGR_dot_2_1: MAPK_slash_MAPKK_minus_ser + MAPK_slash_RGR -> MAPK_slash_RGR_slash_RGR_dot_2_slash_RGR_dot_2_cplx; MAPK_slash_RGR_slash_RGR_dot_2_1_k1*MAPK_slash_MAPKK_minus_ser*MAPK_slash_RGR - MAPK_slash_RGR_slash_RGR_dot_2_1_k2*MAPK_slash_RGR_slash_RGR_dot_2_slash_RGR_dot_2_cplx;
    MAPK_slash_RGR_slash_RGR_dot_2_1_k1 = 3.3e-12 vol_uMINVsecINV; MAPK_slash_RGR_slash_RGR_dot_2_1_k2 = 4.2e-13 vol_secINV;
  // k3*MAPK_slash_RGR_slash_RGR_dot_2_slash_RGR_dot_2_cplx
  MAPK_slash_RGR_slash_RGR_dot_2_2: MAPK_slash_RGR_slash_RGR_dot_2_slash_RGR_dot_2_cplx => MAPK_slash_MAPKK_star_ + MAPK_slash_RGR; MAPK_slash_RGR_slash_RGR_dot_2_2_k3*MAPK_slash_RGR_slash_RGR_dot_2_slash_RGR_dot_2_cplx;
    MAPK_slash_RGR_slash_RGR_dot_2_2_k3 = 1.05e-13 vol_secINV;
  // kcat*MAPK_slash_MKP_minus_1_star__star_*MAPK_slash_MAPK_minus_tyr/(Km+MAPK_slash_MAPK_minus_tyr)
  // 3 Feb 2000. Same rates as MKP-1.
  MAPK_slash_MKP_minus_1_star__star__slash_MKP1_star__minus_tyr_minus_deph: MAPK_slash_MAPK_minus_tyr => MAPK_slash_MAPK; MAPK_slash_MKP_minus_1_star__star__slash_MKP1_star__minus_tyr_minus_deph_kcat*MAPK_slash_MKP_minus_1_star__star_*MAPK_slash_MAPK_minus_tyr/(MAPK_slash_MKP_minus_1_star__star__slash_MKP1_star__minus_tyr_minus_deph_Km + MAPK_slash_MAPK_minus_tyr);  // modifiers: MAPK_slash_MKP_minus_1_star__star_
    MAPK_slash_MKP_minus_1_star__star__slash_MKP1_star__minus_tyr_minus_deph_kcat = 1e-12 vol_secINV; MAPK_slash_MKP_minus_1_star__star__slash_MKP1_star__minus_tyr_minus_deph_Km = 0.06666667 uM1;
  // kcat*MAPK_slash_MKP_minus_1_star__star_*MAPK_star_/(Km+MAPK_star_)
  // 3 Feb 2000. Same rates as MKP1
  MAPK_slash_MKP_minus_1_star__star__slash_MKP1_star__minus_thr_minus_deph: MAPK_star_ => MAPK_slash_MAPK_minus_tyr; MAPK_slash_MKP_minus_1_star__star__slash_MKP1_star__minus_thr_minus_deph_kcat*MAPK_slash_MKP_minus_1_star__star_*MAPK_star_/(MAPK_slash_MKP_minus_1_star__star__slash_MKP1_star__minus_thr_minus_deph_Km + MAPK_star_);  // modifiers: MAPK_slash_MKP_minus_1_star__star_
    MAPK_slash_MKP_minus_1_star__star__slash_MKP1_star__minus_thr_minus_deph_kcat = 1e-12 vol_secINV; MAPK_slash_MKP_minus_1_star__star__slash_MKP1_star__minus_thr_minus_deph_Km = 0.06666667 uM1;
  // k1*MAPK_slash_Nucleotides*MAPK_slash_nuc_MAPK_star_-k2*MAPK_slash_nuc_MAPK_star__slash_act_transcription_slash_act_transcription_cplx
  // This is a \'black box\' representation of a lot of steps. Constraint provided by determining rate of formation of MKP-1.
  MAPK_slash_nuc_MAPK_star__slash_act_transcription_1: $MAPK_slash_Nucleotides + MAPK_slash_nuc_MAPK_star_ -> MAPK_slash_nuc_MAPK_star__slash_act_transcription_slash_act_transcription_cplx; MAPK_slash_nuc_MAPK_star__slash_act_transcription_1_k1*MAPK_slash_Nucleotides*MAPK_slash_nuc_MAPK_star_ - MAPK_slash_nuc_MAPK_star__slash_act_transcription_1_k2*MAPK_slash_nuc_MAPK_star__slash_act_transcription_slash_act_transcription_cplx;
    MAPK_slash_nuc_MAPK_star__slash_act_transcription_1_k1 = 1.999992e-16 vol_uMINVsecINV; MAPK_slash_nuc_MAPK_star__slash_act_transcription_1_k2 = 6.4e-16 vol_secINV;
  // k3*MAPK_slash_nuc_MAPK_star__slash_act_transcription_slash_act_transcription_cplx
  MAPK_slash_nuc_MAPK_star__slash_act_transcription_2: MAPK_slash_nuc_MAPK_star__slash_act_transcription_slash_act_transcription_cplx => MAPK_slash_MKP1_minus_RNA + MAPK_slash_nuc_MAPK_star_; MAPK_slash_nuc_MAPK_star__slash_act_transcription_2_k3*MAPK_slash_nuc_MAPK_star__slash_act_transcription_slash_act_transcription_cplx;
    MAPK_slash_nuc_MAPK_star__slash_act_transcription_2_k3 = 1.6e-16 vol_secINV;
  // k1*MAPK_slash_MAPKK*MAPK_slash_Raf_star__minus_GTP_minus_Ras-k2*MAPK_slash_Raf_star__minus_GTP_minus_Ras_slash_Raf_star__minus_GTP_minus_Ras_dot_1_slash_Raf_star__minus_GTP_minus_Ras_dot_1_cplx
  // Kinetics are the same as for the craf-1* activity, ie., k1=1.1e-6, k2=.42, k3 =0.105 These are based on Force et al PNAS USA 91 1270-1274 1994. They report Km for MAPKK of 0.8 uM. and a Vmax of ~500 fm/min/ug. These parms cannot reach the observed 4X stimulation of MAPK. So we increase the affinity, ie, raise k1 5x to 5.5e-6 which is equivalent to 5-fold reduction in Km to about 0.16. This is, of course, dependent on the amount of MAPKK present.
  MAPK_slash_Raf_star__minus_GTP_minus_Ras_slash_Raf_star__minus_GTP_minus_Ras_dot_1_1: MAPK_slash_MAPKK + MAPK_slash_Raf_star__minus_GTP_minus_Ras -> MAPK_slash_Raf_star__minus_GTP_minus_Ras_slash_Raf_star__minus_GTP_minus_Ras_dot_1_slash_Raf_star__minus_GTP_minus_Ras_dot_1_cplx; MAPK_slash_Raf_star__minus_GTP_minus_Ras_slash_Raf_star__minus_GTP_minus_Ras_dot_1_1_k1*MAPK_slash_MAPKK*MAPK_slash_Raf_star__minus_GTP_minus_Ras - MAPK_slash_Raf_star__minus_GTP_minus_Ras_slash_Raf_star__minus_GTP_minus_Ras_dot_1_1_k2*MAPK_slash_Raf_star__minus_GTP_minus_Ras_slash_Raf_star__minus_GTP_minus_Ras_dot_1_slash_Raf_star__minus_GTP_minus_Ras_dot_1_cplx;
    MAPK_slash_Raf_star__minus_GTP_minus_Ras_slash_Raf_star__minus_GTP_minus_Ras_dot_1_1_k1 = 3.3e-12 vol_uMINVsecINV; MAPK_slash_Raf_star__minus_GTP_minus_Ras_slash_Raf_star__minus_GTP_minus_Ras_dot_1_1_k2 = 4.2e-13 vol_secINV;
  // k3*MAPK_slash_Raf_star__minus_GTP_minus_Ras_slash_Raf_star__minus_GTP_minus_Ras_dot_1_slash_Raf_star__minus_GTP_minus_Ras_dot_1_cplx
  MAPK_slash_Raf_star__minus_GTP_minus_Ras_slash_Raf_star__minus_GTP_minus_Ras_dot_1_2: MAPK_slash_Raf_star__minus_GTP_minus_Ras_slash_Raf_star__minus_GTP_minus_Ras_dot_1_slash_Raf_star__minus_GTP_minus_Ras_dot_1_cplx => MAPK_slash_MAPKK_minus_ser + MAPK_slash_Raf_star__minus_GTP_minus_Ras; MAPK_slash_Raf_star__minus_GTP_minus_Ras_slash_Raf_star__minus_GTP_minus_Ras_dot_1_2_k3*MAPK_slash_Raf_star__minus_GTP_minus_Ras_slash_Raf_star__minus_GTP_minus_Ras_dot_1_slash_Raf_star__minus_GTP_minus_Ras_dot_1_cplx;
    MAPK_slash_Raf_star__minus_GTP_minus_Ras_slash_Raf_star__minus_GTP_minus_Ras_dot_1_2_k3 = 1.05e-13 vol_secINV;
  // k1*MAPK_slash_MAPKK_minus_ser*MAPK_slash_Raf_star__minus_GTP_minus_Ras-k2*MAPK_slash_Raf_star__minus_GTP_minus_Ras_slash_Raf_star__minus_GTP_minus_Ras_dot_2_slash_Raf_star__minus_GTP_minus_Ras_dot_2_cplx
  // Same kinetics as other c-raf activated forms. See Force et al PNAS 91 1270-1274 1994.
  MAPK_slash_Raf_star__minus_GTP_minus_Ras_slash_Raf_star__minus_GTP_minus_Ras_dot_2_1: MAPK_slash_MAPKK_minus_ser + MAPK_slash_Raf_star__minus_GTP_minus_Ras -> MAPK_slash_Raf_star__minus_GTP_minus_Ras_slash_Raf_star__minus_GTP_minus_Ras_dot_2_slash_Raf_star__minus_GTP_minus_Ras_dot_2_cplx; MAPK_slash_Raf_star__minus_GTP_minus_Ras_slash_Raf_star__minus_GTP_minus_Ras_dot_2_1_k1*MAPK_slash_MAPKK_minus_ser*MAPK_slash_Raf_star__minus_GTP_minus_Ras - MAPK_slash_Raf_star__minus_GTP_minus_Ras_slash_Raf_star__minus_GTP_minus_Ras_dot_2_1_k2*MAPK_slash_Raf_star__minus_GTP_minus_Ras_slash_Raf_star__minus_GTP_minus_Ras_dot_2_slash_Raf_star__minus_GTP_minus_Ras_dot_2_cplx;
    MAPK_slash_Raf_star__minus_GTP_minus_Ras_slash_Raf_star__minus_GTP_minus_Ras_dot_2_1_k1 = 3.3e-12 vol_uMINVsecINV; MAPK_slash_Raf_star__minus_GTP_minus_Ras_slash_Raf_star__minus_GTP_minus_Ras_dot_2_1_k2 = 4.2e-13 vol_secINV;
  // k3*MAPK_slash_Raf_star__minus_GTP_minus_Ras_slash_Raf_star__minus_GTP_minus_Ras_dot_2_slash_Raf_star__minus_GTP_minus_Ras_dot_2_cplx
  MAPK_slash_Raf_star__minus_GTP_minus_Ras_slash_Raf_star__minus_GTP_minus_Ras_dot_2_2: MAPK_slash_Raf_star__minus_GTP_minus_Ras_slash_Raf_star__minus_GTP_minus_Ras_dot_2_slash_Raf_star__minus_GTP_minus_Ras_dot_2_cplx => MAPK_slash_MAPKK_star_ + MAPK_slash_Raf_star__minus_GTP_minus_Ras; MAPK_slash_Raf_star__minus_GTP_minus_Ras_slash_Raf_star__minus_GTP_minus_Ras_dot_2_2_k3*MAPK_slash_Raf_star__minus_GTP_minus_Ras_slash_Raf_star__minus_GTP_minus_Ras_dot_2_slash_Raf_star__minus_GTP_minus_Ras_dot_2_cplx;
    MAPK_slash_Raf_star__minus_GTP_minus_Ras_slash_Raf_star__minus_GTP_minus_Ras_dot_2_2_k3 = 1.05e-13 vol_secINV;
  // k1*MAPK_slash_craf_minus_1_star_*MAPK_star_-k2*MAPK_star__slash_MAPK_star__minus_feedback_slash_MAPK_star__minus_feedback_cplx
  // Ueki et al JBC 269(22):15756-15761 show the presence of this step, but not the rate consts, which are derived from Sanghera et al JBC 265(1):52-57, 1990, see the deriv in the MAPK* notes.
  MAPK_star__slash_MAPK_star__minus_feedback_1: MAPK_slash_craf_minus_1_star_ + MAPK_star_ -> MAPK_star__slash_MAPK_star__minus_feedback_slash_MAPK_star__minus_feedback_cplx; MAPK_star__slash_MAPK_star__minus_feedback_1_k1*MAPK_slash_craf_minus_1_star_*MAPK_star_ - MAPK_star__slash_MAPK_star__minus_feedback_1_k2*MAPK_star__slash_MAPK_star__minus_feedback_slash_MAPK_star__minus_feedback_cplx;
    MAPK_star__slash_MAPK_star__minus_feedback_1_k1 = 1.95e-12 vol_uMINVsecINV; MAPK_star__slash_MAPK_star__minus_feedback_1_k2 = 4e-11 vol_secINV;
  // k3*MAPK_star__slash_MAPK_star__minus_feedback_slash_MAPK_star__minus_feedback_cplx
  MAPK_star__slash_MAPK_star__minus_feedback_2: MAPK_star__slash_MAPK_star__minus_feedback_slash_MAPK_star__minus_feedback_cplx => MAPK_slash_craf_minus_1_star__star_ + MAPK_star_; MAPK_star__slash_MAPK_star__minus_feedback_2_k3*MAPK_star__slash_MAPK_star__minus_feedback_slash_MAPK_star__minus_feedback_cplx;
    MAPK_star__slash_MAPK_star__minus_feedback_2_k3 = 1e-11 vol_secINV;
  // k1*PLA2_slash_PLA2_minus_cytosolic*MAPK_star_-k2*MAPK_star__slash_MAPK_star__slash_MAPK_star__cplx
  // Km = 25uM @ 50 uM ATP and 1mg/ml MBP (huge XS of substrate) Vmax = 4124 pmol/min/ml at a conc of 125 pmol/ml of enz. Numbers are from Sanghera et al JBC 265 pp 52 , 1990. From Nemenoff et al 1993 JBC 268(3):1960-1964 - using Sanghera\'s 1e-4 ratio of MAPK to protein, we get k3 = 7/sec from 1000 pmol/min/mg total protein in fig 5 I take the Vmax to be higher for PLA2 given the fold activation of PLA2 by MAPK. This is actually a balance term between MAPK and the dephosphorylation step.
  MAPK_star__slash_MAPK_star__1: PLA2_slash_PLA2_minus_cytosolic + MAPK_star_ -> MAPK_star__slash_MAPK_star__slash_MAPK_star__cplx; MAPK_star__slash_MAPK_star__1_k1*PLA2_slash_PLA2_minus_cytosolic*MAPK_star_ - MAPK_star__slash_MAPK_star__1_k2*MAPK_star__slash_MAPK_star__slash_MAPK_star__cplx;
    MAPK_star__slash_MAPK_star__1_k1 = 3.9e-12 vol_uMINVsecINV; MAPK_star__slash_MAPK_star__1_k2 = 8e-11 vol_secINV;
  // k3*MAPK_star__slash_MAPK_star__slash_MAPK_star__cplx
  MAPK_star__slash_MAPK_star__2: MAPK_star__slash_MAPK_star__slash_MAPK_star__cplx => PLA2_slash_PLA2_star_ + MAPK_star_; MAPK_star__slash_MAPK_star__2_k3*MAPK_star__slash_MAPK_star__slash_MAPK_star__cplx;
    MAPK_star__slash_MAPK_star__2_k3 = 2e-11 vol_secINV;
  // k1*MKP_minus_1*MAPK_star_-k2*MAPK_star__slash_MKP_minus_1_minus_phosph_slash_MKP_minus_1_minus_phosph_cplx
  // 3 Feb 2000. See Brondello et al Science 286:2514 1999. Rates assumed standard MAPK rates based on Sanghera et al JBC 265(1):53-57 1990. The Vmax is scaled down 10 fold to match the time-course of phosph by MAPK, from the Brondello paper.
  MAPK_star__slash_MKP_minus_1_minus_phosph_1: MKP_minus_1 + MAPK_star_ -> MAPK_star__slash_MKP_minus_1_minus_phosph_slash_MKP_minus_1_minus_phosph_cplx; MAPK_star__slash_MKP_minus_1_minus_phosph_1_k1*MKP_minus_1*MAPK_star_ - MAPK_star__slash_MKP_minus_1_minus_phosph_1_k2*MAPK_star__slash_MKP_minus_1_minus_phosph_slash_MKP_minus_1_minus_phosph_cplx;
    MAPK_star__slash_MKP_minus_1_minus_phosph_1_k1 = 1.95e-13 vol_uMINVsecINV; MAPK_star__slash_MKP_minus_1_minus_phosph_1_k2 = 4e-12 vol_secINV;
  // k3*MAPK_star__slash_MKP_minus_1_minus_phosph_slash_MKP_minus_1_minus_phosph_cplx
  MAPK_star__slash_MKP_minus_1_minus_phosph_2: MAPK_star__slash_MKP_minus_1_minus_phosph_slash_MKP_minus_1_minus_phosph_cplx => MAPK_slash_MKP_minus_1_minus_ser359_star_ + MAPK_star_; MAPK_star__slash_MKP_minus_1_minus_phosph_2_k3*MAPK_star__slash_MKP_minus_1_minus_phosph_slash_MKP_minus_1_minus_phosph_cplx;
    MAPK_star__slash_MKP_minus_1_minus_phosph_2_k3 = 1e-12 vol_secINV;
  // k1*MAPK_slash_MKP_minus_1_minus_ser359_star_*MAPK_star_-k2*MAPK_star__slash_MKP_minus_1_minus_phosph2_slash_MKP_minus_1_minus_phosph2_cplx
  // 3 Feb 2000. See Brondello et al Science 286:2514 1999. Rates assumed standard MAPK rates based on Sanghera et al JBC 265(1):53-57 1990. The Vmax is scaled down by 10 fold to match the time-courses from the Brondello experiment.
  MAPK_star__slash_MKP_minus_1_minus_phosph2_1: MAPK_slash_MKP_minus_1_minus_ser359_star_ + MAPK_star_ -> MAPK_star__slash_MKP_minus_1_minus_phosph2_slash_MKP_minus_1_minus_phosph2_cplx; MAPK_star__slash_MKP_minus_1_minus_phosph2_1_k1*MAPK_slash_MKP_minus_1_minus_ser359_star_*MAPK_star_ - MAPK_star__slash_MKP_minus_1_minus_phosph2_1_k2*MAPK_star__slash_MKP_minus_1_minus_phosph2_slash_MKP_minus_1_minus_phosph2_cplx;
    MAPK_star__slash_MKP_minus_1_minus_phosph2_1_k1 = 1.95e-13 vol_uMINVsecINV; MAPK_star__slash_MKP_minus_1_minus_phosph2_1_k2 = 4e-12 vol_secINV;
  // k3*MAPK_star__slash_MKP_minus_1_minus_phosph2_slash_MKP_minus_1_minus_phosph2_cplx
  MAPK_star__slash_MKP_minus_1_minus_phosph2_2: MAPK_star__slash_MKP_minus_1_minus_phosph2_slash_MKP_minus_1_minus_phosph2_cplx => MAPK_slash_MKP_minus_1_star__star_ + MAPK_star_; MAPK_star__slash_MKP_minus_1_minus_phosph2_2_k3*MAPK_star__slash_MKP_minus_1_minus_phosph2_slash_MKP_minus_1_minus_phosph2_cplx;
    MAPK_star__slash_MKP_minus_1_minus_phosph2_2_k3 = 1e-12 vol_secINV;
  // kcat*MKP_minus_1*MAPK_slash_MAPK_minus_tyr/(Km+MAPK_slash_MAPK_minus_tyr)
  // The original kinetics from Bhalla and Iyengar Science 1999 have now been modified to obey the k2 = 4 * k3 rule, while keeping kcat and Km fixed. The main constraining data point is the time course of MAPK dephosphorylation, which this model satisfies. See Charles et al 1993 PNAS 90:5292-5296 and Charles et al Oncogene 7:187-190 Effective Km : 67 nM kcat = 1.43 umol/min/mg
  MKP_minus_1_slash_MKP1_minus_tyr_minus_deph: MAPK_slash_MAPK_minus_tyr => MAPK_slash_MAPK; MKP_minus_1_slash_MKP1_minus_tyr_minus_deph_kcat*MKP_minus_1*MAPK_slash_MAPK_minus_tyr/(MKP_minus_1_slash_MKP1_minus_tyr_minus_deph_Km + MAPK_slash_MAPK_minus_tyr);  // modifiers: MKP_minus_1
    MKP_minus_1_slash_MKP1_minus_tyr_minus_deph_kcat = 1e-12 vol_secINV; MKP_minus_1_slash_MKP1_minus_tyr_minus_deph_Km = 0.06666667 uM1;
  // kcat*MKP_minus_1*MAPK_star_/(Km+MAPK_star_)
  // See MKP1-tyr-deph
  MKP_minus_1_slash_MKP1_minus_thr_minus_deph: MAPK_star_ => MAPK_slash_MAPK_minus_tyr; MKP_minus_1_slash_MKP1_minus_thr_minus_deph_kcat*MKP_minus_1*MAPK_star_/(MKP_minus_1_slash_MKP1_minus_thr_minus_deph_Km + MAPK_star_);  // modifiers: MKP_minus_1
    MKP_minus_1_slash_MKP1_minus_thr_minus_deph_kcat = 1e-12 vol_secINV; MKP_minus_1_slash_MKP1_minus_thr_minus_deph_Km = 0.06666667 uM1;
  // k1*MAPK_slash_craf_minus_1_star_*PPhosphatase2A-k2*PPhosphatase2A_slash_craf_minus_deph_slash_craf_minus_deph_cplx
  // See parent PPhosphatase2A for parms
  PPhosphatase2A_slash_craf_minus_deph_1: MAPK_slash_craf_minus_1_star_ + PPhosphatase2A -> PPhosphatase2A_slash_craf_minus_deph_slash_craf_minus_deph_cplx; PPhosphatase2A_slash_craf_minus_deph_1_k1*MAPK_slash_craf_minus_1_star_*PPhosphatase2A - PPhosphatase2A_slash_craf_minus_deph_1_k2*PPhosphatase2A_slash_craf_minus_deph_slash_craf_minus_deph_cplx;
    PPhosphatase2A_slash_craf_minus_deph_1_k1 = 1.98e-12 vol_uMINVsecINV; PPhosphatase2A_slash_craf_minus_deph_1_k2 = 2.5e-11 vol_secINV;
  // k3*PPhosphatase2A_slash_craf_minus_deph_slash_craf_minus_deph_cplx
  PPhosphatase2A_slash_craf_minus_deph_2: PPhosphatase2A_slash_craf_minus_deph_slash_craf_minus_deph_cplx => MAPK_slash_craf_minus_1 + PPhosphatase2A; PPhosphatase2A_slash_craf_minus_deph_2_k3*PPhosphatase2A_slash_craf_minus_deph_slash_craf_minus_deph_cplx;
    PPhosphatase2A_slash_craf_minus_deph_2_k3 = 6e-12 vol_secINV;
  // k1*MAPK_slash_MAPKK_star_*PPhosphatase2A-k2*PPhosphatase2A_slash_MAPKK_minus_deph_slash_MAPKK_minus_deph_cplx
  // See: Kyriakis et al Nature 358 pp 417-421 1992 Ahn et al Curr Op Cell Biol 4:992-999 1992 for this pathway. See parent PPhosphatase2A for parms.
  PPhosphatase2A_slash_MAPKK_minus_deph_1: MAPK_slash_MAPKK_star_ + PPhosphatase2A -> PPhosphatase2A_slash_MAPKK_minus_deph_slash_MAPKK_minus_deph_cplx; PPhosphatase2A_slash_MAPKK_minus_deph_1_k1*MAPK_slash_MAPKK_star_*PPhosphatase2A - PPhosphatase2A_slash_MAPKK_minus_deph_1_k2*PPhosphatase2A_slash_MAPKK_minus_deph_slash_MAPKK_minus_deph_cplx;
    PPhosphatase2A_slash_MAPKK_minus_deph_1_k1 = 1.98e-12 vol_uMINVsecINV; PPhosphatase2A_slash_MAPKK_minus_deph_1_k2 = 2.5e-11 vol_secINV;
  // k3*PPhosphatase2A_slash_MAPKK_minus_deph_slash_MAPKK_minus_deph_cplx
  PPhosphatase2A_slash_MAPKK_minus_deph_2: PPhosphatase2A_slash_MAPKK_minus_deph_slash_MAPKK_minus_deph_cplx => MAPK_slash_MAPKK_minus_ser + PPhosphatase2A; PPhosphatase2A_slash_MAPKK_minus_deph_2_k3*PPhosphatase2A_slash_MAPKK_minus_deph_slash_MAPKK_minus_deph_cplx;
    PPhosphatase2A_slash_MAPKK_minus_deph_2_k3 = 6e-12 vol_secINV;
  // k1*MAPK_slash_MAPKK_minus_ser*PPhosphatase2A-k2*PPhosphatase2A_slash_MAPKK_minus_deph_minus_ser_slash_MAPKK_minus_deph_minus_ser_cplx
  // See parent PPhostphatase2A description for rate details
  PPhosphatase2A_slash_MAPKK_minus_deph_minus_ser_1: MAPK_slash_MAPKK_minus_ser + PPhosphatase2A -> PPhosphatase2A_slash_MAPKK_minus_deph_minus_ser_slash_MAPKK_minus_deph_minus_ser_cplx; PPhosphatase2A_slash_MAPKK_minus_deph_minus_ser_1_k1*MAPK_slash_MAPKK_minus_ser*PPhosphatase2A - PPhosphatase2A_slash_MAPKK_minus_deph_minus_ser_1_k2*PPhosphatase2A_slash_MAPKK_minus_deph_minus_ser_slash_MAPKK_minus_deph_minus_ser_cplx;
    PPhosphatase2A_slash_MAPKK_minus_deph_minus_ser_1_k1 = 1.98e-12 vol_uMINVsecINV; PPhosphatase2A_slash_MAPKK_minus_deph_minus_ser_1_k2 = 2.5e-11 vol_secINV;
  // k3*PPhosphatase2A_slash_MAPKK_minus_deph_minus_ser_slash_MAPKK_minus_deph_minus_ser_cplx
  PPhosphatase2A_slash_MAPKK_minus_deph_minus_ser_2: PPhosphatase2A_slash_MAPKK_minus_deph_minus_ser_slash_MAPKK_minus_deph_minus_ser_cplx => MAPK_slash_MAPKK + PPhosphatase2A; PPhosphatase2A_slash_MAPKK_minus_deph_minus_ser_2_k3*PPhosphatase2A_slash_MAPKK_minus_deph_minus_ser_slash_MAPKK_minus_deph_minus_ser_cplx;
    PPhosphatase2A_slash_MAPKK_minus_deph_minus_ser_2_k3 = 6e-12 vol_secINV;
  // k1*MAPK_slash_craf_minus_1_star__star_*PPhosphatase2A-k2*PPhosphatase2A_slash_craf_star__star__minus_deph_slash_craf_star__star__minus_deph_cplx
  // Ueki et al JBC 269(22) pp 15756-15761 1994 show hyperphosphorylation of craf, so this is there to dephosphorylate it. Identity of phosphatase is assumed to be PP2A.
  PPhosphatase2A_slash_craf_star__star__minus_deph_1: MAPK_slash_craf_minus_1_star__star_ + PPhosphatase2A -> PPhosphatase2A_slash_craf_star__star__minus_deph_slash_craf_star__star__minus_deph_cplx; PPhosphatase2A_slash_craf_star__star__minus_deph_1_k1*MAPK_slash_craf_minus_1_star__star_*PPhosphatase2A - PPhosphatase2A_slash_craf_star__star__minus_deph_1_k2*PPhosphatase2A_slash_craf_star__star__minus_deph_slash_craf_star__star__minus_deph_cplx;
    PPhosphatase2A_slash_craf_star__star__minus_deph_1_k1 = 1.98e-12 vol_uMINVsecINV; PPhosphatase2A_slash_craf_star__star__minus_deph_1_k2 = 2.5e-11 vol_secINV;
  // k3*PPhosphatase2A_slash_craf_star__star__minus_deph_slash_craf_star__star__minus_deph_cplx
  PPhosphatase2A_slash_craf_star__star__minus_deph_2: PPhosphatase2A_slash_craf_star__star__minus_deph_slash_craf_star__star__minus_deph_cplx => MAPK_slash_craf_minus_1_star_ + PPhosphatase2A; PPhosphatase2A_slash_craf_star__star__minus_deph_2_k3*PPhosphatase2A_slash_craf_star__star__minus_deph_slash_craf_star__star__minus_deph_cplx;
    PPhosphatase2A_slash_craf_star__star__minus_deph_2_k3 = 6e-12 vol_secINV;
  // k1*PLA2_slash_APC*PLA2_slash_PLA2_minus_Ca_star_-k2*PLA2_slash_PLA2_minus_Ca_star__slash_kenz_slash_kenz_cplx
  // Based on Leslie and Channon 1990 BBA 1045:261, in relation to the other PLA2 inputs (not including MAPK). Ca alone is rather a weak input.
  PLA2_slash_PLA2_minus_Ca_star__slash_kenz_1: $PLA2_slash_APC + PLA2_slash_PLA2_minus_Ca_star_ -> PLA2_slash_PLA2_minus_Ca_star__slash_kenz_slash_kenz_cplx; PLA2_slash_PLA2_minus_Ca_star__slash_kenz_1_k1*PLA2_slash_APC*PLA2_slash_PLA2_minus_Ca_star_ - PLA2_slash_PLA2_minus_Ca_star__slash_kenz_1_k2*PLA2_slash_PLA2_minus_Ca_star__slash_kenz_slash_kenz_cplx;
    PLA2_slash_PLA2_minus_Ca_star__slash_kenz_1_k1 = 1.35e-12 vol_uMINVsecINV; PLA2_slash_PLA2_minus_Ca_star__slash_kenz_1_k2 = 2.16e-11 vol_secINV;
  // k3*PLA2_slash_PLA2_minus_Ca_star__slash_kenz_slash_kenz_cplx
  PLA2_slash_PLA2_minus_Ca_star__slash_kenz_2: PLA2_slash_PLA2_minus_Ca_star__slash_kenz_slash_kenz_cplx => AA + PLA2_slash_PLA2_minus_Ca_star_; PLA2_slash_PLA2_minus_Ca_star__slash_kenz_2_k3*PLA2_slash_PLA2_minus_Ca_star__slash_kenz_slash_kenz_cplx;
    PLA2_slash_PLA2_minus_Ca_star__slash_kenz_2_k3 = 5.4e-12 vol_secINV;
  // k1*PLA2_slash_APC*PLA2_slash_PIP2_minus_PLA2_star_-k2*PLA2_slash_PIP2_minus_PLA2_star__slash_kenz_slash_kenz_cplx
  // Based on Leslie and Channon 1990 BBA 1045:261.
  PLA2_slash_PIP2_minus_PLA2_star__slash_kenz_1: $PLA2_slash_APC + PLA2_slash_PIP2_minus_PLA2_star_ -> PLA2_slash_PIP2_minus_PLA2_star__slash_kenz_slash_kenz_cplx; PLA2_slash_PIP2_minus_PLA2_star__slash_kenz_1_k1*PLA2_slash_APC*PLA2_slash_PIP2_minus_PLA2_star_ - PLA2_slash_PIP2_minus_PLA2_star__slash_kenz_1_k2*PLA2_slash_PIP2_minus_PLA2_star__slash_kenz_slash_kenz_cplx;
    PLA2_slash_PIP2_minus_PLA2_star__slash_kenz_1_k1 = 2.76e-12 vol_uMINVsecINV; PLA2_slash_PIP2_minus_PLA2_star__slash_kenz_1_k2 = 4.416e-11 vol_secINV;
  // k3*PLA2_slash_PIP2_minus_PLA2_star__slash_kenz_slash_kenz_cplx
  PLA2_slash_PIP2_minus_PLA2_star__slash_kenz_2: PLA2_slash_PIP2_minus_PLA2_star__slash_kenz_slash_kenz_cplx => AA + PLA2_slash_PIP2_minus_PLA2_star_; PLA2_slash_PIP2_minus_PLA2_star__slash_kenz_2_k3*PLA2_slash_PIP2_minus_PLA2_star__slash_kenz_slash_kenz_cplx;
    PLA2_slash_PIP2_minus_PLA2_star__slash_kenz_2_k3 = 1.104e-11 vol_secINV;
  // k1*PLA2_slash_APC*PLA2_slash_PIP2_minus_Ca_minus_PLA2_star_-k2*PLA2_slash_PIP2_minus_Ca_minus_PLA2_star__slash_kenz_slash_kenz_cplx
  // Based on AA generation by different stimuli according to Leslie and Channon 1990 BBA 1045:261
  PLA2_slash_PIP2_minus_Ca_minus_PLA2_star__slash_kenz_1: $PLA2_slash_APC + PLA2_slash_PIP2_minus_Ca_minus_PLA2_star_ -> PLA2_slash_PIP2_minus_Ca_minus_PLA2_star__slash_kenz_slash_kenz_cplx; PLA2_slash_PIP2_minus_Ca_minus_PLA2_star__slash_kenz_1_k1*PLA2_slash_APC*PLA2_slash_PIP2_minus_Ca_minus_PLA2_star_ - PLA2_slash_PIP2_minus_Ca_minus_PLA2_star__slash_kenz_1_k2*PLA2_slash_PIP2_minus_Ca_minus_PLA2_star__slash_kenz_slash_kenz_cplx;
    PLA2_slash_PIP2_minus_Ca_minus_PLA2_star__slash_kenz_1_k1 = 9e-12 vol_uMINVsecINV; PLA2_slash_PIP2_minus_Ca_minus_PLA2_star__slash_kenz_1_k2 = 1.44e-10 vol_secINV;
  // k3*PLA2_slash_PIP2_minus_Ca_minus_PLA2_star__slash_kenz_slash_kenz_cplx
  PLA2_slash_PIP2_minus_Ca_minus_PLA2_star__slash_kenz_2: PLA2_slash_PIP2_minus_Ca_minus_PLA2_star__slash_kenz_slash_kenz_cplx => AA + PLA2_slash_PIP2_minus_Ca_minus_PLA2_star_; PLA2_slash_PIP2_minus_Ca_minus_PLA2_star__slash_kenz_2_k3*PLA2_slash_PIP2_minus_Ca_minus_PLA2_star__slash_kenz_slash_kenz_cplx;
    PLA2_slash_PIP2_minus_Ca_minus_PLA2_star__slash_kenz_2_k3 = 3.6e-11 vol_secINV;
  // k1*PLA2_slash_APC*PLA2_slash_DAG_minus_Ca_minus_PLA2_star_-k2*PLA2_slash_DAG_minus_Ca_minus_PLA2_star__slash_kenz_slash_kenz_cplx
  // Based on Leslie and Channon 1990 BBA 1045:261.
  PLA2_slash_DAG_minus_Ca_minus_PLA2_star__slash_kenz_1: $PLA2_slash_APC + PLA2_slash_DAG_minus_Ca_minus_PLA2_star_ -> PLA2_slash_DAG_minus_Ca_minus_PLA2_star__slash_kenz_slash_kenz_cplx; PLA2_slash_DAG_minus_Ca_minus_PLA2_star__slash_kenz_1_k1*PLA2_slash_APC*PLA2_slash_DAG_minus_Ca_minus_PLA2_star_ - PLA2_slash_DAG_minus_Ca_minus_PLA2_star__slash_kenz_1_k2*PLA2_slash_DAG_minus_Ca_minus_PLA2_star__slash_kenz_slash_kenz_cplx;
    PLA2_slash_DAG_minus_Ca_minus_PLA2_star__slash_kenz_1_k1 = 1.5e-11 vol_uMINVsecINV; PLA2_slash_DAG_minus_Ca_minus_PLA2_star__slash_kenz_1_k2 = 2.4e-10 vol_secINV;
  // k3*PLA2_slash_DAG_minus_Ca_minus_PLA2_star__slash_kenz_slash_kenz_cplx
  PLA2_slash_DAG_minus_Ca_minus_PLA2_star__slash_kenz_2: PLA2_slash_DAG_minus_Ca_minus_PLA2_star__slash_kenz_slash_kenz_cplx => AA + PLA2_slash_DAG_minus_Ca_minus_PLA2_star_; PLA2_slash_DAG_minus_Ca_minus_PLA2_star__slash_kenz_2_k3*PLA2_slash_DAG_minus_Ca_minus_PLA2_star__slash_kenz_slash_kenz_cplx;
    PLA2_slash_DAG_minus_Ca_minus_PLA2_star__slash_kenz_2_k3 = 6e-11 vol_secINV;
  // k1*PLA2_slash_APC*PLA2_slash_PLA2_star__minus_Ca-k2*PLA2_slash_PLA2_star__minus_Ca_slash_kenz_slash_kenz_cplx
  // This form should be 3 to 6 times as fast as the Ca-only form, from Lin et al 1993 Cell 269-278 Nemenoff et al 1993 JBC 268:1960 Several forms contribute to the Ca-stimulated form, so this rate has to be a factor larger than their total contribution. I assign Vmax as the scale factor here because there is lots of APC substrate, so all the PLA2 complex enzymes are limited primarily by Vmax.
  PLA2_slash_PLA2_star__minus_Ca_slash_kenz_1: $PLA2_slash_APC + PLA2_slash_PLA2_star__minus_Ca -> PLA2_slash_PLA2_star__minus_Ca_slash_kenz_slash_kenz_cplx; PLA2_slash_PLA2_star__minus_Ca_slash_kenz_1_k1*PLA2_slash_APC*PLA2_slash_PLA2_star__minus_Ca - PLA2_slash_PLA2_star__minus_Ca_slash_kenz_1_k2*PLA2_slash_PLA2_star__minus_Ca_slash_kenz_slash_kenz_cplx;
    PLA2_slash_PLA2_star__minus_Ca_slash_kenz_1_k1 = 3e-11 vol_uMINVsecINV; PLA2_slash_PLA2_star__minus_Ca_slash_kenz_1_k2 = 4.8e-10 vol_secINV;
  // k3*PLA2_slash_PLA2_star__minus_Ca_slash_kenz_slash_kenz_cplx
  PLA2_slash_PLA2_star__minus_Ca_slash_kenz_2: PLA2_slash_PLA2_star__minus_Ca_slash_kenz_slash_kenz_cplx => AA + PLA2_slash_PLA2_star__minus_Ca; PLA2_slash_PLA2_star__minus_Ca_slash_kenz_2_k3*PLA2_slash_PLA2_star__minus_Ca_slash_kenz_slash_kenz_cplx;
    PLA2_slash_PLA2_star__minus_Ca_slash_kenz_2_k3 = 1.2e-10 vol_secINV;
  // k1*Ras_slash_GDP_minus_Ras*Ras_slash_GEF_star_-k2*Ras_slash_GEF_star__slash_GEF_star__minus_act_minus_ras_slash_GEF_star__minus_act_minus_ras_cplx
  // Kinetics from Orita et al JBC 268(34):25542-25546. Note that the Vmax is slow, but it does match the slow GTP hydrolysis rates.
  Ras_slash_GEF_star__slash_GEF_star__minus_act_minus_ras_1: Ras_slash_GDP_minus_Ras + Ras_slash_GEF_star_ -> Ras_slash_GEF_star__slash_GEF_star__minus_act_minus_ras_slash_GEF_star__minus_act_minus_ras_cplx; Ras_slash_GEF_star__slash_GEF_star__minus_act_minus_ras_1_k1*Ras_slash_GDP_minus_Ras*Ras_slash_GEF_star_ - Ras_slash_GEF_star__slash_GEF_star__minus_act_minus_ras_1_k2*Ras_slash_GEF_star__slash_GEF_star__minus_act_minus_ras_slash_GEF_star__minus_act_minus_ras_cplx;
    Ras_slash_GEF_star__slash_GEF_star__minus_act_minus_ras_1_k1 = 1.98e-13 vol_uMINVsecINV; Ras_slash_GEF_star__slash_GEF_star__minus_act_minus_ras_1_k2 = 8e-14 vol_secINV;
  // k3*Ras_slash_GEF_star__slash_GEF_star__minus_act_minus_ras_slash_GEF_star__minus_act_minus_ras_cplx
  Ras_slash_GEF_star__slash_GEF_star__minus_act_minus_ras_2: Ras_slash_GEF_star__slash_GEF_star__minus_act_minus_ras_slash_GEF_star__minus_act_minus_ras_cplx => Ras_slash_GTP_minus_Ras + Ras_slash_GEF_star_; Ras_slash_GEF_star__slash_GEF_star__minus_act_minus_ras_2_k3*Ras_slash_GEF_star__slash_GEF_star__minus_act_minus_ras_slash_GEF_star__minus_act_minus_ras_cplx;
    Ras_slash_GEF_star__slash_GEF_star__minus_act_minus_ras_2_k3 = 2e-14 vol_secINV;
  // k1*Ras_slash_GTP_minus_Ras*Ras_slash_GAP-k2*Ras_slash_GAP_slash_GAP_minus_inact_minus_ras_slash_GAP_minus_inact_minus_ras_cplx
  // From Eccleston et al JBC 268(36)pp27012-19 get Kd < 2uM, kcat - 10/sec From Martin et al Cell 63 843-849 1990 get Kd ~ 250 nM, kcat = 20/min I will go with the Eccleston figures as there are good error bars (10%). The two sets of values are reasonably close. k1 = 1.666e-3/sec, k2 = 1000/sec, k3 = 10/sec (note k3 is rate-limiting) This is one of the rare cases where we have direct info on the k3 being rate-limiting. Hence the ratio I use for the k2:k3 rates is 100 rather than the usual 4.
  Ras_slash_GAP_slash_GAP_minus_inact_minus_ras_1: Ras_slash_GTP_minus_Ras + Ras_slash_GAP -> Ras_slash_GAP_slash_GAP_minus_inact_minus_ras_slash_GAP_minus_inact_minus_ras_cplx; Ras_slash_GAP_slash_GAP_minus_inact_minus_ras_1_k1*Ras_slash_GTP_minus_Ras*Ras_slash_GAP - Ras_slash_GAP_slash_GAP_minus_inact_minus_ras_1_k2*Ras_slash_GAP_slash_GAP_minus_inact_minus_ras_slash_GAP_minus_inact_minus_ras_cplx;
    Ras_slash_GAP_slash_GAP_minus_inact_minus_ras_1_k1 = 9.996e-10 vol_uMINVsecINV; Ras_slash_GAP_slash_GAP_minus_inact_minus_ras_1_k2 = 1e-9 vol_secINV;
  // k3*Ras_slash_GAP_slash_GAP_minus_inact_minus_ras_slash_GAP_minus_inact_minus_ras_cplx
  Ras_slash_GAP_slash_GAP_minus_inact_minus_ras_2: Ras_slash_GAP_slash_GAP_minus_inact_minus_ras_slash_GAP_minus_inact_minus_ras_cplx => Ras_slash_GDP_minus_Ras + Ras_slash_GAP; Ras_slash_GAP_slash_GAP_minus_inact_minus_ras_2_k3*Ras_slash_GAP_slash_GAP_minus_inact_minus_ras_slash_GAP_minus_inact_minus_ras_cplx;
    Ras_slash_GAP_slash_GAP_minus_inact_minus_ras_2_k3 = 1e-11 vol_secINV;
  // k1*PDGFR_slash_SHC*PDGFR_slash_L_dot_PDGFR-k2*PDGFR_slash_L_dot_PDGFR_slash_phosph_Shc_slash_phosph_Shc_cplx
  // Rates from Okada et al JBC 270:35 pp 20737 1995 Km = 0.70 to 0.85 uM, Vmax = 4.4 to 5.0 pmol/min. Unfortunately the amount of enzyme is not known, the prep is only partially purified. Tau phosph is max within 30 sec, falls back within 20 min. Ref: Sasaoka et al JBC 269:51 32621 1994. Use k3 = 0.1 based on this tau. 27 Apr 2001: Lowered k3 to 0.05 to fix conc-effect of SHC phosph by PDGF. This gives results for downstream effects in agreement with other papers, e.g., the Brondello papers.
  PDGFR_slash_L_dot_PDGFR_slash_phosph_Shc_1: PDGFR_slash_SHC + PDGFR_slash_L_dot_PDGFR -> PDGFR_slash_L_dot_PDGFR_slash_phosph_Shc_slash_phosph_Shc_cplx; PDGFR_slash_L_dot_PDGFR_slash_phosph_Shc_1_k1*PDGFR_slash_SHC*PDGFR_slash_L_dot_PDGFR - PDGFR_slash_L_dot_PDGFR_slash_phosph_Shc_1_k2*PDGFR_slash_L_dot_PDGFR_slash_phosph_Shc_slash_phosph_Shc_cplx;
    PDGFR_slash_L_dot_PDGFR_slash_phosph_Shc_1_k1 = 3e-13 vol_uMINVsecINV; PDGFR_slash_L_dot_PDGFR_slash_phosph_Shc_1_k2 = 2e-13 vol_secINV;
  // k3*PDGFR_slash_L_dot_PDGFR_slash_phosph_Shc_slash_phosph_Shc_cplx
  PDGFR_slash_L_dot_PDGFR_slash_phosph_Shc_2: PDGFR_slash_L_dot_PDGFR_slash_phosph_Shc_slash_phosph_Shc_cplx => PDGFR_slash_SHC_star_ + PDGFR_slash_L_dot_PDGFR; PDGFR_slash_L_dot_PDGFR_slash_phosph_Shc_2_k3*PDGFR_slash_L_dot_PDGFR_slash_phosph_Shc_slash_phosph_Shc_cplx;
    PDGFR_slash_L_dot_PDGFR_slash_phosph_Shc_2_k3 = 5e-14 vol_secINV;
  // k1*MAPK_slash_MAPK_minus_tyr*MKP_minus_2-k2*MKP_minus_2_slash_MKP2_minus_tyr_minus_deph_slash_MKP2_minus_tyr_minus_deph_cplx
  // 22 Apr 2001: Based on MKP1 parms. The original kinetics have been modified to obey the k2 = 4 * k3 rule, while keeping kcat and Km fixed. The only constraining data point is the time course of MAPK dephosphorylation, which this model satisfies. The rates are treated as the same as for MKP-1, based on Chu et al 1995 JBC 271(11):6497-6501
  MKP_minus_2_slash_MKP2_minus_tyr_minus_deph_1: MAPK_slash_MAPK_minus_tyr + MKP_minus_2 -> MKP_minus_2_slash_MKP2_minus_tyr_minus_deph_slash_MKP2_minus_tyr_minus_deph_cplx; MKP_minus_2_slash_MKP2_minus_tyr_minus_deph_1_k1*MAPK_slash_MAPK_minus_tyr*MKP_minus_2 - MKP_minus_2_slash_MKP2_minus_tyr_minus_deph_1_k2*MKP_minus_2_slash_MKP2_minus_tyr_minus_deph_slash_MKP2_minus_tyr_minus_deph_cplx;
    MKP_minus_2_slash_MKP2_minus_tyr_minus_deph_1_k1 = 7.5e-11 vol_uMINVsecINV; MKP_minus_2_slash_MKP2_minus_tyr_minus_deph_1_k2 = 4e-12 vol_secINV;
  // k3*MKP_minus_2_slash_MKP2_minus_tyr_minus_deph_slash_MKP2_minus_tyr_minus_deph_cplx
  MKP_minus_2_slash_MKP2_minus_tyr_minus_deph_2: MKP_minus_2_slash_MKP2_minus_tyr_minus_deph_slash_MKP2_minus_tyr_minus_deph_cplx => MAPK_slash_MAPK + MKP_minus_2; MKP_minus_2_slash_MKP2_minus_tyr_minus_deph_2_k3*MKP_minus_2_slash_MKP2_minus_tyr_minus_deph_slash_MKP2_minus_tyr_minus_deph_cplx;
    MKP_minus_2_slash_MKP2_minus_tyr_minus_deph_2_k3 = 1e-12 vol_secINV;
  // k1*MAPK_star_*MKP_minus_2-k2*MKP_minus_2_slash_MKP2_minus_thr_minus_deph_slash_MKP2_minus_thr_minus_deph_cplx
  // See MKP2-tyr-deph
  MKP_minus_2_slash_MKP2_minus_thr_minus_deph_1: MAPK_star_ + MKP_minus_2 -> MKP_minus_2_slash_MKP2_minus_thr_minus_deph_slash_MKP2_minus_thr_minus_deph_cplx; MKP_minus_2_slash_MKP2_minus_thr_minus_deph_1_k1*MAPK_star_*MKP_minus_2 - MKP_minus_2_slash_MKP2_minus_thr_minus_deph_1_k2*MKP_minus_2_slash_MKP2_minus_thr_minus_deph_slash_MKP2_minus_thr_minus_deph_cplx;
    MKP_minus_2_slash_MKP2_minus_thr_minus_deph_1_k1 = 7.5e-11 vol_uMINVsecINV; MKP_minus_2_slash_MKP2_minus_thr_minus_deph_1_k2 = 4e-12 vol_secINV;
  // k3*MKP_minus_2_slash_MKP2_minus_thr_minus_deph_slash_MKP2_minus_thr_minus_deph_cplx
  MKP_minus_2_slash_MKP2_minus_thr_minus_deph_2: MKP_minus_2_slash_MKP2_minus_thr_minus_deph_slash_MKP2_minus_thr_minus_deph_cplx => MAPK_slash_MAPK_minus_tyr + MKP_minus_2; MKP_minus_2_slash_MKP2_minus_thr_minus_deph_2_k3*MKP_minus_2_slash_MKP2_minus_thr_minus_deph_slash_MKP2_minus_thr_minus_deph_cplx;
    MKP_minus_2_slash_MKP2_minus_thr_minus_deph_2_k3 = 1e-12 vol_secINV;

  // Unit definitions:
  unit uM1 = 1e-6 mole / litre;
  unit vol_secINV = litre / second;
  unit vol_uMINVsecINV = litre^2 / (1e-6 mole * second);
  unit substance = 1e-6 mole;
end
